<?xml version="1.0" encoding="UTF-8"?>
<fdm_config name="D150 AGILE" release="BETA" version="2.0">
   <metrics>
      <wingarea unit="M2">130.514</wingarea>
      <wingspan unit="M">33.914</wingspan>
      <chord unit="M">4.192</chord>
      <htailarea unit="M2">32.758</htailarea>
      <htailarm unit="M">17.727</htailarm>
      <vtailarea unit="M2">46.589</vtailarea>
      <htailarm unit="M2">16.961</htailarm>
      <location name="AERORP" unit="M">
         <x>29.0738</x>
         <y>0.000000</y>
         <z>-1.136280</z>
      </location>
      <location name="EYEPOINT" unit="M">
         <x>14.6200</x>
         <y>0.000000</y>
         <z>-0.100000</z>
      </location>
      <location name="VRP" unit="M">
         <x>29.0738</x>
         <y>0.000000</y>
         <z>-1.136280</z>
      </location>
   </metrics>
   <mass_balance>
      <ixx unit="KG*M2">761969.688</ixx>
      <iyy unit="KG*M2">1997119.840</iyy>
      <izz unit="KG*M2">2567919.197</izz>
      <ixy unit="KG*M2">0.000000</ixy>
      <ixz unit="KG*M2">8000.000</ixz>
      <iyz unit="KG*M2">0.000000</iyz>
      <emptywt unit="KG">40926.030</emptywt>
      <location name="CG" unit="M">
         <x>16.0519</x>
         <y>0.000000</y>
         <z>0.000000</z>
      </location>
   </mass_balance>
   <ground_reactions>
      <contact name="Nose Gear" type="BOGEY">
         <location unit="M">
            <x>5.0720</x>
            <y>0.000000</y>
            <z>-1.690730</z>
            <brake_group>NONE</brake_group>
            <retractable>1.0000</retractable>
         </location>
         <static_friction>0.8000</static_friction>
         <dynamic_friction>0.5000</dynamic_friction>
         <rolling_friction>0.0200</rolling_friction>
         <spring_coeff unit="LBS/FT">133934.750</spring_coeff>
         <dynamic_coeff unit="LBS/FT">5952.656</dynamic_coeff>
         <damping_coeff_rebound unit="LBS/FT/SEC">11905.311</damping_coeff_rebound>
         <max_steer unit="DEG">35.000</max_steer>
      </contact>
      <contact name="Right Main Gear" type="BOGEY">
         <location unit="M">
            <x>16.1264</x>
            <y>3.7814</y>
            <z>-1.305452</z>
            <brake_group>RIGHT</brake_group>
            <retractable>1.0000</retractable>
         </location>
         <static_friction>0.8000</static_friction>
         <dynamic_friction>0.5000</dynamic_friction>
         <rolling_friction>0.0200</rolling_friction>
         <spring_coeff unit="LBS/FT">178579.673</spring_coeff>
         <dynamic_coeff unit="LBS/FT">14881.640</dynamic_coeff>
         <damping_coeff_rebound unit="LBS/FT/SEC">29763.270</damping_coeff_rebound>
         <max_steer unit="DEG">0.000000</max_steer>
      </contact>
      <contact name="Left Main Gear" type="BOGEY">
         <location unit="M">
            <x>16.1264</x>
            <y>-3.781379</y>
            <z>-1.305452</z>
            <brake_group>LEFT</brake_group>
            <retractable>1.0000</retractable>
         </location>
         <static_friction>0.8000</static_friction>
         <dynamic_friction>0.5000</dynamic_friction>
         <rolling_friction>0.0200</rolling_friction>
         <spring_coeff unit="LBS/FT">178579.673</spring_coeff>
         <dynamic_coeff unit="LBS/FT">14881.640</dynamic_coeff>
         <damping_coeff_rebound unit="LBS/FT/SEC">29763.270</damping_coeff_rebound>
         <max_steer unit="DEG">0.000000</max_steer>
      </contact>
   </ground_reactions>
   <propulsion>
      <engine file="D150_AGILE_engine">
         <location unit="M">
            <x>13.6765</x>
            <y>5.7482</y>
            <z>-2.338950</z>
         </location>
         <orient unit="DEG">
            <roll>0.000000</roll>
            <pitch>0.000000</pitch>
            <yaw>0.000000</yaw>
         </orient>
         <feed>0</feed>
         <feed>1</feed>
         <feed>2</feed>
         <thruster file="direct">
            <location unit="M">
               <x>13.6765</x>
               <y>5.7482</y>
               <z>-2.338950</z>
            </location>
            <orient unit="DEG">
               <roll>0.000000</roll>
               <pitch>0.000000</pitch>
               <yaw>0.000000</yaw>
            </orient>
         </thruster>
      </engine>
      <engine file="D150_AGILE_engine">
         <location unit="M">
            <x>13.6765</x>
            <y>-5.748200</y>
            <z>-2.338950</z>
         </location>
         <orient unit="DEG">
            <roll>0.000000</roll>
            <pitch>0.000000</pitch>
            <yaw>0.000000</yaw>
         </orient>
         <feed>3</feed>
         <feed>4</feed>
         <feed>5</feed>
         <thruster file="direct">
            <location unit="M">
               <x>13.6765</x>
               <y>-5.748200</y>
               <z>-2.338950</z>
            </location>
            <orient unit="DEG">
               <roll>0.000000</roll>
               <pitch>0.000000</pitch>
               <yaw>0.000000</yaw>
            </orient>
         </thruster>
      </engine>
      <tank type="FUEL">
         <location unit="M">
            <x>14.7736</x>
            <y>0.9362</y>
            <z>-1.212579</z>
         </location>
         <capacity unit="KG">3271.985</capacity>
         <contents unit="KG">3271.985</contents>
      </tank>
      <tank type="FUEL">
         <location unit="M">
            <x>15.9503</x>
            <z>-0.881934</z>
            <y>4.7680</y>
         </location>
         <capacity unit="KG">5532.997</capacity>
         <contents unit="KG">5532.997</contents>
      </tank>
      <tank type="FUEL">
         <location unit="M">
            <x>18.8026</x>
            <z>-0.241955</z>
            <y>11.3816</y>
         </location>
         <capacity unit="KG">707.706</capacity>
         <contents unit="KG">707.706</contents>
      </tank>
      <tank type="FUEL">
         <location unit="M">
            <x>14.7736</x>
            <y>-0.936171</y>
            <z>-1.212579</z>
         </location>
         <capacity unit="KG">3271.985</capacity>
         <contents unit="KG">3271.985</contents>
      </tank>
      <tank type="FUEL">
         <location unit="M">
            <x>15.9503</x>
            <z>-0.881934</z>
            <y>-4.767959</y>
         </location>
         <capacity unit="KG">5532.997</capacity>
         <contents unit="KG">5532.997</contents>
      </tank>
      <tank type="FUEL">
         <location unit="M">
            <x>18.8026</x>
            <z>-0.241955</z>
            <y>-11.381596</y>
         </location>
         <capacity unit="KG">707.706</capacity>
         <contents unit="KG">707.706</contents>
      </tank>
   </propulsion>
   <flight_control name="FCS :D150 AGILE">
      <channel name="Pitch">
         <summer name="fcs/pitch-trim-sum">
            <input>fcs/elevator-cmd-norm</input>
            <input>fcs/pitch-trim-cmd-norm</input>
            <clipto>
               <min>-1</min>
               <max>1</max>
            </clipto>
         </summer>
         <aerosurface_scale name="Elevator Control">
            <input>fcs/pitch-trim-sum</input>
            <range>
               <min>-15.0</min>
               <max>30.0</max>
            </range>
            <output>fcs/elevator-pos-deg</output>
         </aerosurface_scale>
         <aerosurface_scale name="Elevator Normalized">
            <input>fcs/elevator-pos-deg</input>
            <domain>
               <min>-15.0</min>
               <max>30.0</max>
            </domain>
            <range>
               <min> -1</min>
               <max> 1</max>
            </range>
            <output>fcs/elevator-pos-norm</output>
         </aerosurface_scale>
      </channel>
      <channel name="Yaw">
         <summer name="fcs/yaw-trim-sum">
            <input>fcs/rudder-cmd-norm</input>
            <input>fcs/yaw-trim-cmd-norm</input>
            <clipto>
               <min>-1</min>
               <max>1</max>
            </clipto>
         </summer>
         <aerosurface_scale name="Rudder Control">
            <input>fcs/yaw-trim-sum</input>
            <range>
               <min>-30.0</min>
               <max>30.0</max>
            </range>
            <output>fcs/rudder-pos-deg</output>
         </aerosurface_scale>
         <aerosurface_scale name="Rudder Normalized">
            <input>fcs/rudder-pos-deg</input>
            <domain>
               <min>-30.0</min>
               <max>30.0</max>
            </domain>
            <range>
               <min> -1</min>
               <max> 1</max>
            </range>
            <output>fcs/rudder-pos-norm</output>
         </aerosurface_scale>
      </channel>
      <channel name="Roll">
         <summer name="roll Trim Sum">
            <input>fcs/aileron-cmd-norm</input>
            <input>fcs/roll-trim-cmd-norm</input>
            <clipto>
               <min>-1</min>
               <max>1</max>
            </clipto>
         </summer>
         <aerosurface_scale name="Right Aileron Control">
            <input>fcs/roll-trim-sum</input>
            <output>fcs/right-aileron-pos-deg</output>
            <range>
               <min>-25.0</min>
               <max>25.0</max>
            </range>
         </aerosurface_scale>
         <aerosurface_scale name="Right Aileron Normalized">
            <input>fcs/right-aileron-pos-deg</input>
            <domain>
               <min>-25.0</min>
               <max>25.0</max>
            </domain>
            <range>
               <min> -1</min>
               <max> 1</max>
            </range>
            <output>fcs/right-aileron-pos-norm</output>
         </aerosurface_scale>
         <aerosurface_scale name="Left Aileron Control">
            <input>fcs/roll-trim-sum</input>
            <output>fcs/left-aileron-pos-rad</output>
            <range>
               <min>-25.0</min>
               <max>25.0</max>
            </range>
            <gain>0.0175</gain>
         </aerosurface_scale>
         <aerosurface_scale name="Left Aileron position normalized">
            <input>fcs/left-aileron-pos-deg</input>
            <domain>
               <min>-25.0</min>
               <max>25.0</max>
            </domain>
            <range>
               <min> -1</min>
               <max> 1</max>
            </range>
            <output>fcs/left-aileron-pos-norm</output>
         </aerosurface_scale>
      </channel>
      <channel name="Flaps">
         <aerosurface_scale name="Flap Position Normalizer">
            <input>fcs/flap-pos-deg</input>
            <domain>
               <min>0</min>
               <max>35.0</max>
            </domain>
            <range>
               <min> 0</min>
               <max> 1</max>
            </range>
            <output>fcs/flap-pos-norm</output>
         </aerosurface_scale>
      </channel>
   </flight_control>
   <aerodynamics>
      <axis name="X">
         <function name="aero/function/axial_coeff_basic_Mach">
            <description>Lift coefficient due to alpha, beta, Reynolds, Mach</description>
            <product>
               <interpolate1d>
                  <p>velocities/mach</p>
                  <v>0.200</v>
                  <p>aero/function/axial_coeff_basic_M0</p>
                  <v>0.780</v>
                  <p>aero/function/axial_coeff_basic_M1</p>
               </interpolate1d>
            </product>
         </function>
         <function name="aero/function/axial_coeff_basic_M0">
            <description>CL = f(alpha, beta, Re) at M = 0.2</description>
            <product>
               <table>
                  <independentVar lookup="row">aero/alpha-deg</independentVar>
                  <independentVar lookup="column">aero/beta-deg</independentVar>
                  <independentVar lookup="table">aero/Re</independentVar>
                  <tableData breakPoint="1.0E7">
 	-5.0	0.0	5.0
-7.5	-0.047213	-0.047183	-0.047213
-5.0	-0.0093551	-0.0093241	-0.0093551
-2.5	0.011819	0.011849	0.011819
0.0	0.016307	0.016338	0.016307
0.5	0.015203	0.015233	0.015203
1.0	0.013431	0.013461	0.013431
1.5	0.010991	0.011022	0.010991
2.0	0.0078845	0.007915	0.0078845
2.5	0.0041103	0.0041408	0.0041103
3.0	-3.3134E-4	-3.0084E-4	-3.3134E-4
3.25	-0.0028021	-0.0027721	-0.0028021
3.5	-0.0054401	-0.0054101	-0.0054401
4.0	-0.011217	-0.011186	-0.011217
4.5	-0.017661	-0.01763	-0.017661
5.0	-0.024772	-0.024741	-0.024772
6.0	-0.040997	-0.040966	-0.040997
7.5	-0.070339	-0.070309	-0.070339
10.0	-0.13259	-0.13256	-0.13259
12.5	-0.21153	-0.2115	-0.21153
15.0	-0.30716	-0.30713	-0.30716
</tableData>
                  <tableData breakPoint="2.77E7">
 	-5.0	0.0	5.0
-7.5	-0.048418	-0.048392	-0.048418
-5.0	-0.010564	-0.010539	-0.010564
-2.5	0.010605	0.010631	0.010605
0.0	0.015093	0.015119	0.015093
0.5	0.013988	0.014014	0.013988
1.0	0.012216	0.012242	0.012216
1.5	0.0097772	0.0098031	0.0097772
2.0	0.0066707	0.0066966	0.0066707
2.5	0.0028969	0.0029228	0.0028969
3.0	-0.0015442	-0.0015183	-0.0015442
3.25	-0.0040151	-0.0039891	-0.0040151
3.5	-0.0066531	-0.0066271	-0.0066531
4.0	-0.012428	-0.012402	-0.012428
4.5	-0.018871	-0.018846	-0.018871
5.0	-0.025982	-0.025956	-0.025982
6.0	-0.042204	-0.042179	-0.042204
7.5	-0.071543	-0.071518	-0.071543
10.0	-0.13379	-0.13377	-0.13379
12.5	-0.21272	-0.21269	-0.21272
15.0	-0.30833	-0.3083	-0.30833
</tableData>
                  <tableData breakPoint="3.0E7">
 	-5.0	0.0	5.0
-7.5	-0.048501	-0.048475	-0.048501
-5.0	-0.010648	-0.010622	-0.010648
-2.5	0.010522	0.010547	0.010522
0.0	0.015009	0.015034	0.015009
0.5	0.013904	0.01393	0.013904
1.0	0.012133	0.012158	0.012133
1.5	0.0096935	0.009719	0.0096935
2.0	0.006587	0.0066126	0.006587
2.5	0.0028132	0.0028388	0.0028132
3.0	-0.0016278	-0.0016023	-0.0016278
3.25	-0.0040991	-0.0040731	-0.0040991
3.5	-0.0067361	-0.0067111	-0.0067361
4.0	-0.012512	-0.012486	-0.012512
4.5	-0.018955	-0.018929	-0.018955
5.0	-0.026065	-0.02604	-0.026065
6.0	-0.042288	-0.042262	-0.042288
7.5	-0.071626	-0.071601	-0.071626
10.0	-0.13387	-0.13385	-0.13387
12.5	-0.2128	-0.21278	-0.2128
15.0	-0.30841	-0.30838	-0.30841
</tableData>
               </table>
            </product>
         </function>
         <function name="aero/function/axial_coeff_basic_M1">
            <description>CL = f(alpha, beta, Re) at M = 0.78</description>
            <product>
               <table>
                  <independentVar lookup="row">aero/alpha-deg</independentVar>
                  <independentVar lookup="column">aero/beta-deg</independentVar>
                  <independentVar lookup="table">aero/Re</independentVar>
                  <tableData breakPoint="1.0E7">
 	-5.0	0.0	5.0
-7.5	-0.045507	-0.04547	-0.045507
-5.0	-0.0076401	-0.0076031	-0.0076401
-2.5	0.013539	0.013576	0.013539
0.0	0.018029	0.018066	0.018029
0.5	0.016924	0.016961	0.016924
1.0	0.015152	0.015189	0.015152
1.5	0.012712	0.012749	0.012712
2.0	0.0096049	0.009642	0.0096049
2.5	0.0058301	0.0058672	0.0058301
3.0	0.0013878	0.0014249	0.0013878
3.25	-0.0010837	-0.0010467	-0.0010837
3.5	-0.0037221	-0.0036851	-0.0037221
4.0	-0.0094991	-0.0094621	-0.0094991
4.5	-0.015944	-0.015907	-0.015944
5.0	-0.023057	-0.02302	-0.023057
6.0	-0.039285	-0.039248	-0.039285
7.5	-0.068633	-0.068596	-0.068633
10.0	-0.1309	-0.13086	-0.1309
12.5	-0.20985	-0.20982	-0.20985
15.0	-0.30549	-0.30546	-0.30549
</tableData>
                  <tableData breakPoint="2.77E7">
 	-5.0	0.0	5.0
-7.5	-0.046972	-0.046941	-0.046972
-5.0	-0.0091121	-0.0090811	-0.0091121
-2.5	0.012062	0.012093	0.012062
0.0	0.016551	0.016582	0.016551
0.5	0.015446	0.015477	0.015446
1.0	0.013674	0.013705	0.013674
1.5	0.011235	0.011266	0.011235
2.0	0.0081277	0.0081592	0.0081277
2.5	0.0043535	0.0043849	0.0043535
3.0	-8.8344E-5	-5.6844E-5	-8.8344E-5
3.25	-0.0025591	-0.0025281	-0.0025591
3.5	-0.0051971	-0.0051661	-0.0051971
4.0	-0.010974	-0.010943	-0.010974
4.5	-0.017418	-0.017387	-0.017418
5.0	-0.024529	-0.024498	-0.024529
6.0	-0.040755	-0.040723	-0.040755
7.5	-0.070098	-0.070067	-0.070098
10.0	-0.13236	-0.13232	-0.13236
12.5	-0.21129	-0.21126	-0.21129
15.0	-0.30692	-0.30689	-0.30692
</tableData>
                  <tableData breakPoint="3.0E7">
 	-5.0	0.0	5.0
-7.5	-0.047073	-0.047042	-0.047073
-5.0	-0.0092141	-0.0091831	-0.0092141
-2.5	0.01196	0.011991	0.01196
0.0	0.016449	0.01648	0.016449
0.5	0.015344	0.015375	0.015344
1.0	0.013572	0.013603	0.013572
1.5	0.011133	0.011164	0.011133
2.0	0.0080259	0.0080569	0.0080259
2.5	0.0042517	0.0042827	0.0042517
3.0	-1.9004E-4	-1.5904E-4	-1.9004E-4
3.25	-0.0026611	-0.0026301	-0.0026611
3.5	-0.0052991	-0.0052681	-0.0052991
4.0	-0.011076	-0.011045	-0.011076
4.5	-0.017519	-0.017489	-0.017519
5.0	-0.024631	-0.0246	-0.024631
6.0	-0.040856	-0.040825	-0.040856
7.5	-0.070199	-0.070168	-0.070199
10.0	-0.13246	-0.13242	-0.13246
12.5	-0.21139	-0.21136	-0.21139
15.0	-0.30702	-0.30699	-0.30702
</tableData>
               </table>
            </product>
         </function>
         <function name="aero/function/aileron_axial_coeff_basic_Mach_deflection">
            <product>
               <interpolate1d>
                  <p>fcs/left-aileron-pos-deg</p>
                  <v>0.000000</v>
                  <p>aero/function/aileron_axial_coeff_basic_Mach_deflection_0</p>
                  <v>0.5000</v>
                  <p>aero/function/aileron_axial_coeff_basic_Mach_deflection_1</p>
                  <v>1.0000</v>
                  <p>aero/function/aileron_axial_coeff_basic_Mach_deflection_2</p>
               </interpolate1d>
            </product>
         </function>
         <function name="aero/function/aileron_axial_coeff_basic_Mach_deflection_0">
            <product>
               <interpolate1d>
                  <p>velocities/mach</p>
                  <v>0.2000</v>
                  <p>aero/function/aileron_axial_coeff_basic_M0_deflection_0</p>
                  <p>velocities/mach</p>
                  <v>0.7800</v>
                  <p>aero/function/aileron_axial_coeff_basic_M1_deflection_0</p>
               </interpolate1d>
            </product>
         </function>
         <function name="aero/function/aileron_axial_coeff_basic_M0_deflection_0">
            <product>
               <table>
                  <independentVar lookup="row">aero/alpha-deg</independentVar>
                  <independentVar lookup="column">aero/beta-deg</independentVar>
                  <independentVar lookup="table">aero/Re</independentVar>
                  <tableData breakPoint="1.0E7">
 	-5.0	0.0	5.0
-7.5	0.0	0.0090965	0.0086916
-5.0	-0.0084544	0.0	0.017383
-2.5	-0.016909	0.0052779	0.0
0.0	0.0	0.010556	0.0093129
0.5	-0.0051758	0.0	0.018626
1.0	-0.010352	0.0059947	0.0
1.5	0.0	0.011989	0.010477
2.0	-0.0015063	0.0	0.020955
2.5	-0.0030126	0.0066966	0.0
3.0	0.0	0.013393	0.011998
3.25	0.0023024	0.0	0.023997
3.5	0.0046048	0.0070412	0.0
4.0	0.0	0.014082	0.013794
4.5	0.0030584	0.0	0.027588
5.0	0.0061168	0.0073814	0.0
6.0	0.0	0.014763	0.014445
7.5	0.0038077	0.0	0.02889
10.0	0.0076154	0.0080471	0.0
12.5	0.0	0.016094	0.013702
15.0	0.0045482	0.0	0.027403
</tableData>
                  <tableData breakPoint="2.77E7">
 	-5.0	0.0	5.0
-7.5	0.0	0.0091311	0.0087248
-5.0	-0.0084867	0.0	0.01745
-2.5	-0.016973	0.0052981	0.0
0.0	0.0	0.010596	0.0093484
0.5	-0.0051957	0.0	0.018697
1.0	-0.010391	0.0060176	0.0
1.5	0.0	0.012035	0.010517
2.0	-0.0015121	0.0	0.021035
2.5	-0.0030243	0.0067221	0.0
3.0	0.0	0.013444	0.012044
3.25	0.0023111	0.0	0.024088
3.5	0.0046223	0.0070681	0.0
4.0	0.0	0.014136	0.013847
4.5	0.00307	0.0	0.027693
5.0	0.0061401	0.0074095	0.0
6.0	0.0	0.014819	0.0145
7.5	0.0038222	0.0	0.029001
10.0	0.0076444	0.0080778	0.0
12.5	0.0	0.016156	0.013754
15.0	0.0045656	0.0	0.027508
</tableData>
                  <tableData breakPoint="3.0E7">
 	-5.0	0.0	5.0
-7.5	0.0	0.0090963	0.0086915
-5.0	-0.0084545	0.0	0.017383
-2.5	-0.016909	0.0052778	0.0
0.0	0.0	0.010556	0.0093128
0.5	-0.0051759	0.0	0.018626
1.0	-0.010352	0.0059946	0.0
1.5	0.0	0.011989	0.010477
2.0	-0.0015064	0.0	0.020955
2.5	-0.0030129	0.0066965	0.0
3.0	0.0	0.013393	0.011998
3.25	0.0023023	0.0	0.023997
3.5	0.0046046	0.0070411	0.0
4.0	0.0	0.014082	0.013794
4.5	0.0030583	0.0	0.027588
5.0	0.0061166	0.0073813	0.0
6.0	0.0	0.014763	0.014445
7.5	0.0038076	0.0	0.02889
10.0	0.0076152	0.008047	0.0
12.5	0.0	0.016094	0.013702
15.0	0.0045481	0.0	0.027403
</tableData>
               </table>
            </product>
         </function>
         <function name="aero/function/aileron_axial_coeff_basic_M1_deflection_0">
            <product>
               <table>
                  <independentVar lookup="row">aero/alpha-deg</independentVar>
                  <independentVar lookup="column">aero/beta-deg</independentVar>
                  <independentVar lookup="table">aero/Re</independentVar>
                  <tableData breakPoint="1.0E7">
 	-5.0	0.0	5.0
-7.5	0.0	0.0090965	0.0086916
-5.0	-0.0084544	0.0	0.017383
-2.5	-0.016909	0.0052779	0.0
0.0	0.0	0.010556	0.0093129
0.5	-0.0051758	0.0	0.018626
1.0	-0.010352	0.0059947	0.0
1.5	0.0	0.011989	0.010477
2.0	-0.0015063	0.0	0.020955
2.5	-0.0030126	0.0066966	0.0
3.0	0.0	0.013393	0.011998
3.25	0.0023024	0.0	0.023997
3.5	0.0046048	0.0070412	0.0
4.0	0.0	0.014082	0.013794
4.5	0.0030584	0.0	0.027588
5.0	0.0061168	0.0073814	0.0
6.0	0.0	0.014763	0.014445
7.5	0.0038077	0.0	0.02889
10.0	0.0076154	0.0080471	0.0
12.5	0.0	0.016094	0.013702
15.0	0.0045482	0.0	0.027403
</tableData>
                  <tableData breakPoint="2.77E7">
 	-5.0	0.0	5.0
-7.5	0.0	0.0091311	0.0087248
-5.0	-0.0084867	0.0	0.01745
-2.5	-0.016973	0.0052981	0.0
0.0	0.0	0.010596	0.0093484
0.5	-0.0051957	0.0	0.018697
1.0	-0.010391	0.0060176	0.0
1.5	0.0	0.012035	0.010517
2.0	-0.0015121	0.0	0.021035
2.5	-0.0030243	0.0067221	0.0
3.0	0.0	0.013444	0.012044
3.25	0.0023111	0.0	0.024088
3.5	0.0046223	0.0070681	0.0
4.0	0.0	0.014136	0.013847
4.5	0.00307	0.0	0.027693
5.0	0.0061401	0.0074095	0.0
6.0	0.0	0.014819	0.0145
7.5	0.0038222	0.0	0.029001
10.0	0.0076444	0.0080778	0.0
12.5	0.0	0.016156	0.013754
15.0	0.0045656	0.0	0.027508
</tableData>
                  <tableData breakPoint="3.0E7">
 	-5.0	0.0	5.0
-7.5	0.0	0.0090963	0.0086915
-5.0	-0.0084545	0.0	0.017383
-2.5	-0.016909	0.0052778	0.0
0.0	0.0	0.010556	0.0093128
0.5	-0.0051759	0.0	0.018626
1.0	-0.010352	0.0059946	0.0
1.5	0.0	0.011989	0.010477
2.0	-0.0015064	0.0	0.020955
2.5	-0.0030129	0.0066965	0.0
3.0	0.0	0.013393	0.011998
3.25	0.0023023	0.0	0.023997
3.5	0.0046046	0.0070411	0.0
4.0	0.0	0.014082	0.013794
4.5	0.0030583	0.0	0.027588
5.0	0.0061166	0.0073813	0.0
6.0	0.0	0.014763	0.014445
7.5	0.0038076	0.0	0.02889
10.0	0.0076152	0.008047	0.0
12.5	0.0	0.016094	0.013702
15.0	0.0045481	0.0	0.027403
</tableData>
               </table>
            </product>
         </function>
         <function name="aero/function/aileron_axial_coeff_basic_Mach_deflection_1">
            <product>
               <interpolate1d>
                  <p>velocities/mach</p>
                  <v>0.2000</v>
                  <p>aero/function/aileron_axial_coeff_basic_M0_deflection_1</p>
                  <p>velocities/mach</p>
                  <v>0.7800</v>
                  <p>aero/function/aileron_axial_coeff_basic_M1_deflection_1</p>
               </interpolate1d>
            </product>
         </function>
         <function name="aero/function/aileron_axial_coeff_basic_M0_deflection_1">
            <product>
               <table>
                  <independentVar lookup="row">aero/alpha-deg</independentVar>
                  <independentVar lookup="column">aero/beta-deg</independentVar>
                  <independentVar lookup="table">aero/Re</independentVar>
                  <tableData breakPoint="1.0E7">
 	-5.0	0.0	5.0
-7.5	0.0	0.0090965	0.0086916
-5.0	-0.0084544	0.0	0.017383
-2.5	-0.016909	0.0052779	0.0
0.0	0.0	0.010556	0.0093129
0.5	-0.0051758	0.0	0.018626
1.0	-0.010352	0.0059947	0.0
1.5	0.0	0.011989	0.010477
2.0	-0.0015063	0.0	0.020955
2.5	-0.0030126	0.0066966	0.0
3.0	0.0	0.013393	0.011998
3.25	0.0023024	0.0	0.023997
3.5	0.0046048	0.0070412	0.0
4.0	0.0	0.014082	0.013794
4.5	0.0030584	0.0	0.027588
5.0	0.0061168	0.0073814	0.0
6.0	0.0	0.014763	0.014445
7.5	0.0038077	0.0	0.02889
10.0	0.0076154	0.0080471	0.0
12.5	0.0	0.016094	0.013702
15.0	0.0045482	0.0	0.027403
</tableData>
                  <tableData breakPoint="2.77E7">
 	-5.0	0.0	5.0
-7.5	0.0	0.0091311	0.0087248
-5.0	-0.0084867	0.0	0.01745
-2.5	-0.016973	0.0052981	0.0
0.0	0.0	0.010596	0.0093484
0.5	-0.0051957	0.0	0.018697
1.0	-0.010391	0.0060176	0.0
1.5	0.0	0.012035	0.010517
2.0	-0.0015121	0.0	0.021035
2.5	-0.0030243	0.0067221	0.0
3.0	0.0	0.013444	0.012044
3.25	0.0023111	0.0	0.024088
3.5	0.0046223	0.0070681	0.0
4.0	0.0	0.014136	0.013847
4.5	0.00307	0.0	0.027693
5.0	0.0061401	0.0074095	0.0
6.0	0.0	0.014819	0.0145
7.5	0.0038222	0.0	0.029001
10.0	0.0076444	0.0080778	0.0
12.5	0.0	0.016156	0.013754
15.0	0.0045656	0.0	0.027508
</tableData>
                  <tableData breakPoint="3.0E7">
 	-5.0	0.0	5.0
-7.5	0.0	0.0090963	0.0086915
-5.0	-0.0084545	0.0	0.017383
-2.5	-0.016909	0.0052778	0.0
0.0	0.0	0.010556	0.0093128
0.5	-0.0051759	0.0	0.018626
1.0	-0.010352	0.0059946	0.0
1.5	0.0	0.011989	0.010477
2.0	-0.0015064	0.0	0.020955
2.5	-0.0030129	0.0066965	0.0
3.0	0.0	0.013393	0.011998
3.25	0.0023023	0.0	0.023997
3.5	0.0046046	0.0070411	0.0
4.0	0.0	0.014082	0.013794
4.5	0.0030583	0.0	0.027588
5.0	0.0061166	0.0073813	0.0
6.0	0.0	0.014763	0.014445
7.5	0.0038076	0.0	0.02889
10.0	0.0076152	0.008047	0.0
12.5	0.0	0.016094	0.013702
15.0	0.0045481	0.0	0.027403
</tableData>
               </table>
            </product>
         </function>
         <function name="aero/function/aileron_axial_coeff_basic_M1_deflection_1">
            <product>
               <table>
                  <independentVar lookup="row">aero/alpha-deg</independentVar>
                  <independentVar lookup="column">aero/beta-deg</independentVar>
                  <independentVar lookup="table">aero/Re</independentVar>
                  <tableData breakPoint="1.0E7">
 	-5.0	0.0	5.0
-7.5	0.0	0.0090965	0.0086916
-5.0	-0.0084544	0.0	0.017383
-2.5	-0.016909	0.0052779	0.0
0.0	0.0	0.010556	0.0093129
0.5	-0.0051758	0.0	0.018626
1.0	-0.010352	0.0059947	0.0
1.5	0.0	0.011989	0.010477
2.0	-0.0015063	0.0	0.020955
2.5	-0.0030126	0.0066966	0.0
3.0	0.0	0.013393	0.011998
3.25	0.0023024	0.0	0.023997
3.5	0.0046048	0.0070412	0.0
4.0	0.0	0.014082	0.013794
4.5	0.0030584	0.0	0.027588
5.0	0.0061168	0.0073814	0.0
6.0	0.0	0.014763	0.014445
7.5	0.0038077	0.0	0.02889
10.0	0.0076154	0.0080471	0.0
12.5	0.0	0.016094	0.013702
15.0	0.0045482	0.0	0.027403
</tableData>
                  <tableData breakPoint="2.77E7">
 	-5.0	0.0	5.0
-7.5	0.0	0.0091311	0.0087248
-5.0	-0.0084867	0.0	0.01745
-2.5	-0.016973	0.0052981	0.0
0.0	0.0	0.010596	0.0093484
0.5	-0.0051957	0.0	0.018697
1.0	-0.010391	0.0060176	0.0
1.5	0.0	0.012035	0.010517
2.0	-0.0015121	0.0	0.021035
2.5	-0.0030243	0.0067221	0.0
3.0	0.0	0.013444	0.012044
3.25	0.0023111	0.0	0.024088
3.5	0.0046223	0.0070681	0.0
4.0	0.0	0.014136	0.013847
4.5	0.00307	0.0	0.027693
5.0	0.0061401	0.0074095	0.0
6.0	0.0	0.014819	0.0145
7.5	0.0038222	0.0	0.029001
10.0	0.0076444	0.0080778	0.0
12.5	0.0	0.016156	0.013754
15.0	0.0045656	0.0	0.027508
</tableData>
                  <tableData breakPoint="3.0E7">
 	-5.0	0.0	5.0
-7.5	0.0	0.0090963	0.0086915
-5.0	-0.0084545	0.0	0.017383
-2.5	-0.016909	0.0052778	0.0
0.0	0.0	0.010556	0.0093128
0.5	-0.0051759	0.0	0.018626
1.0	-0.010352	0.0059946	0.0
1.5	0.0	0.011989	0.010477
2.0	-0.0015064	0.0	0.020955
2.5	-0.0030129	0.0066965	0.0
3.0	0.0	0.013393	0.011998
3.25	0.0023023	0.0	0.023997
3.5	0.0046046	0.0070411	0.0
4.0	0.0	0.014082	0.013794
4.5	0.0030583	0.0	0.027588
5.0	0.0061166	0.0073813	0.0
6.0	0.0	0.014763	0.014445
7.5	0.0038076	0.0	0.02889
10.0	0.0076152	0.008047	0.0
12.5	0.0	0.016094	0.013702
15.0	0.0045481	0.0	0.027403
</tableData>
               </table>
            </product>
         </function>
         <function name="aero/function/aileron_axial_coeff_basic_Mach_deflection_2">
            <product>
               <interpolate1d>
                  <p>velocities/mach</p>
                  <v>0.2000</v>
                  <p>aero/function/aileron_axial_coeff_basic_M0_deflection_2</p>
                  <p>velocities/mach</p>
                  <v>0.7800</v>
                  <p>aero/function/aileron_axial_coeff_basic_M1_deflection_2</p>
               </interpolate1d>
            </product>
         </function>
         <function name="aero/function/aileron_axial_coeff_basic_M0_deflection_2">
            <product>
               <table>
                  <independentVar lookup="row">aero/alpha-deg</independentVar>
                  <independentVar lookup="column">aero/beta-deg</independentVar>
                  <independentVar lookup="table">aero/Re</independentVar>
                  <tableData breakPoint="1.0E7">
 	-5.0	0.0	5.0
-7.5	0.0	0.0090965	0.0086916
-5.0	-0.0084544	0.0	0.017383
-2.5	-0.016909	0.0052779	0.0
0.0	0.0	0.010556	0.0093129
0.5	-0.0051758	0.0	0.018626
1.0	-0.010352	0.0059947	0.0
1.5	0.0	0.011989	0.010477
2.0	-0.0015063	0.0	0.020955
2.5	-0.0030126	0.0066966	0.0
3.0	0.0	0.013393	0.011998
3.25	0.0023024	0.0	0.023997
3.5	0.0046048	0.0070412	0.0
4.0	0.0	0.014082	0.013794
4.5	0.0030584	0.0	0.027588
5.0	0.0061168	0.0073814	0.0
6.0	0.0	0.014763	0.014445
7.5	0.0038077	0.0	0.02889
10.0	0.0076154	0.0080471	0.0
12.5	0.0	0.016094	0.013702
15.0	0.0045482	0.0	0.027403
</tableData>
                  <tableData breakPoint="2.77E7">
 	-5.0	0.0	5.0
-7.5	0.0	0.0091311	0.0087248
-5.0	-0.0084867	0.0	0.01745
-2.5	-0.016973	0.0052981	0.0
0.0	0.0	0.010596	0.0093484
0.5	-0.0051957	0.0	0.018697
1.0	-0.010391	0.0060176	0.0
1.5	0.0	0.012035	0.010517
2.0	-0.0015121	0.0	0.021035
2.5	-0.0030243	0.0067221	0.0
3.0	0.0	0.013444	0.012044
3.25	0.0023111	0.0	0.024088
3.5	0.0046223	0.0070681	0.0
4.0	0.0	0.014136	0.013847
4.5	0.00307	0.0	0.027693
5.0	0.0061401	0.0074095	0.0
6.0	0.0	0.014819	0.0145
7.5	0.0038222	0.0	0.029001
10.0	0.0076444	0.0080778	0.0
12.5	0.0	0.016156	0.013754
15.0	0.0045656	0.0	0.027508
</tableData>
                  <tableData breakPoint="3.0E7">
 	-5.0	0.0	5.0
-7.5	0.0	0.0090963	0.0086915
-5.0	-0.0084545	0.0	0.017383
-2.5	-0.016909	0.0052778	0.0
0.0	0.0	0.010556	0.0093128
0.5	-0.0051759	0.0	0.018626
1.0	-0.010352	0.0059946	0.0
1.5	0.0	0.011989	0.010477
2.0	-0.0015064	0.0	0.020955
2.5	-0.0030129	0.0066965	0.0
3.0	0.0	0.013393	0.011998
3.25	0.0023023	0.0	0.023997
3.5	0.0046046	0.0070411	0.0
4.0	0.0	0.014082	0.013794
4.5	0.0030583	0.0	0.027588
5.0	0.0061166	0.0073813	0.0
6.0	0.0	0.014763	0.014445
7.5	0.0038076	0.0	0.02889
10.0	0.0076152	0.008047	0.0
12.5	0.0	0.016094	0.013702
15.0	0.0045481	0.0	0.027403
</tableData>
               </table>
            </product>
         </function>
         <function name="aero/function/aileron_axial_coeff_basic_M1_deflection_2">
            <product>
               <table>
                  <independentVar lookup="row">aero/alpha-deg</independentVar>
                  <independentVar lookup="column">aero/beta-deg</independentVar>
                  <independentVar lookup="table">aero/Re</independentVar>
                  <tableData breakPoint="1.0E7">
 	-5.0	0.0	5.0
-7.5	0.0	0.0090965	0.0086916
-5.0	-0.0084544	0.0	0.017383
-2.5	-0.016909	0.0052779	0.0
0.0	0.0	0.010556	0.0093129
0.5	-0.0051758	0.0	0.018626
1.0	-0.010352	0.0059947	0.0
1.5	0.0	0.011989	0.010477
2.0	-0.0015063	0.0	0.020955
2.5	-0.0030126	0.0066966	0.0
3.0	0.0	0.013393	0.011998
3.25	0.0023024	0.0	0.023997
3.5	0.0046048	0.0070412	0.0
4.0	0.0	0.014082	0.013794
4.5	0.0030584	0.0	0.027588
5.0	0.0061168	0.0073814	0.0
6.0	0.0	0.014763	0.014445
7.5	0.0038077	0.0	0.02889
10.0	0.0076154	0.0080471	0.0
12.5	0.0	0.016094	0.013702
15.0	0.0045482	0.0	0.027403
</tableData>
                  <tableData breakPoint="2.77E7">
 	-5.0	0.0	5.0
-7.5	0.0	0.0091311	0.0087248
-5.0	-0.0084867	0.0	0.01745
-2.5	-0.016973	0.0052981	0.0
0.0	0.0	0.010596	0.0093484
0.5	-0.0051957	0.0	0.018697
1.0	-0.010391	0.0060176	0.0
1.5	0.0	0.012035	0.010517
2.0	-0.0015121	0.0	0.021035
2.5	-0.0030243	0.0067221	0.0
3.0	0.0	0.013444	0.012044
3.25	0.0023111	0.0	0.024088
3.5	0.0046223	0.0070681	0.0
4.0	0.0	0.014136	0.013847
4.5	0.00307	0.0	0.027693
5.0	0.0061401	0.0074095	0.0
6.0	0.0	0.014819	0.0145
7.5	0.0038222	0.0	0.029001
10.0	0.0076444	0.0080778	0.0
12.5	0.0	0.016156	0.013754
15.0	0.0045656	0.0	0.027508
</tableData>
                  <tableData breakPoint="3.0E7">
 	-5.0	0.0	5.0
-7.5	0.0	0.0090963	0.0086915
-5.0	-0.0084545	0.0	0.017383
-2.5	-0.016909	0.0052778	0.0
0.0	0.0	0.010556	0.0093128
0.5	-0.0051759	0.0	0.018626
1.0	-0.010352	0.0059946	0.0
1.5	0.0	0.011989	0.010477
2.0	-0.0015064	0.0	0.020955
2.5	-0.0030129	0.0066965	0.0
3.0	0.0	0.013393	0.011998
3.25	0.0023023	0.0	0.023997
3.5	0.0046046	0.0070411	0.0
4.0	0.0	0.014082	0.013794
4.5	0.0030583	0.0	0.027588
5.0	0.0061166	0.0073813	0.0
6.0	0.0	0.014763	0.014445
7.5	0.0038076	0.0	0.02889
10.0	0.0076152	0.008047	0.0
12.5	0.0	0.016094	0.013702
15.0	0.0045481	0.0	0.027403
</tableData>
               </table>
            </product>
         </function>
         <function name="aero/function/elevator_axial_coeff_basic_Mach_deflection">
            <product>
               <interpolate1d>
                  <p>fcs/elevator-pos-deg</p>
                  <v>0.000000</v>
                  <p>aero/function/elevator_axial_coeff_basic_Mach_deflection_0</p>
                  <v>0.5000</v>
                  <p>aero/function/elevator_axial_coeff_basic_Mach_deflection_1</p>
                  <v>1.0000</v>
                  <p>aero/function/elevator_axial_coeff_basic_Mach_deflection_2</p>
               </interpolate1d>
            </product>
         </function>
         <function name="aero/function/elevator_axial_coeff_basic_Mach_deflection_0">
            <product>
               <interpolate1d>
                  <p>velocities/mach</p>
                  <v>0.2000</v>
                  <p>aero/function/elevator_axial_coeff_basic_M0_deflection_0</p>
                  <p>velocities/mach</p>
                  <v>0.7800</v>
                  <p>aero/function/elevator_axial_coeff_basic_M1_deflection_0</p>
               </interpolate1d>
            </product>
         </function>
         <function name="aero/function/elevator_axial_coeff_basic_M0_deflection_0">
            <product>
               <table>
                  <independentVar lookup="row">aero/alpha-deg</independentVar>
                  <independentVar lookup="column">aero/beta-deg</independentVar>
                  <independentVar lookup="table">aero/Re</independentVar>
                  <tableData breakPoint="1.0E7">
 	-5.0	0.0	5.0
-7.5	0.010567	0.0065698	0.0
-5.0	0.0	-0.0041148	0.016671
-2.5	-0.021133	0.0	-0.0091922
0.0	0.0069548	0.0082296	0.0
0.5	0.0	-0.0049498	0.018384
1.0	-0.01391	0.0	-0.010917
1.5	0.0031491	0.0098996	0.0
2.0	0.0	-0.0057895	0.021833
2.5	-0.0062983	0.0	-0.013527
3.0	-8.2728E-4	0.011579	0.0
3.25	0.0	-0.0062111	0.027054
3.5	0.0016546	0.0	-0.017926
4.0	-0.0016409	0.012422	0.0
4.5	0.0	-0.0066339	0.035852
5.0	0.0032818	0.0	-0.022359
6.0	-0.0024602	0.013268	0.0
7.5	0.0	-0.0074826	0.044717
10.0	0.0049204	0.0	-0.026795
12.5	-0.0032849	0.014965	0.0
15.0	0.0	-0.0083354	0.05359
</tableData>
                  <tableData breakPoint="2.77E7">
 	-5.0	0.0	5.0
-7.5	0.010607	0.0065949	0.0
-5.0	0.0	-0.0041306	0.016735
-2.5	-0.021214	0.0	-0.0092274
0.0	0.0069814	0.0082611	0.0
0.5	0.0	-0.0049687	0.018455
1.0	-0.013963	0.0	-0.010958
1.5	0.0031612	0.0099374	0.0
2.0	0.0	-0.0058117	0.021917
2.5	-0.0063223	0.0	-0.013579
3.0	-8.3045E-4	0.011623	0.0
3.25	0.0	-0.0062349	0.027158
3.5	0.0016609	0.0	-0.017994
4.0	-0.0016472	0.01247	0.0
4.5	0.0	-0.0066592	0.035989
5.0	0.0032944	0.0	-0.022444
6.0	-0.0024696	0.013318	0.0
7.5	0.0	-0.0075112	0.044888
10.0	0.0049392	0.0	-0.026897
12.5	-0.0032974	0.015022	0.0
15.0	0.0	-0.0083673	0.053795
</tableData>
                  <tableData breakPoint="3.0E7">
 	-5.0	0.0	5.0
-7.5	0.010567	0.0065698	0.0
-5.0	0.0	-0.0041149	0.016671
-2.5	-0.021133	0.0	-0.0091923
0.0	0.0069548	0.0082297	0.0
0.5	0.0	-0.0049498	0.018385
1.0	-0.01391	0.0	-0.010917
1.5	0.0031491	0.0098996	0.0
2.0	0.0	-0.0057896	0.021833
2.5	-0.0062982	0.0	-0.013527
3.0	-8.273E-4	0.011579	0.0
3.25	0.0	-0.0062112	0.027054
3.5	0.0016546	0.0	-0.017926
4.0	-0.0016409	0.012422	0.0
4.5	0.0	-0.0066339	0.035852
5.0	0.0032819	0.0	-0.022359
6.0	-0.0024602	0.013268	0.0
7.5	0.0	-0.0074826	0.044717
10.0	0.0049204	0.0	-0.026795
12.5	-0.0032849	0.014965	0.0
15.0	0.0	-0.0083355	0.05359
</tableData>
               </table>
            </product>
         </function>
         <function name="aero/function/elevator_axial_coeff_basic_M1_deflection_0">
            <product>
               <table>
                  <independentVar lookup="row">aero/alpha-deg</independentVar>
                  <independentVar lookup="column">aero/beta-deg</independentVar>
                  <independentVar lookup="table">aero/Re</independentVar>
                  <tableData breakPoint="1.0E7">
 	-5.0	0.0	5.0
-7.5	0.010567	0.0065698	0.0
-5.0	0.0	-0.0041148	0.016671
-2.5	-0.021133	0.0	-0.0091922
0.0	0.0069548	0.0082296	0.0
0.5	0.0	-0.0049498	0.018384
1.0	-0.01391	0.0	-0.010917
1.5	0.0031491	0.0098996	0.0
2.0	0.0	-0.0057895	0.021833
2.5	-0.0062983	0.0	-0.013527
3.0	-8.2728E-4	0.011579	0.0
3.25	0.0	-0.0062111	0.027054
3.5	0.0016546	0.0	-0.017926
4.0	-0.0016409	0.012422	0.0
4.5	0.0	-0.0066339	0.035852
5.0	0.0032818	0.0	-0.022359
6.0	-0.0024602	0.013268	0.0
7.5	0.0	-0.0074826	0.044717
10.0	0.0049204	0.0	-0.026795
12.5	-0.0032849	0.014965	0.0
15.0	0.0	-0.0083354	0.05359
</tableData>
                  <tableData breakPoint="2.77E7">
 	-5.0	0.0	5.0
-7.5	0.010607	0.0065949	0.0
-5.0	0.0	-0.0041306	0.016735
-2.5	-0.021214	0.0	-0.0092274
0.0	0.0069814	0.0082611	0.0
0.5	0.0	-0.0049687	0.018455
1.0	-0.013963	0.0	-0.010958
1.5	0.0031612	0.0099374	0.0
2.0	0.0	-0.0058117	0.021917
2.5	-0.0063223	0.0	-0.013579
3.0	-8.3045E-4	0.011623	0.0
3.25	0.0	-0.0062349	0.027158
3.5	0.0016609	0.0	-0.017994
4.0	-0.0016472	0.01247	0.0
4.5	0.0	-0.0066592	0.035989
5.0	0.0032944	0.0	-0.022444
6.0	-0.0024696	0.013318	0.0
7.5	0.0	-0.0075112	0.044888
10.0	0.0049392	0.0	-0.026897
12.5	-0.0032974	0.015022	0.0
15.0	0.0	-0.0083673	0.053795
</tableData>
                  <tableData breakPoint="3.0E7">
 	-5.0	0.0	5.0
-7.5	0.010567	0.0065698	0.0
-5.0	0.0	-0.0041149	0.016671
-2.5	-0.021133	0.0	-0.0091923
0.0	0.0069548	0.0082297	0.0
0.5	0.0	-0.0049498	0.018385
1.0	-0.01391	0.0	-0.010917
1.5	0.0031491	0.0098996	0.0
2.0	0.0	-0.0057896	0.021833
2.5	-0.0062982	0.0	-0.013527
3.0	-8.273E-4	0.011579	0.0
3.25	0.0	-0.0062112	0.027054
3.5	0.0016546	0.0	-0.017926
4.0	-0.0016409	0.012422	0.0
4.5	0.0	-0.0066339	0.035852
5.0	0.0032819	0.0	-0.022359
6.0	-0.0024602	0.013268	0.0
7.5	0.0	-0.0074826	0.044717
10.0	0.0049204	0.0	-0.026795
12.5	-0.0032849	0.014965	0.0
15.0	0.0	-0.0083355	0.05359
</tableData>
               </table>
            </product>
         </function>
         <function name="aero/function/elevator_axial_coeff_basic_Mach_deflection_1">
            <product>
               <interpolate1d>
                  <p>velocities/mach</p>
                  <v>0.2000</v>
                  <p>aero/function/elevator_axial_coeff_basic_M0_deflection_1</p>
                  <p>velocities/mach</p>
                  <v>0.7800</v>
                  <p>aero/function/elevator_axial_coeff_basic_M1_deflection_1</p>
               </interpolate1d>
            </product>
         </function>
         <function name="aero/function/elevator_axial_coeff_basic_M0_deflection_1">
            <product>
               <table>
                  <independentVar lookup="row">aero/alpha-deg</independentVar>
                  <independentVar lookup="column">aero/beta-deg</independentVar>
                  <independentVar lookup="table">aero/Re</independentVar>
                  <tableData breakPoint="1.0E7">
 	-5.0	0.0	5.0
-7.5	0.010567	0.0065698	0.0
-5.0	0.0	-0.0041148	0.016671
-2.5	-0.021133	0.0	-0.0091922
0.0	0.0069548	0.0082296	0.0
0.5	0.0	-0.0049498	0.018384
1.0	-0.01391	0.0	-0.010917
1.5	0.0031491	0.0098996	0.0
2.0	0.0	-0.0057895	0.021833
2.5	-0.0062983	0.0	-0.013527
3.0	-8.2728E-4	0.011579	0.0
3.25	0.0	-0.0062111	0.027054
3.5	0.0016546	0.0	-0.017926
4.0	-0.0016409	0.012422	0.0
4.5	0.0	-0.0066339	0.035852
5.0	0.0032818	0.0	-0.022359
6.0	-0.0024602	0.013268	0.0
7.5	0.0	-0.0074826	0.044717
10.0	0.0049204	0.0	-0.026795
12.5	-0.0032849	0.014965	0.0
15.0	0.0	-0.0083354	0.05359
</tableData>
                  <tableData breakPoint="2.77E7">
 	-5.0	0.0	5.0
-7.5	0.010607	0.0065949	0.0
-5.0	0.0	-0.0041306	0.016735
-2.5	-0.021214	0.0	-0.0092274
0.0	0.0069814	0.0082611	0.0
0.5	0.0	-0.0049687	0.018455
1.0	-0.013963	0.0	-0.010958
1.5	0.0031612	0.0099374	0.0
2.0	0.0	-0.0058117	0.021917
2.5	-0.0063223	0.0	-0.013579
3.0	-8.3045E-4	0.011623	0.0
3.25	0.0	-0.0062349	0.027158
3.5	0.0016609	0.0	-0.017994
4.0	-0.0016472	0.01247	0.0
4.5	0.0	-0.0066592	0.035989
5.0	0.0032944	0.0	-0.022444
6.0	-0.0024696	0.013318	0.0
7.5	0.0	-0.0075112	0.044888
10.0	0.0049392	0.0	-0.026897
12.5	-0.0032974	0.015022	0.0
15.0	0.0	-0.0083673	0.053795
</tableData>
                  <tableData breakPoint="3.0E7">
 	-5.0	0.0	5.0
-7.5	0.010567	0.0065698	0.0
-5.0	0.0	-0.0041149	0.016671
-2.5	-0.021133	0.0	-0.0091923
0.0	0.0069548	0.0082297	0.0
0.5	0.0	-0.0049498	0.018385
1.0	-0.01391	0.0	-0.010917
1.5	0.0031491	0.0098996	0.0
2.0	0.0	-0.0057896	0.021833
2.5	-0.0062982	0.0	-0.013527
3.0	-8.273E-4	0.011579	0.0
3.25	0.0	-0.0062112	0.027054
3.5	0.0016546	0.0	-0.017926
4.0	-0.0016409	0.012422	0.0
4.5	0.0	-0.0066339	0.035852
5.0	0.0032819	0.0	-0.022359
6.0	-0.0024602	0.013268	0.0
7.5	0.0	-0.0074826	0.044717
10.0	0.0049204	0.0	-0.026795
12.5	-0.0032849	0.014965	0.0
15.0	0.0	-0.0083355	0.05359
</tableData>
               </table>
            </product>
         </function>
         <function name="aero/function/elevator_axial_coeff_basic_M1_deflection_1">
            <product>
               <table>
                  <independentVar lookup="row">aero/alpha-deg</independentVar>
                  <independentVar lookup="column">aero/beta-deg</independentVar>
                  <independentVar lookup="table">aero/Re</independentVar>
                  <tableData breakPoint="1.0E7">
 	-5.0	0.0	5.0
-7.5	0.010567	0.0065698	0.0
-5.0	0.0	-0.0041148	0.016671
-2.5	-0.021133	0.0	-0.0091922
0.0	0.0069548	0.0082296	0.0
0.5	0.0	-0.0049498	0.018384
1.0	-0.01391	0.0	-0.010917
1.5	0.0031491	0.0098996	0.0
2.0	0.0	-0.0057895	0.021833
2.5	-0.0062983	0.0	-0.013527
3.0	-8.2728E-4	0.011579	0.0
3.25	0.0	-0.0062111	0.027054
3.5	0.0016546	0.0	-0.017926
4.0	-0.0016409	0.012422	0.0
4.5	0.0	-0.0066339	0.035852
5.0	0.0032818	0.0	-0.022359
6.0	-0.0024602	0.013268	0.0
7.5	0.0	-0.0074826	0.044717
10.0	0.0049204	0.0	-0.026795
12.5	-0.0032849	0.014965	0.0
15.0	0.0	-0.0083354	0.05359
</tableData>
                  <tableData breakPoint="2.77E7">
 	-5.0	0.0	5.0
-7.5	0.010607	0.0065949	0.0
-5.0	0.0	-0.0041306	0.016735
-2.5	-0.021214	0.0	-0.0092274
0.0	0.0069814	0.0082611	0.0
0.5	0.0	-0.0049687	0.018455
1.0	-0.013963	0.0	-0.010958
1.5	0.0031612	0.0099374	0.0
2.0	0.0	-0.0058117	0.021917
2.5	-0.0063223	0.0	-0.013579
3.0	-8.3045E-4	0.011623	0.0
3.25	0.0	-0.0062349	0.027158
3.5	0.0016609	0.0	-0.017994
4.0	-0.0016472	0.01247	0.0
4.5	0.0	-0.0066592	0.035989
5.0	0.0032944	0.0	-0.022444
6.0	-0.0024696	0.013318	0.0
7.5	0.0	-0.0075112	0.044888
10.0	0.0049392	0.0	-0.026897
12.5	-0.0032974	0.015022	0.0
15.0	0.0	-0.0083673	0.053795
</tableData>
                  <tableData breakPoint="3.0E7">
 	-5.0	0.0	5.0
-7.5	0.010567	0.0065698	0.0
-5.0	0.0	-0.0041149	0.016671
-2.5	-0.021133	0.0	-0.0091923
0.0	0.0069548	0.0082297	0.0
0.5	0.0	-0.0049498	0.018385
1.0	-0.01391	0.0	-0.010917
1.5	0.0031491	0.0098996	0.0
2.0	0.0	-0.0057896	0.021833
2.5	-0.0062982	0.0	-0.013527
3.0	-8.273E-4	0.011579	0.0
3.25	0.0	-0.0062112	0.027054
3.5	0.0016546	0.0	-0.017926
4.0	-0.0016409	0.012422	0.0
4.5	0.0	-0.0066339	0.035852
5.0	0.0032819	0.0	-0.022359
6.0	-0.0024602	0.013268	0.0
7.5	0.0	-0.0074826	0.044717
10.0	0.0049204	0.0	-0.026795
12.5	-0.0032849	0.014965	0.0
15.0	0.0	-0.0083355	0.05359
</tableData>
               </table>
            </product>
         </function>
         <function name="aero/function/elevator_axial_coeff_basic_Mach_deflection_2">
            <product>
               <interpolate1d>
                  <p>velocities/mach</p>
                  <v>0.2000</v>
                  <p>aero/function/elevator_axial_coeff_basic_M0_deflection_2</p>
                  <p>velocities/mach</p>
                  <v>0.7800</v>
                  <p>aero/function/elevator_axial_coeff_basic_M1_deflection_2</p>
               </interpolate1d>
            </product>
         </function>
         <function name="aero/function/elevator_axial_coeff_basic_M0_deflection_2">
            <product>
               <table>
                  <independentVar lookup="row">aero/alpha-deg</independentVar>
                  <independentVar lookup="column">aero/beta-deg</independentVar>
                  <independentVar lookup="table">aero/Re</independentVar>
                  <tableData breakPoint="1.0E7">
 	-5.0	0.0	5.0
-7.5	0.010567	0.0065698	0.0
-5.0	0.0	-0.0041148	0.016671
-2.5	-0.021133	0.0	-0.0091922
0.0	0.0069548	0.0082296	0.0
0.5	0.0	-0.0049498	0.018384
1.0	-0.01391	0.0	-0.010917
1.5	0.0031491	0.0098996	0.0
2.0	0.0	-0.0057895	0.021833
2.5	-0.0062983	0.0	-0.013527
3.0	-8.2728E-4	0.011579	0.0
3.25	0.0	-0.0062111	0.027054
3.5	0.0016546	0.0	-0.017926
4.0	-0.0016409	0.012422	0.0
4.5	0.0	-0.0066339	0.035852
5.0	0.0032818	0.0	-0.022359
6.0	-0.0024602	0.013268	0.0
7.5	0.0	-0.0074826	0.044717
10.0	0.0049204	0.0	-0.026795
12.5	-0.0032849	0.014965	0.0
15.0	0.0	-0.0083354	0.05359
</tableData>
                  <tableData breakPoint="2.77E7">
 	-5.0	0.0	5.0
-7.5	0.010607	0.0065949	0.0
-5.0	0.0	-0.0041306	0.016735
-2.5	-0.021214	0.0	-0.0092274
0.0	0.0069814	0.0082611	0.0
0.5	0.0	-0.0049687	0.018455
1.0	-0.013963	0.0	-0.010958
1.5	0.0031612	0.0099374	0.0
2.0	0.0	-0.0058117	0.021917
2.5	-0.0063223	0.0	-0.013579
3.0	-8.3045E-4	0.011623	0.0
3.25	0.0	-0.0062349	0.027158
3.5	0.0016609	0.0	-0.017994
4.0	-0.0016472	0.01247	0.0
4.5	0.0	-0.0066592	0.035989
5.0	0.0032944	0.0	-0.022444
6.0	-0.0024696	0.013318	0.0
7.5	0.0	-0.0075112	0.044888
10.0	0.0049392	0.0	-0.026897
12.5	-0.0032974	0.015022	0.0
15.0	0.0	-0.0083673	0.053795
</tableData>
                  <tableData breakPoint="3.0E7">
 	-5.0	0.0	5.0
-7.5	0.010567	0.0065698	0.0
-5.0	0.0	-0.0041149	0.016671
-2.5	-0.021133	0.0	-0.0091923
0.0	0.0069548	0.0082297	0.0
0.5	0.0	-0.0049498	0.018385
1.0	-0.01391	0.0	-0.010917
1.5	0.0031491	0.0098996	0.0
2.0	0.0	-0.0057896	0.021833
2.5	-0.0062982	0.0	-0.013527
3.0	-8.273E-4	0.011579	0.0
3.25	0.0	-0.0062112	0.027054
3.5	0.0016546	0.0	-0.017926
4.0	-0.0016409	0.012422	0.0
4.5	0.0	-0.0066339	0.035852
5.0	0.0032819	0.0	-0.022359
6.0	-0.0024602	0.013268	0.0
7.5	0.0	-0.0074826	0.044717
10.0	0.0049204	0.0	-0.026795
12.5	-0.0032849	0.014965	0.0
15.0	0.0	-0.0083355	0.05359
</tableData>
               </table>
            </product>
         </function>
         <function name="aero/function/elevator_axial_coeff_basic_M1_deflection_2">
            <product>
               <table>
                  <independentVar lookup="row">aero/alpha-deg</independentVar>
                  <independentVar lookup="column">aero/beta-deg</independentVar>
                  <independentVar lookup="table">aero/Re</independentVar>
                  <tableData breakPoint="1.0E7">
 	-5.0	0.0	5.0
-7.5	0.010567	0.0065698	0.0
-5.0	0.0	-0.0041148	0.016671
-2.5	-0.021133	0.0	-0.0091922
0.0	0.0069548	0.0082296	0.0
0.5	0.0	-0.0049498	0.018384
1.0	-0.01391	0.0	-0.010917
1.5	0.0031491	0.0098996	0.0
2.0	0.0	-0.0057895	0.021833
2.5	-0.0062983	0.0	-0.013527
3.0	-8.2728E-4	0.011579	0.0
3.25	0.0	-0.0062111	0.027054
3.5	0.0016546	0.0	-0.017926
4.0	-0.0016409	0.012422	0.0
4.5	0.0	-0.0066339	0.035852
5.0	0.0032818	0.0	-0.022359
6.0	-0.0024602	0.013268	0.0
7.5	0.0	-0.0074826	0.044717
10.0	0.0049204	0.0	-0.026795
12.5	-0.0032849	0.014965	0.0
15.0	0.0	-0.0083354	0.05359
</tableData>
                  <tableData breakPoint="2.77E7">
 	-5.0	0.0	5.0
-7.5	0.010607	0.0065949	0.0
-5.0	0.0	-0.0041306	0.016735
-2.5	-0.021214	0.0	-0.0092274
0.0	0.0069814	0.0082611	0.0
0.5	0.0	-0.0049687	0.018455
1.0	-0.013963	0.0	-0.010958
1.5	0.0031612	0.0099374	0.0
2.0	0.0	-0.0058117	0.021917
2.5	-0.0063223	0.0	-0.013579
3.0	-8.3045E-4	0.011623	0.0
3.25	0.0	-0.0062349	0.027158
3.5	0.0016609	0.0	-0.017994
4.0	-0.0016472	0.01247	0.0
4.5	0.0	-0.0066592	0.035989
5.0	0.0032944	0.0	-0.022444
6.0	-0.0024696	0.013318	0.0
7.5	0.0	-0.0075112	0.044888
10.0	0.0049392	0.0	-0.026897
12.5	-0.0032974	0.015022	0.0
15.0	0.0	-0.0083673	0.053795
</tableData>
                  <tableData breakPoint="3.0E7">
 	-5.0	0.0	5.0
-7.5	0.010567	0.0065698	0.0
-5.0	0.0	-0.0041149	0.016671
-2.5	-0.021133	0.0	-0.0091923
0.0	0.0069548	0.0082297	0.0
0.5	0.0	-0.0049498	0.018385
1.0	-0.01391	0.0	-0.010917
1.5	0.0031491	0.0098996	0.0
2.0	0.0	-0.0057896	0.021833
2.5	-0.0062982	0.0	-0.013527
3.0	-8.273E-4	0.011579	0.0
3.25	0.0	-0.0062112	0.027054
3.5	0.0016546	0.0	-0.017926
4.0	-0.0016409	0.012422	0.0
4.5	0.0	-0.0066339	0.035852
5.0	0.0032819	0.0	-0.022359
6.0	-0.0024602	0.013268	0.0
7.5	0.0	-0.0074826	0.044717
10.0	0.0049204	0.0	-0.026795
12.5	-0.0032849	0.014965	0.0
15.0	0.0	-0.0083355	0.05359
</tableData>
               </table>
            </product>
         </function>
         <function name="aero/function/rudder_axial_coeff_basic_Mach_deflection">
            <product>
               <interpolate1d>
                  <p>fcs/rudder-pos-deg</p>
                  <v>0.000000</v>
                  <p>aero/function/rudder_axial_coeff_basic_Mach_deflection_0</p>
                  <v>0.5000</v>
                  <p>aero/function/rudder_axial_coeff_basic_Mach_deflection_1</p>
                  <v>1.0000</v>
                  <p>aero/function/rudder_axial_coeff_basic_Mach_deflection_2</p>
               </interpolate1d>
            </product>
         </function>
         <function name="aero/function/rudder_axial_coeff_basic_Mach_deflection_0">
            <product>
               <interpolate1d>
                  <p>velocities/mach</p>
                  <v>0.2000</v>
                  <p>aero/function/rudder_axial_coeff_basic_M0_deflection_0</p>
                  <p>velocities/mach</p>
                  <v>0.7800</v>
                  <p>aero/function/rudder_axial_coeff_basic_M1_deflection_0</p>
               </interpolate1d>
            </product>
         </function>
         <function name="aero/function/rudder_axial_coeff_basic_M0_deflection_0">
            <product>
               <table>
                  <independentVar lookup="row">aero/alpha-deg</independentVar>
                  <independentVar lookup="column">aero/beta-deg</independentVar>
                  <independentVar lookup="table">aero/Re</independentVar>
                  <tableData breakPoint="1.0E7">
 	-5.0	0.0	5.0
-7.5	0.012131	-0.011117	0.0
-5.0	0.0	0.011048	-0.010681
-2.5	-0.012131	0.0	0.010604
0.0	0.011894	-0.011048	0.0
0.5	0.0	0.010977	-0.010604
1.0	-0.011894	0.0	0.010445
1.5	0.011622	-0.010977	0.0
2.0	0.0	0.010905	-0.010445
2.5	-0.011622	0.0	0.010197
3.0	0.011317	-0.010905	0.0
3.25	0.0	0.010869	-0.010197
3.5	-0.011317	0.0	0.0097552
4.0	0.011252	-0.010869	0.0
4.5	0.0	0.010832	-0.0097552
5.0	-0.011252	0.0	0.0092798
6.0	0.011185	-0.010832	0.0
7.5	0.0	0.010757	-0.0092798
10.0	-0.011185	0.0	0.0087703
12.5	0.011117	-0.010757	0.0
15.0	0.0	0.010681	-0.0087703
</tableData>
                  <tableData breakPoint="2.77E7">
 	-5.0	0.0	5.0
-7.5	-3.6102E-6	3.0522E-6	0.0
-5.0	0.0	-2.9925E-6	2.6634E-6
-2.5	3.6102E-6	0.0	-2.5923E-6
0.0	-3.5708E-6	2.9925E-6	0.0
0.5	0.0	-2.9307E-6	2.5923E-6
1.0	3.5708E-6	0.0	-2.4457E-6
1.5	-3.4349E-6	2.9307E-6	0.0
2.0	0.0	-2.8667E-6	2.4457E-6
2.5	3.4349E-6	0.0	-2.2169E-6
3.0	-3.2166E-6	2.8667E-6	0.0
3.25	0.0	-2.834E-6	2.2169E-6
3.5	3.2166E-6	0.0	-1.82E-6
4.0	-3.1643E-6	2.834E-6	0.0
4.5	0.0	-2.8008E-6	1.82E-6
5.0	3.1643E-6	0.0	-1.4173E-6
6.0	-3.1095E-6	2.8008E-6	0.0
7.5	0.0	-2.733E-6	1.4173E-6
10.0	3.1095E-6	0.0	-1.0244E-6
12.5	-3.0522E-6	2.733E-6	0.0
15.0	0.0	-2.6634E-6	1.0244E-6
</tableData>
                  <tableData breakPoint="3.0E7">
 	-5.0	0.0	5.0
-7.5	-0.012138	0.011123	0.0
-5.0	0.0	-0.011054	0.010687
-2.5	0.012138	0.0	-0.010609
0.0	-0.011901	0.011054	0.0
0.5	0.0	-0.010983	0.010609
1.0	0.011901	0.0	-0.01045
1.5	-0.011629	0.010983	0.0
2.0	0.0	-0.010911	0.01045
2.5	0.011629	0.0	-0.010201
3.0	-0.011323	0.010911	0.0
3.25	0.0	-0.010875	0.010201
3.5	0.011323	0.0	-0.0097589
4.0	-0.011258	0.010875	0.0
4.5	0.0	-0.010838	0.0097589
5.0	0.011258	0.0	-0.0092826
6.0	-0.011191	0.010838	0.0
7.5	0.0	-0.010763	0.0092826
10.0	0.011191	0.0	-0.0087723
12.5	-0.011123	0.010763	0.0
15.0	0.0	-0.010687	0.0087723
</tableData>
               </table>
            </product>
         </function>
         <function name="aero/function/rudder_axial_coeff_basic_M1_deflection_0">
            <product>
               <table>
                  <independentVar lookup="row">aero/alpha-deg</independentVar>
                  <independentVar lookup="column">aero/beta-deg</independentVar>
                  <independentVar lookup="table">aero/Re</independentVar>
                  <tableData breakPoint="1.0E7">
 	-5.0	0.0	5.0
-7.5	0.012131	-0.011117	0.0
-5.0	0.0	0.011048	-0.010681
-2.5	-0.012131	0.0	0.010604
0.0	0.011894	-0.011048	0.0
0.5	0.0	0.010977	-0.010604
1.0	-0.011894	0.0	0.010445
1.5	0.011622	-0.010977	0.0
2.0	0.0	0.010905	-0.010445
2.5	-0.011622	0.0	0.010197
3.0	0.011317	-0.010905	0.0
3.25	0.0	0.010869	-0.010197
3.5	-0.011317	0.0	0.0097552
4.0	0.011252	-0.010869	0.0
4.5	0.0	0.010832	-0.0097552
5.0	-0.011252	0.0	0.0092798
6.0	0.011185	-0.010832	0.0
7.5	0.0	0.010757	-0.0092798
10.0	-0.011185	0.0	0.0087703
12.5	0.011117	-0.010757	0.0
15.0	0.0	0.010681	-0.0087703
</tableData>
                  <tableData breakPoint="2.77E7">
 	-5.0	0.0	5.0
-7.5	-3.6102E-6	3.0522E-6	0.0
-5.0	0.0	-2.9925E-6	2.6634E-6
-2.5	3.6102E-6	0.0	-2.5923E-6
0.0	-3.5708E-6	2.9925E-6	0.0
0.5	0.0	-2.9307E-6	2.5923E-6
1.0	3.5708E-6	0.0	-2.4457E-6
1.5	-3.4349E-6	2.9307E-6	0.0
2.0	0.0	-2.8667E-6	2.4457E-6
2.5	3.4349E-6	0.0	-2.2169E-6
3.0	-3.2166E-6	2.8667E-6	0.0
3.25	0.0	-2.834E-6	2.2169E-6
3.5	3.2166E-6	0.0	-1.82E-6
4.0	-3.1643E-6	2.834E-6	0.0
4.5	0.0	-2.8008E-6	1.82E-6
5.0	3.1643E-6	0.0	-1.4173E-6
6.0	-3.1095E-6	2.8008E-6	0.0
7.5	0.0	-2.733E-6	1.4173E-6
10.0	3.1095E-6	0.0	-1.0244E-6
12.5	-3.0522E-6	2.733E-6	0.0
15.0	0.0	-2.6634E-6	1.0244E-6
</tableData>
                  <tableData breakPoint="3.0E7">
 	-5.0	0.0	5.0
-7.5	-0.012138	0.011123	0.0
-5.0	0.0	-0.011054	0.010687
-2.5	0.012138	0.0	-0.010609
0.0	-0.011901	0.011054	0.0
0.5	0.0	-0.010983	0.010609
1.0	0.011901	0.0	-0.01045
1.5	-0.011629	0.010983	0.0
2.0	0.0	-0.010911	0.01045
2.5	0.011629	0.0	-0.010201
3.0	-0.011323	0.010911	0.0
3.25	0.0	-0.010875	0.010201
3.5	0.011323	0.0	-0.0097589
4.0	-0.011258	0.010875	0.0
4.5	0.0	-0.010838	0.0097589
5.0	0.011258	0.0	-0.0092826
6.0	-0.011191	0.010838	0.0
7.5	0.0	-0.010763	0.0092826
10.0	0.011191	0.0	-0.0087723
12.5	-0.011123	0.010763	0.0
15.0	0.0	-0.010687	0.0087723
</tableData>
               </table>
            </product>
         </function>
         <function name="aero/function/rudder_axial_coeff_basic_Mach_deflection_1">
            <product>
               <interpolate1d>
                  <p>velocities/mach</p>
                  <v>0.2000</v>
                  <p>aero/function/rudder_axial_coeff_basic_M0_deflection_1</p>
                  <p>velocities/mach</p>
                  <v>0.7800</v>
                  <p>aero/function/rudder_axial_coeff_basic_M1_deflection_1</p>
               </interpolate1d>
            </product>
         </function>
         <function name="aero/function/rudder_axial_coeff_basic_M0_deflection_1">
            <product>
               <table>
                  <independentVar lookup="row">aero/alpha-deg</independentVar>
                  <independentVar lookup="column">aero/beta-deg</independentVar>
                  <independentVar lookup="table">aero/Re</independentVar>
                  <tableData breakPoint="1.0E7">
 	-5.0	0.0	5.0
-7.5	0.012131	-0.011117	0.0
-5.0	0.0	0.011048	-0.010681
-2.5	-0.012131	0.0	0.010604
0.0	0.011894	-0.011048	0.0
0.5	0.0	0.010977	-0.010604
1.0	-0.011894	0.0	0.010445
1.5	0.011622	-0.010977	0.0
2.0	0.0	0.010905	-0.010445
2.5	-0.011622	0.0	0.010197
3.0	0.011317	-0.010905	0.0
3.25	0.0	0.010869	-0.010197
3.5	-0.011317	0.0	0.0097552
4.0	0.011252	-0.010869	0.0
4.5	0.0	0.010832	-0.0097552
5.0	-0.011252	0.0	0.0092798
6.0	0.011185	-0.010832	0.0
7.5	0.0	0.010757	-0.0092798
10.0	-0.011185	0.0	0.0087703
12.5	0.011117	-0.010757	0.0
15.0	0.0	0.010681	-0.0087703
</tableData>
                  <tableData breakPoint="2.77E7">
 	-5.0	0.0	5.0
-7.5	-3.6102E-6	3.0522E-6	0.0
-5.0	0.0	-2.9925E-6	2.6634E-6
-2.5	3.6102E-6	0.0	-2.5923E-6
0.0	-3.5708E-6	2.9925E-6	0.0
0.5	0.0	-2.9307E-6	2.5923E-6
1.0	3.5708E-6	0.0	-2.4457E-6
1.5	-3.4349E-6	2.9307E-6	0.0
2.0	0.0	-2.8667E-6	2.4457E-6
2.5	3.4349E-6	0.0	-2.2169E-6
3.0	-3.2166E-6	2.8667E-6	0.0
3.25	0.0	-2.834E-6	2.2169E-6
3.5	3.2166E-6	0.0	-1.82E-6
4.0	-3.1643E-6	2.834E-6	0.0
4.5	0.0	-2.8008E-6	1.82E-6
5.0	3.1643E-6	0.0	-1.4173E-6
6.0	-3.1095E-6	2.8008E-6	0.0
7.5	0.0	-2.733E-6	1.4173E-6
10.0	3.1095E-6	0.0	-1.0244E-6
12.5	-3.0522E-6	2.733E-6	0.0
15.0	0.0	-2.6634E-6	1.0244E-6
</tableData>
                  <tableData breakPoint="3.0E7">
 	-5.0	0.0	5.0
-7.5	-0.012138	0.011123	0.0
-5.0	0.0	-0.011054	0.010687
-2.5	0.012138	0.0	-0.010609
0.0	-0.011901	0.011054	0.0
0.5	0.0	-0.010983	0.010609
1.0	0.011901	0.0	-0.01045
1.5	-0.011629	0.010983	0.0
2.0	0.0	-0.010911	0.01045
2.5	0.011629	0.0	-0.010201
3.0	-0.011323	0.010911	0.0
3.25	0.0	-0.010875	0.010201
3.5	0.011323	0.0	-0.0097589
4.0	-0.011258	0.010875	0.0
4.5	0.0	-0.010838	0.0097589
5.0	0.011258	0.0	-0.0092826
6.0	-0.011191	0.010838	0.0
7.5	0.0	-0.010763	0.0092826
10.0	0.011191	0.0	-0.0087723
12.5	-0.011123	0.010763	0.0
15.0	0.0	-0.010687	0.0087723
</tableData>
               </table>
            </product>
         </function>
         <function name="aero/function/rudder_axial_coeff_basic_M1_deflection_1">
            <product>
               <table>
                  <independentVar lookup="row">aero/alpha-deg</independentVar>
                  <independentVar lookup="column">aero/beta-deg</independentVar>
                  <independentVar lookup="table">aero/Re</independentVar>
                  <tableData breakPoint="1.0E7">
 	-5.0	0.0	5.0
-7.5	0.012131	-0.011117	0.0
-5.0	0.0	0.011048	-0.010681
-2.5	-0.012131	0.0	0.010604
0.0	0.011894	-0.011048	0.0
0.5	0.0	0.010977	-0.010604
1.0	-0.011894	0.0	0.010445
1.5	0.011622	-0.010977	0.0
2.0	0.0	0.010905	-0.010445
2.5	-0.011622	0.0	0.010197
3.0	0.011317	-0.010905	0.0
3.25	0.0	0.010869	-0.010197
3.5	-0.011317	0.0	0.0097552
4.0	0.011252	-0.010869	0.0
4.5	0.0	0.010832	-0.0097552
5.0	-0.011252	0.0	0.0092798
6.0	0.011185	-0.010832	0.0
7.5	0.0	0.010757	-0.0092798
10.0	-0.011185	0.0	0.0087703
12.5	0.011117	-0.010757	0.0
15.0	0.0	0.010681	-0.0087703
</tableData>
                  <tableData breakPoint="2.77E7">
 	-5.0	0.0	5.0
-7.5	-3.6102E-6	3.0522E-6	0.0
-5.0	0.0	-2.9925E-6	2.6634E-6
-2.5	3.6102E-6	0.0	-2.5923E-6
0.0	-3.5708E-6	2.9925E-6	0.0
0.5	0.0	-2.9307E-6	2.5923E-6
1.0	3.5708E-6	0.0	-2.4457E-6
1.5	-3.4349E-6	2.9307E-6	0.0
2.0	0.0	-2.8667E-6	2.4457E-6
2.5	3.4349E-6	0.0	-2.2169E-6
3.0	-3.2166E-6	2.8667E-6	0.0
3.25	0.0	-2.834E-6	2.2169E-6
3.5	3.2166E-6	0.0	-1.82E-6
4.0	-3.1643E-6	2.834E-6	0.0
4.5	0.0	-2.8008E-6	1.82E-6
5.0	3.1643E-6	0.0	-1.4173E-6
6.0	-3.1095E-6	2.8008E-6	0.0
7.5	0.0	-2.733E-6	1.4173E-6
10.0	3.1095E-6	0.0	-1.0244E-6
12.5	-3.0522E-6	2.733E-6	0.0
15.0	0.0	-2.6634E-6	1.0244E-6
</tableData>
                  <tableData breakPoint="3.0E7">
 	-5.0	0.0	5.0
-7.5	-0.012138	0.011123	0.0
-5.0	0.0	-0.011054	0.010687
-2.5	0.012138	0.0	-0.010609
0.0	-0.011901	0.011054	0.0
0.5	0.0	-0.010983	0.010609
1.0	0.011901	0.0	-0.01045
1.5	-0.011629	0.010983	0.0
2.0	0.0	-0.010911	0.01045
2.5	0.011629	0.0	-0.010201
3.0	-0.011323	0.010911	0.0
3.25	0.0	-0.010875	0.010201
3.5	0.011323	0.0	-0.0097589
4.0	-0.011258	0.010875	0.0
4.5	0.0	-0.010838	0.0097589
5.0	0.011258	0.0	-0.0092826
6.0	-0.011191	0.010838	0.0
7.5	0.0	-0.010763	0.0092826
10.0	0.011191	0.0	-0.0087723
12.5	-0.011123	0.010763	0.0
15.0	0.0	-0.010687	0.0087723
</tableData>
               </table>
            </product>
         </function>
         <function name="aero/function/rudder_axial_coeff_basic_Mach_deflection_2">
            <product>
               <interpolate1d>
                  <p>velocities/mach</p>
                  <v>0.2000</v>
                  <p>aero/function/rudder_axial_coeff_basic_M0_deflection_2</p>
                  <p>velocities/mach</p>
                  <v>0.7800</v>
                  <p>aero/function/rudder_axial_coeff_basic_M1_deflection_2</p>
               </interpolate1d>
            </product>
         </function>
         <function name="aero/function/rudder_axial_coeff_basic_M0_deflection_2">
            <product>
               <table>
                  <independentVar lookup="row">aero/alpha-deg</independentVar>
                  <independentVar lookup="column">aero/beta-deg</independentVar>
                  <independentVar lookup="table">aero/Re</independentVar>
                  <tableData breakPoint="1.0E7">
 	-5.0	0.0	5.0
-7.5	0.012131	-0.011117	0.0
-5.0	0.0	0.011048	-0.010681
-2.5	-0.012131	0.0	0.010604
0.0	0.011894	-0.011048	0.0
0.5	0.0	0.010977	-0.010604
1.0	-0.011894	0.0	0.010445
1.5	0.011622	-0.010977	0.0
2.0	0.0	0.010905	-0.010445
2.5	-0.011622	0.0	0.010197
3.0	0.011317	-0.010905	0.0
3.25	0.0	0.010869	-0.010197
3.5	-0.011317	0.0	0.0097552
4.0	0.011252	-0.010869	0.0
4.5	0.0	0.010832	-0.0097552
5.0	-0.011252	0.0	0.0092798
6.0	0.011185	-0.010832	0.0
7.5	0.0	0.010757	-0.0092798
10.0	-0.011185	0.0	0.0087703
12.5	0.011117	-0.010757	0.0
15.0	0.0	0.010681	-0.0087703
</tableData>
                  <tableData breakPoint="2.77E7">
 	-5.0	0.0	5.0
-7.5	-3.6102E-6	3.0522E-6	0.0
-5.0	0.0	-2.9925E-6	2.6634E-6
-2.5	3.6102E-6	0.0	-2.5923E-6
0.0	-3.5708E-6	2.9925E-6	0.0
0.5	0.0	-2.9307E-6	2.5923E-6
1.0	3.5708E-6	0.0	-2.4457E-6
1.5	-3.4349E-6	2.9307E-6	0.0
2.0	0.0	-2.8667E-6	2.4457E-6
2.5	3.4349E-6	0.0	-2.2169E-6
3.0	-3.2166E-6	2.8667E-6	0.0
3.25	0.0	-2.834E-6	2.2169E-6
3.5	3.2166E-6	0.0	-1.82E-6
4.0	-3.1643E-6	2.834E-6	0.0
4.5	0.0	-2.8008E-6	1.82E-6
5.0	3.1643E-6	0.0	-1.4173E-6
6.0	-3.1095E-6	2.8008E-6	0.0
7.5	0.0	-2.733E-6	1.4173E-6
10.0	3.1095E-6	0.0	-1.0244E-6
12.5	-3.0522E-6	2.733E-6	0.0
15.0	0.0	-2.6634E-6	1.0244E-6
</tableData>
                  <tableData breakPoint="3.0E7">
 	-5.0	0.0	5.0
-7.5	-0.012138	0.011123	0.0
-5.0	0.0	-0.011054	0.010687
-2.5	0.012138	0.0	-0.010609
0.0	-0.011901	0.011054	0.0
0.5	0.0	-0.010983	0.010609
1.0	0.011901	0.0	-0.01045
1.5	-0.011629	0.010983	0.0
2.0	0.0	-0.010911	0.01045
2.5	0.011629	0.0	-0.010201
3.0	-0.011323	0.010911	0.0
3.25	0.0	-0.010875	0.010201
3.5	0.011323	0.0	-0.0097589
4.0	-0.011258	0.010875	0.0
4.5	0.0	-0.010838	0.0097589
5.0	0.011258	0.0	-0.0092826
6.0	-0.011191	0.010838	0.0
7.5	0.0	-0.010763	0.0092826
10.0	0.011191	0.0	-0.0087723
12.5	-0.011123	0.010763	0.0
15.0	0.0	-0.010687	0.0087723
</tableData>
               </table>
            </product>
         </function>
         <function name="aero/function/rudder_axial_coeff_basic_M1_deflection_2">
            <product>
               <table>
                  <independentVar lookup="row">aero/alpha-deg</independentVar>
                  <independentVar lookup="column">aero/beta-deg</independentVar>
                  <independentVar lookup="table">aero/Re</independentVar>
                  <tableData breakPoint="1.0E7">
 	-5.0	0.0	5.0
-7.5	0.012131	-0.011117	0.0
-5.0	0.0	0.011048	-0.010681
-2.5	-0.012131	0.0	0.010604
0.0	0.011894	-0.011048	0.0
0.5	0.0	0.010977	-0.010604
1.0	-0.011894	0.0	0.010445
1.5	0.011622	-0.010977	0.0
2.0	0.0	0.010905	-0.010445
2.5	-0.011622	0.0	0.010197
3.0	0.011317	-0.010905	0.0
3.25	0.0	0.010869	-0.010197
3.5	-0.011317	0.0	0.0097552
4.0	0.011252	-0.010869	0.0
4.5	0.0	0.010832	-0.0097552
5.0	-0.011252	0.0	0.0092798
6.0	0.011185	-0.010832	0.0
7.5	0.0	0.010757	-0.0092798
10.0	-0.011185	0.0	0.0087703
12.5	0.011117	-0.010757	0.0
15.0	0.0	0.010681	-0.0087703
</tableData>
                  <tableData breakPoint="2.77E7">
 	-5.0	0.0	5.0
-7.5	-3.6102E-6	3.0522E-6	0.0
-5.0	0.0	-2.9925E-6	2.6634E-6
-2.5	3.6102E-6	0.0	-2.5923E-6
0.0	-3.5708E-6	2.9925E-6	0.0
0.5	0.0	-2.9307E-6	2.5923E-6
1.0	3.5708E-6	0.0	-2.4457E-6
1.5	-3.4349E-6	2.9307E-6	0.0
2.0	0.0	-2.8667E-6	2.4457E-6
2.5	3.4349E-6	0.0	-2.2169E-6
3.0	-3.2166E-6	2.8667E-6	0.0
3.25	0.0	-2.834E-6	2.2169E-6
3.5	3.2166E-6	0.0	-1.82E-6
4.0	-3.1643E-6	2.834E-6	0.0
4.5	0.0	-2.8008E-6	1.82E-6
5.0	3.1643E-6	0.0	-1.4173E-6
6.0	-3.1095E-6	2.8008E-6	0.0
7.5	0.0	-2.733E-6	1.4173E-6
10.0	3.1095E-6	0.0	-1.0244E-6
12.5	-3.0522E-6	2.733E-6	0.0
15.0	0.0	-2.6634E-6	1.0244E-6
</tableData>
                  <tableData breakPoint="3.0E7">
 	-5.0	0.0	5.0
-7.5	-0.012138	0.011123	0.0
-5.0	0.0	-0.011054	0.010687
-2.5	0.012138	0.0	-0.010609
0.0	-0.011901	0.011054	0.0
0.5	0.0	-0.010983	0.010609
1.0	0.011901	0.0	-0.01045
1.5	-0.011629	0.010983	0.0
2.0	0.0	-0.010911	0.01045
2.5	0.011629	0.0	-0.010201
3.0	-0.011323	0.010911	0.0
3.25	0.0	-0.010875	0.010201
3.5	0.011323	0.0	-0.0097589
4.0	-0.011258	0.010875	0.0
4.5	0.0	-0.010838	0.0097589
5.0	0.011258	0.0	-0.0092826
6.0	-0.011191	0.010838	0.0
7.5	0.0	-0.010763	0.0092826
10.0	0.011191	0.0	-0.0087723
12.5	-0.011123	0.010763	0.0
15.0	0.0	-0.010687	0.0087723
</tableData>
               </table>
            </product>
         </function>
         <function name="aero/function/p-axial_coeff_basic_Mach">
            <description>Lift coefficient due to alpha, beta, Reynolds, Mach</description>
            <product>
               <interpolate1d>
                  <p>velocities/mach</p>
                  <v>0.200</v>
                  <p>aero/function/p-axial_coeff_basic_M0</p>
                  <v>0.780</v>
                  <p>aero/function/p-axial_coeff_basic_M1</p>
               </interpolate1d>
            </product>
         </function>
         <function name="aero/function/p-axial_coeff_basic_M0">
            <description>CL = f(alpha, beta, Re) at M = 0.2</description>
            <product>
               <table>
                  <independentVar lookup="row">aero/alpha-deg</independentVar>
                  <independentVar lookup="column">aero/beta-deg</independentVar>
                  <independentVar lookup="table">aero/Re</independentVar>
                  <tableData breakPoint="1.0E7">
 	-5.0	0.0	5.0
-7.5	-4.0277E-5	-4.0277E-5	-4.0277E-5
-5.0	-2.6913E-5	-2.6913E-5	-2.6913E-5
-2.5	-1.3113E-5	-1.3113E-5	-1.3113E-5
0.0	1.1223E-6	1.1223E-6	1.1223E-6
0.5	4.0217E-6	4.0217E-6	4.0217E-6
1.0	6.9385E-6	6.9385E-6	6.9385E-6
1.5	9.8728E-6	9.8728E-6	9.8728E-6
2.0	1.2824E-5	1.2824E-5	1.2824E-5
2.5	1.5794E-5	1.5794E-5	1.5794E-5
3.0	1.878E-5	1.878E-5	1.878E-5
3.25	2.028E-5	2.028E-5	2.028E-5
3.5	2.1784E-5	2.1784E-5	2.1784E-5
4.0	2.4805E-5	2.4805E-5	2.4805E-5
4.5	2.7844E-5	2.7844E-5	2.7844E-5
5.0	3.0901E-5	3.0901E-5	3.0901E-5
6.0	3.7065E-5	3.7065E-5	3.7065E-5
7.5	4.6443E-5	4.6443E-5	4.6443E-5
10.0	6.2422E-5	6.2422E-5	6.2422E-5
12.5	7.8836E-5	7.8836E-5	7.8836E-5
15.0	9.5686E-5	9.5686E-5	9.5686E-5
</tableData>
                  <tableData breakPoint="2.77E7">
 	-5.0	0.0	5.0
-7.5	-4.0277E-5	-4.0277E-5	-4.0277E-5
-5.0	-2.6913E-5	-2.6913E-5	-2.6913E-5
-2.5	-1.3113E-5	-1.3113E-5	-1.3113E-5
0.0	1.1223E-6	1.1223E-6	1.1223E-6
0.5	4.0217E-6	4.0217E-6	4.0217E-6
1.0	6.9385E-6	6.9385E-6	6.9385E-6
1.5	9.8728E-6	9.8728E-6	9.8728E-6
2.0	1.2824E-5	1.2824E-5	1.2824E-5
2.5	1.5794E-5	1.5794E-5	1.5794E-5
3.0	1.878E-5	1.878E-5	1.878E-5
3.25	2.028E-5	2.028E-5	2.028E-5
3.5	2.1784E-5	2.1784E-5	2.1784E-5
4.0	2.4805E-5	2.4805E-5	2.4805E-5
4.5	2.7844E-5	2.7844E-5	2.7844E-5
5.0	3.0901E-5	3.0901E-5	3.0901E-5
6.0	3.7065E-5	3.7065E-5	3.7065E-5
7.5	4.6443E-5	4.6443E-5	4.6443E-5
10.0	6.2422E-5	6.2422E-5	6.2422E-5
12.5	7.8836E-5	7.8836E-5	7.8836E-5
15.0	9.5686E-5	9.5686E-5	9.5686E-5
</tableData>
                  <tableData breakPoint="3.0E7">
 	-5.0	0.0	5.0
-7.5	-4.0277E-5	-4.0277E-5	-4.0277E-5
-5.0	-2.6913E-5	-2.6913E-5	-2.6913E-5
-2.5	-1.3113E-5	-1.3113E-5	-1.3113E-5
0.0	1.1223E-6	1.1223E-6	1.1223E-6
0.5	4.0217E-6	4.0217E-6	4.0217E-6
1.0	6.9385E-6	6.9385E-6	6.9385E-6
1.5	9.8728E-6	9.8728E-6	9.8728E-6
2.0	1.2824E-5	1.2824E-5	1.2824E-5
2.5	1.5794E-5	1.5794E-5	1.5794E-5
3.0	1.878E-5	1.878E-5	1.878E-5
3.25	2.028E-5	2.028E-5	2.028E-5
3.5	2.1784E-5	2.1784E-5	2.1784E-5
4.0	2.4805E-5	2.4805E-5	2.4805E-5
4.5	2.7844E-5	2.7844E-5	2.7844E-5
5.0	3.0901E-5	3.0901E-5	3.0901E-5
6.0	3.7065E-5	3.7065E-5	3.7065E-5
7.5	4.6443E-5	4.6443E-5	4.6443E-5
10.0	6.2422E-5	6.2422E-5	6.2422E-5
12.5	7.8836E-5	7.8836E-5	7.8836E-5
15.0	9.5686E-5	9.5686E-5	9.5686E-5
</tableData>
               </table>
            </product>
         </function>
         <function name="aero/function/p-axial_coeff_basic_M1">
            <description>CL = f(alpha, beta, Re) at M = 0.78</description>
            <product>
               <table>
                  <independentVar lookup="row">aero/alpha-deg</independentVar>
                  <independentVar lookup="column">aero/beta-deg</independentVar>
                  <independentVar lookup="table">aero/Re</independentVar>
                  <tableData breakPoint="1.0E7">
 	-5.0	0.0	5.0
-7.5	-4.0277E-5	-4.0277E-5	-4.0277E-5
-5.0	-2.6913E-5	-2.6913E-5	-2.6913E-5
-2.5	-1.3113E-5	-1.3113E-5	-1.3113E-5
0.0	1.1223E-6	1.1223E-6	1.1223E-6
0.5	4.0217E-6	4.0217E-6	4.0217E-6
1.0	6.9385E-6	6.9385E-6	6.9385E-6
1.5	9.8728E-6	9.8728E-6	9.8728E-6
2.0	1.2824E-5	1.2824E-5	1.2824E-5
2.5	1.5794E-5	1.5794E-5	1.5794E-5
3.0	1.878E-5	1.878E-5	1.878E-5
3.25	2.028E-5	2.028E-5	2.028E-5
3.5	2.1784E-5	2.1784E-5	2.1784E-5
4.0	2.4805E-5	2.4805E-5	2.4805E-5
4.5	2.7844E-5	2.7844E-5	2.7844E-5
5.0	3.0901E-5	3.0901E-5	3.0901E-5
6.0	3.7065E-5	3.7065E-5	3.7065E-5
7.5	4.6443E-5	4.6443E-5	4.6443E-5
10.0	6.2422E-5	6.2422E-5	6.2422E-5
12.5	7.8836E-5	7.8836E-5	7.8836E-5
15.0	9.5686E-5	9.5686E-5	9.5686E-5
</tableData>
                  <tableData breakPoint="2.77E7">
 	-5.0	0.0	5.0
-7.5	-4.0277E-5	-4.0277E-5	-4.0277E-5
-5.0	-2.6913E-5	-2.6913E-5	-2.6913E-5
-2.5	-1.3113E-5	-1.3113E-5	-1.3113E-5
0.0	1.1223E-6	1.1223E-6	1.1223E-6
0.5	4.0217E-6	4.0217E-6	4.0217E-6
1.0	6.9385E-6	6.9385E-6	6.9385E-6
1.5	9.8728E-6	9.8728E-6	9.8728E-6
2.0	1.2824E-5	1.2824E-5	1.2824E-5
2.5	1.5794E-5	1.5794E-5	1.5794E-5
3.0	1.878E-5	1.878E-5	1.878E-5
3.25	2.028E-5	2.028E-5	2.028E-5
3.5	2.1784E-5	2.1784E-5	2.1784E-5
4.0	2.4805E-5	2.4805E-5	2.4805E-5
4.5	2.7844E-5	2.7844E-5	2.7844E-5
5.0	3.0901E-5	3.0901E-5	3.0901E-5
6.0	3.7065E-5	3.7065E-5	3.7065E-5
7.5	4.6443E-5	4.6443E-5	4.6443E-5
10.0	6.2422E-5	6.2422E-5	6.2422E-5
12.5	7.8836E-5	7.8836E-5	7.8836E-5
15.0	9.5686E-5	9.5686E-5	9.5686E-5
</tableData>
                  <tableData breakPoint="3.0E7">
 	-5.0	0.0	5.0
-7.5	-4.0277E-5	-4.0277E-5	-4.0277E-5
-5.0	-2.6913E-5	-2.6913E-5	-2.6913E-5
-2.5	-1.3113E-5	-1.3113E-5	-1.3113E-5
0.0	1.1223E-6	1.1223E-6	1.1223E-6
0.5	4.0217E-6	4.0217E-6	4.0217E-6
1.0	6.9385E-6	6.9385E-6	6.9385E-6
1.5	9.8728E-6	9.8728E-6	9.8728E-6
2.0	1.2824E-5	1.2824E-5	1.2824E-5
2.5	1.5794E-5	1.5794E-5	1.5794E-5
3.0	1.878E-5	1.878E-5	1.878E-5
3.25	2.028E-5	2.028E-5	2.028E-5
3.5	2.1784E-5	2.1784E-5	2.1784E-5
4.0	2.4805E-5	2.4805E-5	2.4805E-5
4.5	2.7844E-5	2.7844E-5	2.7844E-5
5.0	3.0901E-5	3.0901E-5	3.0901E-5
6.0	3.7065E-5	3.7065E-5	3.7065E-5
7.5	4.6443E-5	4.6443E-5	4.6443E-5
10.0	6.2422E-5	6.2422E-5	6.2422E-5
12.5	7.8836E-5	7.8836E-5	7.8836E-5
15.0	9.5686E-5	9.5686E-5	9.5686E-5
</tableData>
               </table>
            </product>
         </function>
         <function name="aero/function/q-axial_coeff_basic_Mach">
            <description>Lift coefficient due to alpha, beta, Reynolds, Mach</description>
            <product>
               <interpolate1d>
                  <p>velocities/mach</p>
                  <v>0.200</v>
                  <p>aero/function/q-axial_coeff_basic_M0</p>
                  <v>0.780</v>
                  <p>aero/function/q-axial_coeff_basic_M1</p>
               </interpolate1d>
            </product>
         </function>
         <function name="aero/function/q-axial_coeff_basic_M0">
            <description>CL = f(alpha, beta, Re) at M = 0.2</description>
            <product>
               <table>
                  <independentVar lookup="row">aero/alpha-deg</independentVar>
                  <independentVar lookup="column">aero/beta-deg</independentVar>
                  <independentVar lookup="table">aero/Re</independentVar>
                  <tableData breakPoint="1.0E7">
 	-5.0	0.0	5.0
-7.5	-2.6581	-2.6683	-2.6582
-5.0	-1.6359	-1.6422	-1.636
-2.5	-0.59302	-0.59535	-0.59314
0.0	0.46732	0.46905	0.46721
0.5	0.68118	0.68373	0.68107
1.0	0.89557	0.89894	0.89546
1.5	1.1105	1.1146	1.1103
2.0	1.3258	1.3308	1.3257
2.5	1.5416	1.5475	1.5415
3.0	1.7579	1.7645	1.7577
3.25	1.8661	1.8732	1.866
3.5	1.9745	1.9819	1.9743
4.0	2.1914	2.1997	2.1913
4.5	2.4087	2.4178	2.4086
5.0	2.6263	2.6362	2.6261
6.0	3.0622	3.0738	3.062
7.5	3.7174	3.7316	3.7173
10.0	4.8112	4.8295	4.8111
12.5	5.9036	5.9261	5.9035
15.0	6.9907	7.0173	6.9906
</tableData>
                  <tableData breakPoint="2.77E7">
 	-5.0	0.0	5.0
-7.5	-2.6581	-2.6683	-2.6582
-5.0	-1.6359	-1.6422	-1.636
-2.5	-0.59302	-0.59535	-0.59314
0.0	0.46732	0.46905	0.46721
0.5	0.68118	0.68373	0.68107
1.0	0.89557	0.89894	0.89546
1.5	1.1105	1.1146	1.1103
2.0	1.3258	1.3308	1.3257
2.5	1.5416	1.5475	1.5415
3.0	1.7579	1.7645	1.7577
3.25	1.8661	1.8732	1.866
3.5	1.9745	1.9819	1.9743
4.0	2.1914	2.1997	2.1913
4.5	2.4087	2.4178	2.4086
5.0	2.6263	2.6362	2.6261
6.0	3.0622	3.0738	3.062
7.5	3.7174	3.7316	3.7173
10.0	4.8112	4.8295	4.8111
12.5	5.9036	5.9261	5.9035
15.0	6.9907	7.0173	6.9906
</tableData>
                  <tableData breakPoint="3.0E7">
 	-5.0	0.0	5.0
-7.5	-2.6581	-2.6683	-2.6582
-5.0	-1.6359	-1.6422	-1.636
-2.5	-0.59302	-0.59535	-0.59314
0.0	0.46732	0.46905	0.46721
0.5	0.68118	0.68373	0.68107
1.0	0.89557	0.89894	0.89546
1.5	1.1105	1.1146	1.1103
2.0	1.3258	1.3308	1.3257
2.5	1.5416	1.5475	1.5415
3.0	1.7579	1.7645	1.7577
3.25	1.8661	1.8732	1.866
3.5	1.9745	1.9819	1.9743
4.0	2.1914	2.1997	2.1913
4.5	2.4087	2.4178	2.4086
5.0	2.6263	2.6362	2.6261
6.0	3.0622	3.0738	3.062
7.5	3.7174	3.7316	3.7173
10.0	4.8112	4.8295	4.8111
12.5	5.9036	5.9261	5.9035
15.0	6.9907	7.0173	6.9906
</tableData>
               </table>
            </product>
         </function>
         <function name="aero/function/q-axial_coeff_basic_M1">
            <description>CL = f(alpha, beta, Re) at M = 0.78</description>
            <product>
               <table>
                  <independentVar lookup="row">aero/alpha-deg</independentVar>
                  <independentVar lookup="column">aero/beta-deg</independentVar>
                  <independentVar lookup="table">aero/Re</independentVar>
                  <tableData breakPoint="1.0E7">
 	-5.0	0.0	5.0
-7.5	-2.6581	-2.6683	-2.6582
-5.0	-1.6359	-1.6422	-1.636
-2.5	-0.59302	-0.59535	-0.59314
0.0	0.46732	0.46905	0.46721
0.5	0.68118	0.68373	0.68107
1.0	0.89557	0.89894	0.89546
1.5	1.1105	1.1146	1.1103
2.0	1.3258	1.3308	1.3257
2.5	1.5416	1.5475	1.5415
3.0	1.7579	1.7645	1.7577
3.25	1.8661	1.8732	1.866
3.5	1.9745	1.9819	1.9743
4.0	2.1914	2.1997	2.1913
4.5	2.4087	2.4178	2.4086
5.0	2.6263	2.6362	2.6261
6.0	3.0622	3.0738	3.062
7.5	3.7174	3.7316	3.7173
10.0	4.8112	4.8295	4.8111
12.5	5.9036	5.9261	5.9035
15.0	6.9907	7.0173	6.9906
</tableData>
                  <tableData breakPoint="2.77E7">
 	-5.0	0.0	5.0
-7.5	-2.6581	-2.6683	-2.6582
-5.0	-1.6359	-1.6422	-1.636
-2.5	-0.59302	-0.59535	-0.59314
0.0	0.46732	0.46905	0.46721
0.5	0.68118	0.68373	0.68107
1.0	0.89557	0.89894	0.89546
1.5	1.1105	1.1146	1.1103
2.0	1.3258	1.3308	1.3257
2.5	1.5416	1.5475	1.5415
3.0	1.7579	1.7645	1.7577
3.25	1.8661	1.8732	1.866
3.5	1.9745	1.9819	1.9743
4.0	2.1914	2.1997	2.1913
4.5	2.4087	2.4178	2.4086
5.0	2.6263	2.6362	2.6261
6.0	3.0622	3.0738	3.062
7.5	3.7174	3.7316	3.7173
10.0	4.8112	4.8295	4.8111
12.5	5.9036	5.9261	5.9035
15.0	6.9907	7.0173	6.9906
</tableData>
                  <tableData breakPoint="3.0E7">
 	-5.0	0.0	5.0
-7.5	-2.6581	-2.6683	-2.6582
0.5	0.68118	0.68373	0.68107
2.5	1.5416	1.5475	1.5415
4.0	2.1914	2.1997	2.1913
7.5	3.7174	3.7316	3.7173
15.0	6.9907	7.0173	6.9906
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</tableData>
               </table>
            </product>
         </function>
         <function name="aero/function/r-axial_coeff_basic_Mach">
            <description>Lift coefficient due to alpha, beta, Reynolds, Mach</description>
            <product>
               <interpolate1d>
                  <p>velocities/mach</p>
                  <v>0.200</v>
                  <p>aero/function/r-axial_coeff_basic_M0</p>
                  <v>0.780</v>
                  <p>aero/function/r-axial_coeff_basic_M1</p>
               </interpolate1d>
            </product>
         </function>
         <function name="aero/function/r-axial_coeff_basic_M0">
            <description>CL = f(alpha, beta, Re) at M = 0.2</description>
            <product>
               <table>
                  <independentVar lookup="row">aero/alpha-deg</independentVar>
                  <independentVar lookup="column">aero/beta-deg</independentVar>
                  <independentVar lookup="table">aero/Re</independentVar>
                  <tableData breakPoint="1.0E7">
 	-5.0	0.0	5.0
-7.5	-0.075701	1.9959E-5	0.075741
0.5	-0.071384	1.8335E-5	0.071421
2.5	-0.070154	1.678E-5	0.070188
4.0	-0.069192	1.536E-5	0.069223
7.5	-0.066815	1.1308E-5	0.066837
15.0	-0.061095	3.885E-8	0.061096
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</tableData>
                  <tableData breakPoint="2.77E7">
 	-5.0	0.0	5.0
-7.5	-0.075701	1.9959E-5	0.075741
0.5	-0.071384	1.8335E-5	0.071421
2.5	-0.070154	1.678E-5	0.070188
4.0	-0.069192	1.536E-5	0.069223
7.5	-0.066815	1.1308E-5	0.066837
15.0	-0.061095	3.885E-8	0.061096
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</tableData>
                  <tableData breakPoint="3.0E7">
 	-5.0	0.0	5.0
-7.5	-0.075701	1.9959E-5	0.075741
0.5	-0.071384	1.8335E-5	0.071421
2.5	-0.070154	1.678E-5	0.070188
4.0	-0.069192	1.536E-5	0.069223
7.5	-0.066815	1.1308E-5	0.066837
15.0	-0.061095	3.885E-8	0.061096
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</tableData>
               </table>
            </product>
         </function>
         <function name="aero/function/r-axial_coeff_basic_M1">
            <description>CL = f(alpha, beta, Re) at M = 0.78</description>
            <product>
               <table>
                  <independentVar lookup="row">aero/alpha-deg</independentVar>
                  <independentVar lookup="column">aero/beta-deg</independentVar>
                  <independentVar lookup="table">aero/Re</independentVar>
                  <tableData breakPoint="1.0E7">
 	-5.0	0.0	5.0
-7.5	-0.075701	1.9959E-5	0.075741
0.5	-0.071384	1.8335E-5	0.071421
2.5	-0.070154	1.678E-5	0.070188
4.0	-0.069192	1.536E-5	0.069223
7.5	-0.066815	1.1308E-5	0.066837
15.0	-0.061095	3.885E-8	0.061096
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</tableData>
                  <tableData breakPoint="2.77E7">
 	-5.0	0.0	5.0
-7.5	-0.075701	1.9959E-5	0.075741
0.5	-0.071384	1.8335E-5	0.071421
2.5	-0.070154	1.678E-5	0.070188
4.0	-0.069192	1.536E-5	0.069223
7.5	-0.066815	1.1308E-5	0.066837
15.0	-0.061095	3.885E-8	0.061096
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</tableData>
                  <tableData breakPoint="3.0E7">
 	-5.0	0.0	5.0
-7.5	-0.075701	1.9959E-5	0.075741
0.5	-0.071384	1.8335E-5	0.071421
2.5	-0.070154	1.678E-5	0.070188
4.0	-0.069192	1.536E-5	0.069223
7.5	-0.066815	1.1308E-5	0.066837
15.0	-0.061095	3.885E-8	0.061096
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</tableData>
               </table>
            </product>
         </function>
      </axis>
      <axis name="Y">
         <function name="aero/function/side_coeff_basic_Mach">
            <description>Lift coefficient due to alpha, beta, Reynolds, Mach</description>
            <product>
               <interpolate1d>
                  <p>velocities/mach</p>
                  <v>0.200</v>
                  <p>aero/function/side_coeff_basic_M0</p>
                  <v>0.780</v>
                  <p>aero/function/side_coeff_basic_M1</p>
               </interpolate1d>
            </product>
         </function>
         <function name="aero/function/side_coeff_basic_M0">
            <description>CL = f(alpha, beta, Re) at M = 0.2</description>
            <product>
               <table>
                  <independentVar lookup="row">aero/alpha-deg</independentVar>
                  <independentVar lookup="column">aero/beta-deg</independentVar>
                  <independentVar lookup="table">aero/Re</independentVar>
                  <tableData breakPoint="1.0E7">
 	-5.0	0.0	5.0
-7.5	6.944E-4	-5.183E-6	-7.0477E-4
0.5	7.0009E-4	5.0802E-7	-6.9908E-4
2.5	7.0159E-4	2.0087E-6	-6.9758E-4
4.0	7.0274E-4	3.1547E-6	-6.9643E-4
7.5	7.0548E-4	5.8968E-6	-6.9369E-4
15.0	7.1168E-4	1.2094E-5	-6.8749E-4
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</tableData>
                  <tableData breakPoint="2.77E7">
 	-5.0	0.0	5.0
-7.5	5.8814E-4	-5.183E-6	-5.9851E-4
0.5	5.9383E-4	5.0802E-7	-5.9282E-4
2.5	5.9533E-4	2.0087E-6	-5.9132E-4
4.0	5.9648E-4	3.1547E-6	-5.9017E-4
7.5	5.9922E-4	5.8968E-6	-5.8743E-4
15.0	6.0542E-4	1.2094E-5	-5.8123E-4
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</tableData>
                  <tableData breakPoint="3.0E7">
 	-5.0	0.0	5.0
-7.5	5.8081E-4	-5.183E-6	-5.9118E-4
0.5	5.8651E-4	5.0802E-7	-5.8549E-4
2.5	5.8801E-4	2.0087E-6	-5.8399E-4
4.0	5.8915E-4	3.1547E-6	-5.8284E-4
7.5	5.9189E-4	5.8968E-6	-5.801E-4
15.0	5.9809E-4	1.2094E-5	-5.739E-4
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</tableData>
               </table>
            </product>
         </function>
         <function name="aero/function/side_coeff_basic_M1">
            <description>CL = f(alpha, beta, Re) at M = 0.78</description>
            <product>
               <table>
                  <independentVar lookup="row">aero/alpha-deg</independentVar>
                  <independentVar lookup="column">aero/beta-deg</independentVar>
                  <independentVar lookup="table">aero/Re</independentVar>
                  <tableData breakPoint="1.0E7">
 	-5.0	0.0	5.0
-7.5	8.4501E-4	-5.183E-6	-8.5537E-4
0.5	8.507E-4	5.0802E-7	-8.4968E-4
2.5	8.522E-4	2.0087E-6	-8.4818E-4
4.0	8.5335E-4	3.1547E-6	-8.4704E-4
7.5	8.5609E-4	5.8968E-6	-8.443E-4
15.0	8.6229E-4	1.2094E-5	-8.381E-4
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</tableData>
                  <tableData breakPoint="2.77E7">
 	-5.0	0.0	5.0
-7.5	7.1569E-4	-5.183E-6	-7.2606E-4
0.5	7.2139E-4	5.0802E-7	-7.2037E-4
2.5	7.2289E-4	2.0087E-6	-7.1887E-4
4.0	7.2403E-4	3.1547E-6	-7.1772E-4
7.5	7.2677E-4	5.8968E-6	-7.1498E-4
15.0	7.3297E-4	1.2094E-5	-7.0878E-4
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</tableData>
                  <tableData breakPoint="3.0E7">
 	-5.0	0.0	5.0
-7.5	7.0678E-4	-5.183E-6	-7.1715E-4
0.5	7.1247E-4	5.0802E-7	-7.1145E-4
2.5	7.1397E-4	2.0087E-6	-7.0995E-4
4.0	7.1512E-4	3.1547E-6	-7.0881E-4
7.5	7.1786E-4	5.8968E-6	-7.0607E-4
15.0	7.2406E-4	1.2094E-5	-6.9987E-4
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</tableData>
               </table>
            </product>
         </function>
         <function name="aero/function/aileron_side_coeff_basic_Mach_deflection">
            <product>
               <interpolate1d>
                  <p>fcs/left-aileron-pos-deg</p>
                  <v>0.000000</v>
                  <p>aero/function/aileron_side_coeff_basic_Mach_deflection_0</p>
                  <v>0.5000</v>
                  <p>aero/function/aileron_side_coeff_basic_Mach_deflection_1</p>
                  <v>1.0000</v>
                  <p>aero/function/aileron_side_coeff_basic_Mach_deflection_2</p>
               </interpolate1d>
            </product>
         </function>
         <function name="aero/function/aileron_side_coeff_basic_Mach_deflection_0">
            <product>
               <interpolate1d>
                  <p>velocities/mach</p>
                  <v>0.2000</v>
                  <p>aero/function/aileron_side_coeff_basic_M0_deflection_0</p>
                  <p>velocities/mach</p>
                  <v>0.7800</v>
                  <p>aero/function/aileron_side_coeff_basic_M1_deflection_0</p>
               </interpolate1d>
            </product>
         </function>
         <function name="aero/function/aileron_side_coeff_basic_M0_deflection_0">
            <product>
               <table>
                  <independentVar lookup="row">aero/alpha-deg</independentVar>
                  <independentVar lookup="column">aero/beta-deg</independentVar>
                  <independentVar lookup="table">aero/Re</independentVar>
                  <tableData breakPoint="1.0E7">
 	-5.0	0.0	5.0
-7.5	0.0	0.0	0.0
0.5	0.0	0.0	0.0
2.5	0.0	0.0	0.0
4.0	0.0	0.0	0.0
7.5	0.0	0.0	0.0
15.0	0.0	0.0	0.0
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</tableData>
                  <tableData breakPoint="2.77E7">
 	-5.0	0.0	5.0
-7.5	0.0	0.0	0.0
0.5	0.0	0.0	0.0
2.5	0.0	0.0	0.0
4.0	0.0	0.0	0.0
7.5	0.0	0.0	0.0
15.0	0.0	0.0	0.0
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</tableData>
                  <tableData breakPoint="3.0E7">
 	-5.0	0.0	5.0
-7.5	0.0	0.0	0.0
0.5	0.0	0.0	0.0
2.5	0.0	0.0	0.0
4.0	0.0	0.0	0.0
7.5	0.0	0.0	0.0
15.0	0.0	0.0	0.0
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</tableData>
               </table>
            </product>
         </function>
         <function name="aero/function/aileron_side_coeff_basic_M1_deflection_0">
            <product>
               <table>
                  <independentVar lookup="row">aero/alpha-deg</independentVar>
                  <independentVar lookup="column">aero/beta-deg</independentVar>
                  <independentVar lookup="table">aero/Re</independentVar>
                  <tableData breakPoint="1.0E7">
 	-5.0	0.0	5.0
-7.5	0.0	0.0	0.0
0.5	0.0	0.0	0.0
2.5	0.0	0.0	0.0
4.0	0.0	0.0	0.0
7.5	0.0	0.0	0.0
15.0	0.0	0.0	0.0
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</tableData>
                  <tableData breakPoint="2.77E7">
 	-5.0	0.0	5.0
-7.5	0.0	0.0	0.0
0.5	0.0	0.0	0.0
2.5	0.0	0.0	0.0
4.0	0.0	0.0	0.0
7.5	0.0	0.0	0.0
15.0	0.0	0.0	0.0
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</tableData>
                  <tableData breakPoint="3.0E7">
 	-5.0	0.0	5.0
-7.5	0.0	0.0	0.0
0.5	0.0	0.0	0.0
2.5	0.0	0.0	0.0
4.0	0.0	0.0	0.0
7.5	0.0	0.0	0.0
15.0	0.0	0.0	0.0
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</tableData>
               </table>
            </product>
         </function>
         <function name="aero/function/aileron_side_coeff_basic_Mach_deflection_1">
            <product>
               <interpolate1d>
                  <p>velocities/mach</p>
                  <v>0.2000</v>
                  <p>aero/function/aileron_side_coeff_basic_M0_deflection_1</p>
                  <p>velocities/mach</p>
                  <v>0.7800</v>
                  <p>aero/function/aileron_side_coeff_basic_M1_deflection_1</p>
               </interpolate1d>
            </product>
         </function>
         <function name="aero/function/aileron_side_coeff_basic_M0_deflection_1">
            <product>
               <table>
                  <independentVar lookup="row">aero/alpha-deg</independentVar>
                  <independentVar lookup="column">aero/beta-deg</independentVar>
                  <independentVar lookup="table">aero/Re</independentVar>
                  <tableData breakPoint="1.0E7">
 	-5.0	0.0	5.0
-7.5	0.0	0.0	0.0
0.5	0.0	0.0	0.0
2.5	0.0	0.0	0.0
4.0	0.0	0.0	0.0
7.5	0.0	0.0	0.0
15.0	0.0	0.0	0.0
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</tableData>
                  <tableData breakPoint="2.77E7">
 	-5.0	0.0	5.0
-7.5	0.0	0.0	0.0
0.5	0.0	0.0	0.0
2.5	0.0	0.0	0.0
4.0	0.0	0.0	0.0
7.5	0.0	0.0	0.0
15.0	0.0	0.0	0.0
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</tableData>
                  <tableData breakPoint="3.0E7">
 	-5.0	0.0	5.0
-7.5	0.0	0.0	0.0
0.5	0.0	0.0	0.0
2.5	0.0	0.0	0.0
4.0	0.0	0.0	0.0
7.5	0.0	0.0	0.0
15.0	0.0	0.0	0.0
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</tableData>
               </table>
            </product>
         </function>
         <function name="aero/function/aileron_side_coeff_basic_M1_deflection_1">
            <product>
               <table>
                  <independentVar lookup="row">aero/alpha-deg</independentVar>
                  <independentVar lookup="column">aero/beta-deg</independentVar>
                  <independentVar lookup="table">aero/Re</independentVar>
                  <tableData breakPoint="1.0E7">
 	-5.0	0.0	5.0
-7.5	0.0	0.0	0.0
0.5	0.0	0.0	0.0
2.5	0.0	0.0	0.0
4.0	0.0	0.0	0.0
7.5	0.0	0.0	0.0
15.0	0.0	0.0	0.0
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</tableData>
                  <tableData breakPoint="2.77E7">
 	-5.0	0.0	5.0
-7.5	0.0	0.0	0.0
0.5	0.0	0.0	0.0
2.5	0.0	0.0	0.0
4.0	0.0	0.0	0.0
7.5	0.0	0.0	0.0
15.0	0.0	0.0	0.0
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</tableData>
                  <tableData breakPoint="3.0E7">
 	-5.0	0.0	5.0
-7.5	0.0	0.0	0.0
0.5	0.0	0.0	0.0
2.5	0.0	0.0	0.0
4.0	0.0	0.0	0.0
7.5	0.0	0.0	0.0
15.0	0.0	0.0	0.0
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</tableData>
               </table>
            </product>
         </function>
         <function name="aero/function/aileron_side_coeff_basic_Mach_deflection_2">
            <product>
               <interpolate1d>
                  <p>velocities/mach</p>
                  <v>0.2000</v>
                  <p>aero/function/aileron_side_coeff_basic_M0_deflection_2</p>
                  <p>velocities/mach</p>
                  <v>0.7800</v>
                  <p>aero/function/aileron_side_coeff_basic_M1_deflection_2</p>
               </interpolate1d>
            </product>
         </function>
         <function name="aero/function/aileron_side_coeff_basic_M0_deflection_2">
            <product>
               <table>
                  <independentVar lookup="row">aero/alpha-deg</independentVar>
                  <independentVar lookup="column">aero/beta-deg</independentVar>
                  <independentVar lookup="table">aero/Re</independentVar>
                  <tableData breakPoint="1.0E7">
 	-5.0	0.0	5.0
-7.5	0.0	0.0	0.0
0.5	0.0	0.0	0.0
2.5	0.0	0.0	0.0
4.0	0.0	0.0	0.0
7.5	0.0	0.0	0.0
15.0	0.0	0.0	0.0
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</tableData>
                  <tableData breakPoint="2.77E7">
 	-5.0	0.0	5.0
-7.5	0.0	0.0	0.0
0.5	0.0	0.0	0.0
2.5	0.0	0.0	0.0
4.0	0.0	0.0	0.0
7.5	0.0	0.0	0.0
15.0	0.0	0.0	0.0
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</tableData>
                  <tableData breakPoint="3.0E7">
 	-5.0	0.0	5.0
-7.5	0.0	0.0	0.0
0.5	0.0	0.0	0.0
2.5	0.0	0.0	0.0
4.0	0.0	0.0	0.0
7.5	0.0	0.0	0.0
15.0	0.0	0.0	0.0
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</tableData>
               </table>
            </product>
         </function>
         <function name="aero/function/aileron_side_coeff_basic_M1_deflection_2">
            <product>
               <table>
                  <independentVar lookup="row">aero/alpha-deg</independentVar>
                  <independentVar lookup="column">aero/beta-deg</independentVar>
                  <independentVar lookup="table">aero/Re</independentVar>
                  <tableData breakPoint="1.0E7">
 	-5.0	0.0	5.0
-7.5	0.0	0.0	0.0
0.5	0.0	0.0	0.0
2.5	0.0	0.0	0.0
4.0	0.0	0.0	0.0
7.5	0.0	0.0	0.0
15.0	0.0	0.0	0.0
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</tableData>
                  <tableData breakPoint="2.77E7">
 	-5.0	0.0	5.0
-7.5	0.0	0.0	0.0
0.5	0.0	0.0	0.0
2.5	0.0	0.0	0.0
4.0	0.0	0.0	0.0
7.5	0.0	0.0	0.0
15.0	0.0	0.0	0.0
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</tableData>
                  <tableData breakPoint="3.0E7">
 	-5.0	0.0	5.0
-7.5	0.0	0.0	0.0
0.5	0.0	0.0	0.0
2.5	0.0	0.0	0.0
4.0	0.0	0.0	0.0
7.5	0.0	0.0	0.0
15.0	0.0	0.0	0.0
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</tableData>
               </table>
            </product>
         </function>
         <function name="aero/function/elevator_side_coeff_basic_Mach_deflection">
            <product>
               <interpolate1d>
                  <p>fcs/elevator-pos-deg</p>
                  <v>0.000000</v>
                  <p>aero/function/elevator_side_coeff_basic_Mach_deflection_0</p>
                  <v>0.5000</v>
                  <p>aero/function/elevator_side_coeff_basic_Mach_deflection_1</p>
                  <v>1.0000</v>
                  <p>aero/function/elevator_side_coeff_basic_Mach_deflection_2</p>
               </interpolate1d>
            </product>
         </function>
         <function name="aero/function/elevator_side_coeff_basic_Mach_deflection_0">
            <product>
               <interpolate1d>
                  <p>velocities/mach</p>
                  <v>0.2000</v>
                  <p>aero/function/elevator_side_coeff_basic_M0_deflection_0</p>
                  <p>velocities/mach</p>
                  <v>0.7800</v>
                  <p>aero/function/elevator_side_coeff_basic_M1_deflection_0</p>
               </interpolate1d>
            </product>
         </function>
         <function name="aero/function/elevator_side_coeff_basic_M0_deflection_0">
            <product>
               <table>
                  <independentVar lookup="row">aero/alpha-deg</independentVar>
                  <independentVar lookup="column">aero/beta-deg</independentVar>
                  <independentVar lookup="table">aero/Re</independentVar>
                  <tableData breakPoint="1.0E7">
 	-5.0	0.0	5.0
-7.5	0.0	0.0	0.0
0.5	0.0	0.0	0.0
2.5	0.0	0.0	0.0
4.0	0.0	0.0	0.0
7.5	0.0	0.0	0.0
15.0	0.0	0.0	0.0
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</tableData>
                  <tableData breakPoint="2.77E7">
 	-5.0	0.0	5.0
-7.5	0.0	0.0	0.0
0.5	0.0	0.0	0.0
2.5	0.0	0.0	0.0
4.0	0.0	0.0	0.0
7.5	0.0	0.0	0.0
15.0	0.0	0.0	0.0
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</tableData>
                  <tableData breakPoint="3.0E7">
 	-5.0	0.0	5.0
-7.5	0.0	0.0	0.0
0.5	0.0	0.0	0.0
2.5	0.0	0.0	0.0
4.0	0.0	0.0	0.0
7.5	0.0	0.0	0.0
15.0	0.0	0.0	0.0
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</tableData>
               </table>
            </product>
         </function>
         <function name="aero/function/elevator_side_coeff_basic_M1_deflection_0">
            <product>
               <table>
                  <independentVar lookup="row">aero/alpha-deg</independentVar>
                  <independentVar lookup="column">aero/beta-deg</independentVar>
                  <independentVar lookup="table">aero/Re</independentVar>
                  <tableData breakPoint="1.0E7">
 	-5.0	0.0	5.0
-7.5	0.0	0.0	0.0
0.5	0.0	0.0	0.0
2.5	0.0	0.0	0.0
4.0	0.0	0.0	0.0
7.5	0.0	0.0	0.0
15.0	0.0	0.0	0.0
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</tableData>
                  <tableData breakPoint="2.77E7">
 	-5.0	0.0	5.0
-7.5	0.0	0.0	0.0
0.5	0.0	0.0	0.0
2.5	0.0	0.0	0.0
4.0	0.0	0.0	0.0
7.5	0.0	0.0	0.0
15.0	0.0	0.0	0.0
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</tableData>
                  <tableData breakPoint="3.0E7">
 	-5.0	0.0	5.0
-7.5	0.0	0.0	0.0
0.5	0.0	0.0	0.0
2.5	0.0	0.0	0.0
4.0	0.0	0.0	0.0
7.5	0.0	0.0	0.0
15.0	0.0	0.0	0.0
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</tableData>
               </table>
            </product>
         </function>
         <function name="aero/function/elevator_side_coeff_basic_Mach_deflection_1">
            <product>
               <interpolate1d>
                  <p>velocities/mach</p>
                  <v>0.2000</v>
                  <p>aero/function/elevator_side_coeff_basic_M0_deflection_1</p>
                  <p>velocities/mach</p>
                  <v>0.7800</v>
                  <p>aero/function/elevator_side_coeff_basic_M1_deflection_1</p>
               </interpolate1d>
            </product>
         </function>
         <function name="aero/function/elevator_side_coeff_basic_M0_deflection_1">
            <product>
               <table>
                  <independentVar lookup="row">aero/alpha-deg</independentVar>
                  <independentVar lookup="column">aero/beta-deg</independentVar>
                  <independentVar lookup="table">aero/Re</independentVar>
                  <tableData breakPoint="1.0E7">
 	-5.0	0.0	5.0
-7.5	0.0	0.0	0.0
0.5	0.0	0.0	0.0
2.5	0.0	0.0	0.0
4.0	0.0	0.0	0.0
7.5	0.0	0.0	0.0
15.0	0.0	0.0	0.0
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</tableData>
                  <tableData breakPoint="2.77E7">
 	-5.0	0.0	5.0
-7.5	0.0	0.0	0.0
0.5	0.0	0.0	0.0
2.5	0.0	0.0	0.0
4.0	0.0	0.0	0.0
7.5	0.0	0.0	0.0
15.0	0.0	0.0	0.0
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</tableData>
                  <tableData breakPoint="3.0E7">
 	-5.0	0.0	5.0
-7.5	0.0	0.0	0.0
0.5	0.0	0.0	0.0
2.5	0.0	0.0	0.0
4.0	0.0	0.0	0.0
7.5	0.0	0.0	0.0
15.0	0.0	0.0	0.0
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</tableData>
               </table>
            </product>
         </function>
         <function name="aero/function/elevator_side_coeff_basic_M1_deflection_1">
            <product>
               <table>
                  <independentVar lookup="row">aero/alpha-deg</independentVar>
                  <independentVar lookup="column">aero/beta-deg</independentVar>
                  <independentVar lookup="table">aero/Re</independentVar>
                  <tableData breakPoint="1.0E7">
 	-5.0	0.0	5.0
-7.5	0.0	0.0	0.0
0.5	0.0	0.0	0.0
2.5	0.0	0.0	0.0
4.0	0.0	0.0	0.0
7.5	0.0	0.0	0.0
15.0	0.0	0.0	0.0
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</tableData>
                  <tableData breakPoint="2.77E7">
 	-5.0	0.0	5.0
-7.5	0.0	0.0	0.0
0.5	0.0	0.0	0.0
2.5	0.0	0.0	0.0
4.0	0.0	0.0	0.0
7.5	0.0	0.0	0.0
15.0	0.0	0.0	0.0
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</tableData>
                  <tableData breakPoint="3.0E7">
 	-5.0	0.0	5.0
-7.5	0.0	0.0	0.0
0.5	0.0	0.0	0.0
2.5	0.0	0.0	0.0
4.0	0.0	0.0	0.0
7.5	0.0	0.0	0.0
15.0	0.0	0.0	0.0
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</tableData>
               </table>
            </product>
         </function>
         <function name="aero/function/elevator_side_coeff_basic_Mach_deflection_2">
            <product>
               <interpolate1d>
                  <p>velocities/mach</p>
                  <v>0.2000</v>
                  <p>aero/function/elevator_side_coeff_basic_M0_deflection_2</p>
                  <p>velocities/mach</p>
                  <v>0.7800</v>
                  <p>aero/function/elevator_side_coeff_basic_M1_deflection_2</p>
               </interpolate1d>
            </product>
         </function>
         <function name="aero/function/elevator_side_coeff_basic_M0_deflection_2">
            <product>
               <table>
                  <independentVar lookup="row">aero/alpha-deg</independentVar>
                  <independentVar lookup="column">aero/beta-deg</independentVar>
                  <independentVar lookup="table">aero/Re</independentVar>
                  <tableData breakPoint="1.0E7">
 	-5.0	0.0	5.0
-7.5	0.0	0.0	0.0
0.5	0.0	0.0	0.0
2.5	0.0	0.0	0.0
4.0	0.0	0.0	0.0
7.5	0.0	0.0	0.0
15.0	0.0	0.0	0.0
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</tableData>
                  <tableData breakPoint="2.77E7">
 	-5.0	0.0	5.0
-7.5	0.0	0.0	0.0
0.5	0.0	0.0	0.0
2.5	0.0	0.0	0.0
4.0	0.0	0.0	0.0
7.5	0.0	0.0	0.0
15.0	0.0	0.0	0.0
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</tableData>
                  <tableData breakPoint="3.0E7">
 	-5.0	0.0	5.0
-7.5	0.0	0.0	0.0
0.5	0.0	0.0	0.0
2.5	0.0	0.0	0.0
4.0	0.0	0.0	0.0
7.5	0.0	0.0	0.0
15.0	0.0	0.0	0.0
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</tableData>
               </table>
            </product>
         </function>
         <function name="aero/function/elevator_side_coeff_basic_M1_deflection_2">
            <product>
               <table>
                  <independentVar lookup="row">aero/alpha-deg</independentVar>
                  <independentVar lookup="column">aero/beta-deg</independentVar>
                  <independentVar lookup="table">aero/Re</independentVar>
                  <tableData breakPoint="1.0E7">
 	-5.0	0.0	5.0
-7.5	0.0	0.0	0.0
0.5	0.0	0.0	0.0
2.5	0.0	0.0	0.0
4.0	0.0	0.0	0.0
7.5	0.0	0.0	0.0
15.0	0.0	0.0	0.0
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</tableData>
                  <tableData breakPoint="2.77E7">
 	-5.0	0.0	5.0
-7.5	0.0	0.0	0.0
0.5	0.0	0.0	0.0
2.5	0.0	0.0	0.0
4.0	0.0	0.0	0.0
7.5	0.0	0.0	0.0
15.0	0.0	0.0	0.0
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</tableData>
                  <tableData breakPoint="3.0E7">
 	-5.0	0.0	5.0
-7.5	0.0	0.0	0.0
0.5	0.0	0.0	0.0
2.5	0.0	0.0	0.0
4.0	0.0	0.0	0.0
7.5	0.0	0.0	0.0
15.0	0.0	0.0	0.0
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</tableData>
               </table>
            </product>
         </function>
         <function name="aero/function/rudder_side_coeff_basic_Mach_deflection">
            <product>
               <interpolate1d>
                  <p>fcs/rudder-pos-deg</p>
                  <v>0.000000</v>
                  <p>aero/function/rudder_side_coeff_basic_Mach_deflection_0</p>
                  <v>0.5000</v>
                  <p>aero/function/rudder_side_coeff_basic_Mach_deflection_1</p>
                  <v>1.0000</v>
                  <p>aero/function/rudder_side_coeff_basic_Mach_deflection_2</p>
               </interpolate1d>
            </product>
         </function>
         <function name="aero/function/rudder_side_coeff_basic_Mach_deflection_0">
            <product>
               <interpolate1d>
                  <p>velocities/mach</p>
                  <v>0.2000</v>
                  <p>aero/function/rudder_side_coeff_basic_M0_deflection_0</p>
                  <p>velocities/mach</p>
                  <v>0.7800</v>
                  <p>aero/function/rudder_side_coeff_basic_M1_deflection_0</p>
               </interpolate1d>
            </product>
         </function>
         <function name="aero/function/rudder_side_coeff_basic_M0_deflection_0">
            <product>
               <table>
                  <independentVar lookup="row">aero/alpha-deg</independentVar>
                  <independentVar lookup="column">aero/beta-deg</independentVar>
                  <independentVar lookup="table">aero/Re</independentVar>
                  <tableData breakPoint="1.0E7">
 	-5.0	0.0	5.0
-7.5	0.0	0.0	0.0
0.5	0.0	0.0	0.0
2.5	0.0	0.0	0.0
4.0	0.0	0.0	0.0
7.5	0.0	0.0	0.0
15.0	0.0	0.0	0.0
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</tableData>
                  <tableData breakPoint="2.77E7">
 	-5.0	0.0	5.0
-7.5	0.0	0.0	0.0
0.5	0.0	0.0	0.0
2.5	0.0	0.0	0.0
4.0	0.0	0.0	0.0
7.5	0.0	0.0	0.0
15.0	0.0	0.0	0.0
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</tableData>
                  <tableData breakPoint="3.0E7">
 	-5.0	0.0	5.0
-7.5	0.0	0.0	0.0
0.5	0.0	0.0	0.0
2.5	0.0	0.0	0.0
4.0	0.0	0.0	0.0
7.5	0.0	0.0	0.0
15.0	0.0	0.0	0.0
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</tableData>
               </table>
            </product>
         </function>
         <function name="aero/function/rudder_side_coeff_basic_M1_deflection_0">
            <product>
               <table>
                  <independentVar lookup="row">aero/alpha-deg</independentVar>
                  <independentVar lookup="column">aero/beta-deg</independentVar>
                  <independentVar lookup="table">aero/Re</independentVar>
                  <tableData breakPoint="1.0E7">
 	-5.0	0.0	5.0
-7.5	0.0	0.0	0.0
0.5	0.0	0.0	0.0
2.5	0.0	0.0	0.0
4.0	0.0	0.0	0.0
7.5	0.0	0.0	0.0
15.0	0.0	0.0	0.0
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</tableData>
                  <tableData breakPoint="2.77E7">
 	-5.0	0.0	5.0
-7.5	0.0	0.0	0.0
0.5	0.0	0.0	0.0
2.5	0.0	0.0	0.0
4.0	0.0	0.0	0.0
7.5	0.0	0.0	0.0
15.0	0.0	0.0	0.0
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</tableData>
                  <tableData breakPoint="3.0E7">
 	-5.0	0.0	5.0
-7.5	0.0	0.0	0.0
0.5	0.0	0.0	0.0
2.5	0.0	0.0	0.0
4.0	0.0	0.0	0.0
7.5	0.0	0.0	0.0
15.0	0.0	0.0	0.0
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</tableData>
               </table>
            </product>
         </function>
         <function name="aero/function/rudder_side_coeff_basic_Mach_deflection_1">
            <product>
               <interpolate1d>
                  <p>velocities/mach</p>
                  <v>0.2000</v>
                  <p>aero/function/rudder_side_coeff_basic_M0_deflection_1</p>
                  <p>velocities/mach</p>
                  <v>0.7800</v>
                  <p>aero/function/rudder_side_coeff_basic_M1_deflection_1</p>
               </interpolate1d>
            </product>
         </function>
         <function name="aero/function/rudder_side_coeff_basic_M0_deflection_1">
            <product>
               <table>
                  <independentVar lookup="row">aero/alpha-deg</independentVar>
                  <independentVar lookup="column">aero/beta-deg</independentVar>
                  <independentVar lookup="table">aero/Re</independentVar>
                  <tableData breakPoint="1.0E7">
 	-5.0	0.0	5.0
-7.5	0.0	0.0	0.0
0.5	0.0	0.0	0.0
2.5	0.0	0.0	0.0
4.0	0.0	0.0	0.0
7.5	0.0	0.0	0.0
15.0	0.0	0.0	0.0
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</tableData>
                  <tableData breakPoint="2.77E7">
 	-5.0	0.0	5.0
-7.5	0.0	0.0	0.0
0.5	0.0	0.0	0.0
2.5	0.0	0.0	0.0
4.0	0.0	0.0	0.0
7.5	0.0	0.0	0.0
15.0	0.0	0.0	0.0
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</tableData>
                  <tableData breakPoint="3.0E7">
 	-5.0	0.0	5.0
-7.5	0.0	0.0	0.0
0.5	0.0	0.0	0.0
2.5	0.0	0.0	0.0
4.0	0.0	0.0	0.0
7.5	0.0	0.0	0.0
15.0	0.0	0.0	0.0
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</tableData>
               </table>
            </product>
         </function>
         <function name="aero/function/rudder_side_coeff_basic_M1_deflection_1">
            <product>
               <table>
                  <independentVar lookup="row">aero/alpha-deg</independentVar>
                  <independentVar lookup="column">aero/beta-deg</independentVar>
                  <independentVar lookup="table">aero/Re</independentVar>
                  <tableData breakPoint="1.0E7">
 	-5.0	0.0	5.0
-7.5	0.0	0.0	0.0
0.5	0.0	0.0	0.0
2.5	0.0	0.0	0.0
4.0	0.0	0.0	0.0
7.5	0.0	0.0	0.0
15.0	0.0	0.0	0.0
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</tableData>
                  <tableData breakPoint="2.77E7">
 	-5.0	0.0	5.0
-7.5	0.0	0.0	0.0
0.5	0.0	0.0	0.0
2.5	0.0	0.0	0.0
4.0	0.0	0.0	0.0
7.5	0.0	0.0	0.0
15.0	0.0	0.0	0.0
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</tableData>
                  <tableData breakPoint="3.0E7">
 	-5.0	0.0	5.0
-7.5	0.0	0.0	0.0
0.5	0.0	0.0	0.0
2.5	0.0	0.0	0.0
4.0	0.0	0.0	0.0
7.5	0.0	0.0	0.0
15.0	0.0	0.0	0.0
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</tableData>
               </table>
            </product>
         </function>
         <function name="aero/function/rudder_side_coeff_basic_Mach_deflection_2">
            <product>
               <interpolate1d>
                  <p>velocities/mach</p>
                  <v>0.2000</v>
                  <p>aero/function/rudder_side_coeff_basic_M0_deflection_2</p>
                  <p>velocities/mach</p>
                  <v>0.7800</v>
                  <p>aero/function/rudder_side_coeff_basic_M1_deflection_2</p>
               </interpolate1d>
            </product>
         </function>
         <function name="aero/function/rudder_side_coeff_basic_M0_deflection_2">
            <product>
               <table>
                  <independentVar lookup="row">aero/alpha-deg</independentVar>
                  <independentVar lookup="column">aero/beta-deg</independentVar>
                  <independentVar lookup="table">aero/Re</independentVar>
                  <tableData breakPoint="1.0E7">
 	-5.0	0.0	5.0
-7.5	0.0	0.0	0.0
0.5	0.0	0.0	0.0
2.5	0.0	0.0	0.0
4.0	0.0	0.0	0.0
7.5	0.0	0.0	0.0
15.0	0.0	0.0	0.0
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</tableData>
                  <tableData breakPoint="2.77E7">
 	-5.0	0.0	5.0
-7.5	0.0	0.0	0.0
0.5	0.0	0.0	0.0
2.5	0.0	0.0	0.0
4.0	0.0	0.0	0.0
7.5	0.0	0.0	0.0
15.0	0.0	0.0	0.0
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</tableData>
                  <tableData breakPoint="3.0E7">
 	-5.0	0.0	5.0
-7.5	0.0	0.0	0.0
0.5	0.0	0.0	0.0
2.5	0.0	0.0	0.0
4.0	0.0	0.0	0.0
7.5	0.0	0.0	0.0
15.0	0.0	0.0	0.0
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</tableData>
               </table>
            </product>
         </function>
         <function name="aero/function/rudder_side_coeff_basic_M1_deflection_2">
            <product>
               <table>
                  <independentVar lookup="row">aero/alpha-deg</independentVar>
                  <independentVar lookup="column">aero/beta-deg</independentVar>
                  <independentVar lookup="table">aero/Re</independentVar>
                  <tableData breakPoint="1.0E7">
 	-5.0	0.0	5.0
-7.5	0.0	0.0	0.0
0.5	0.0	0.0	0.0
2.5	0.0	0.0	0.0
4.0	0.0	0.0	0.0
7.5	0.0	0.0	0.0
15.0	0.0	0.0	0.0
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</tableData>
                  <tableData breakPoint="2.77E7">
 	-5.0	0.0	5.0
-7.5	0.0	0.0	0.0
0.5	0.0	0.0	0.0
2.5	0.0	0.0	0.0
4.0	0.0	0.0	0.0
7.5	0.0	0.0	0.0
15.0	0.0	0.0	0.0
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</tableData>
                  <tableData breakPoint="3.0E7">
 	-5.0	0.0	5.0
-7.5	0.0	0.0	0.0
0.5	0.0	0.0	0.0
2.5	0.0	0.0	0.0
4.0	0.0	0.0	0.0
7.5	0.0	0.0	0.0
15.0	0.0	0.0	0.0
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</tableData>
               </table>
            </product>
         </function>
         <function name="aero/function/p-side_coeff_basic_Mach">
            <description>Lift coefficient due to alpha, beta, Reynolds, Mach</description>
            <product>
               <interpolate1d>
                  <p>velocities/mach</p>
                  <v>0.200</v>
                  <p>aero/function/p-side_coeff_basic_M0</p>
                  <v>0.780</v>
                  <p>aero/function/p-side_coeff_basic_M1</p>
               </interpolate1d>
            </product>
         </function>
         <function name="aero/function/p-side_coeff_basic_M0">
            <description>CL = f(alpha, beta, Re) at M = 0.2</description>
            <product>
               <table>
                  <independentVar lookup="row">aero/alpha-deg</independentVar>
                  <independentVar lookup="column">aero/beta-deg</independentVar>
                  <independentVar lookup="table">aero/Re</independentVar>
                  <tableData breakPoint="1.0E7">
 	-5.0	0.0	5.0
-7.5	0.25166	0.25262	0.25166
0.5	0.16184	0.16246	0.16184
2.5	0.13899	0.13953	0.139
4.0	0.12176	0.12222	0.12176
7.5	0.081185	0.081496	0.081187
15.0	-0.0073765	-0.007404	-0.0073751
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</tableData>
                  <tableData breakPoint="2.77E7">
 	-5.0	0.0	5.0
-7.5	0.25166	0.25262	0.25166
0.5	0.16184	0.16246	0.16184
2.5	0.13899	0.13953	0.139
4.0	0.12176	0.12222	0.12176
7.5	0.081185	0.081496	0.081187
15.0	-0.0073765	-0.007404	-0.0073751
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</tableData>
                  <tableData breakPoint="3.0E7">
 	-5.0	0.0	5.0
-7.5	0.25166	0.25262	0.25166
0.5	0.16184	0.16246	0.16184
2.5	0.13899	0.13953	0.139
4.0	0.12176	0.12222	0.12176
7.5	0.081185	0.081496	0.081187
15.0	-0.0073765	-0.007404	-0.0073751
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</tableData>
               </table>
            </product>
         </function>
         <function name="aero/function/p-side_coeff_basic_M1">
            <description>CL = f(alpha, beta, Re) at M = 0.78</description>
            <product>
               <table>
                  <independentVar lookup="row">aero/alpha-deg</independentVar>
                  <independentVar lookup="column">aero/beta-deg</independentVar>
                  <independentVar lookup="table">aero/Re</independentVar>
                  <tableData breakPoint="1.0E7">
 	-5.0	0.0	5.0
-7.5	0.25166	0.25262	0.25166
0.5	0.16184	0.16246	0.16184
2.5	0.13899	0.13953	0.139
4.0	0.12176	0.12222	0.12176
7.5	0.081185	0.081496	0.081187
15.0	-0.0073765	-0.007404	-0.0073751
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</tableData>
                  <tableData breakPoint="2.77E7">
 	-5.0	0.0	5.0
-7.5	0.25166	0.25262	0.25166
0.5	0.16184	0.16246	0.16184
2.5	0.13899	0.13953	0.139
4.0	0.12176	0.12222	0.12176
7.5	0.081185	0.081496	0.081187
15.0	-0.0073765	-0.007404	-0.0073751
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</tableData>
                  <tableData breakPoint="3.0E7">
 	-5.0	0.0	5.0
-7.5	0.25166	0.25262	0.25166
0.5	0.16184	0.16246	0.16184
2.5	0.13899	0.13953	0.139
4.0	0.12176	0.12222	0.12176
7.5	0.081185	0.081496	0.081187
15.0	-0.0073765	-0.007404	-0.0073751
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</tableData>
               </table>
            </product>
         </function>
         <function name="aero/function/q-side_coeff_basic_Mach">
            <description>Lift coefficient due to alpha, beta, Reynolds, Mach</description>
            <product>
               <interpolate1d>
                  <p>velocities/mach</p>
                  <v>0.200</v>
                  <p>aero/function/q-side_coeff_basic_M0</p>
                  <v>0.780</v>
                  <p>aero/function/q-side_coeff_basic_M1</p>
               </interpolate1d>
            </product>
         </function>
         <function name="aero/function/q-side_coeff_basic_M0">
            <description>CL = f(alpha, beta, Re) at M = 0.2</description>
            <product>
               <table>
                  <independentVar lookup="row">aero/alpha-deg</independentVar>
                  <independentVar lookup="column">aero/beta-deg</independentVar>
                  <independentVar lookup="table">aero/Re</independentVar>
                  <tableData breakPoint="1.0E7">
 	-5.0	0.0	5.0
-7.5	0.23317	-0.16257	6.1486E-4
0.5	0.052532	-0.19103	6.4697E-4
2.5	-0.058925	-0.22906	6.6806E-4
4.0	-0.096475	-0.32451	6.754E-4
7.5	-0.13419	-0.51573	6.8288E-4
15.0	-0.79843	-0.69832	-0.80148
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</tableData>
                  <tableData breakPoint="2.77E7">
 	-5.0	0.0	5.0
-7.5	6.886E-4	-0.23195	0.16394
0.5	6.944E-4	-0.051243	0.19241
2.5	7.0226E-4	0.060256	0.23046
4.0	7.2259E-4	0.097821	0.32595
7.5	7.661E-4	0.13555	0.51726
15.0	-0.70099	-0.79843	-0.69832
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</tableData>
                  <tableData breakPoint="3.0E7">
 	-5.0	0.0	5.0
-7.5	0.23317	-0.16257	6.1486E-4
0.5	0.052532	-0.19103	6.4697E-4
2.5	-0.058925	-0.22906	6.6806E-4
4.0	-0.096475	-0.32451	6.754E-4
7.5	-0.13419	-0.51573	6.8288E-4
15.0	-0.79843	-0.69832	-0.80148
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</tableData>
               </table>
            </product>
         </function>
         <function name="aero/function/q-side_coeff_basic_M1">
            <description>CL = f(alpha, beta, Re) at M = 0.78</description>
            <product>
               <table>
                  <independentVar lookup="row">aero/alpha-deg</independentVar>
                  <independentVar lookup="column">aero/beta-deg</independentVar>
                  <independentVar lookup="table">aero/Re</independentVar>
                  <tableData breakPoint="1.0E7">
 	-5.0	0.0	5.0
-7.5	6.886E-4	-0.23195	0.16394
0.5	6.944E-4	-0.051243	0.19241
2.5	7.0226E-4	0.060256	0.23046
4.0	7.2259E-4	0.097821	0.32595
7.5	7.661E-4	0.13555	0.51726
15.0	-0.70099	-0.79843	-0.69832
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</tableData>
                  <tableData breakPoint="2.77E7">
 	-5.0	0.0	5.0
-7.5	0.23317	-0.16257	6.1486E-4
0.5	0.052532	-0.19103	6.4697E-4
2.5	-0.058925	-0.22906	6.6806E-4
4.0	-0.096475	-0.32451	6.754E-4
7.5	-0.13419	-0.51573	6.8288E-4
15.0	-0.79843	-0.69832	-0.80148
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</tableData>
                  <tableData breakPoint="3.0E7">
 	-5.0	0.0	5.0
-7.5	6.886E-4	-0.23195	0.16394
0.5	6.944E-4	-0.051243	0.19241
2.5	7.0226E-4	0.060256	0.23046
4.0	7.2259E-4	0.097821	0.32595
7.5	7.661E-4	0.13555	0.51726
15.0	-0.70099	-0.79843	-0.69832
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</tableData>
               </table>
            </product>
         </function>
         <function name="aero/function/r-side_coeff_basic_Mach">
            <description>Lift coefficient due to alpha, beta, Reynolds, Mach</description>
            <product>
               <interpolate1d>
                  <p>velocities/mach</p>
                  <v>0.200</v>
                  <p>aero/function/r-side_coeff_basic_M0</p>
                  <v>0.780</v>
                  <p>aero/function/r-side_coeff_basic_M1</p>
               </interpolate1d>
            </product>
         </function>
         <function name="aero/function/r-side_coeff_basic_M0">
            <description>CL = f(alpha, beta, Re) at M = 0.2</description>
            <product>
               <table>
                  <independentVar lookup="row">aero/alpha-deg</independentVar>
                  <independentVar lookup="column">aero/beta-deg</independentVar>
                  <independentVar lookup="table">aero/Re</independentVar>
                  <tableData breakPoint="1.0E7">
 	-5.0	0.0	5.0
-7.5	0.23317	-0.16257	6.1486E-4
0.5	0.052532	-0.19103	6.4697E-4
2.5	-0.058925	-0.22906	6.6806E-4
4.0	-0.096475	-0.32451	6.754E-4
7.5	-0.13419	-0.51573	6.8288E-4
15.0	-0.79843	-0.69832	-0.80148
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</tableData>
                  <tableData breakPoint="2.77E7">
 	-5.0	0.0	5.0
-7.5	6.886E-4	-0.23195	0.16394
0.5	6.944E-4	-0.051243	0.19241
2.5	7.0226E-4	0.060256	0.23046
4.0	7.2259E-4	0.097821	0.32595
7.5	7.661E-4	0.13555	0.51726
15.0	-0.70099	-0.79843	-0.69832
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</tableData>
                  <tableData breakPoint="3.0E7">
 	-5.0	0.0	5.0
-7.5	0.23317	-0.16257	6.1486E-4
0.5	0.052532	-0.19103	6.4697E-4
2.5	-0.058925	-0.22906	6.6806E-4
4.0	-0.096475	-0.32451	6.754E-4
7.5	-0.13419	-0.51573	6.8288E-4
15.0	-0.79843	-0.69832	-0.80148
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</tableData>
               </table>
            </product>
         </function>
         <function name="aero/function/r-side_coeff_basic_M1">
            <description>CL = f(alpha, beta, Re) at M = 0.78</description>
            <product>
               <table>
                  <independentVar lookup="row">aero/alpha-deg</independentVar>
                  <independentVar lookup="column">aero/beta-deg</independentVar>
                  <independentVar lookup="table">aero/Re</independentVar>
                  <tableData breakPoint="1.0E7">
 	-5.0	0.0	5.0
-7.5	6.886E-4	-0.23195	0.16394
0.5	6.944E-4	-0.051243	0.19241
2.5	7.0226E-4	0.060256	0.23046
4.0	7.2259E-4	0.097821	0.32595
7.5	7.661E-4	0.13555	0.51726
15.0	-0.70099	-0.79843	-0.69832
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</tableData>
                  <tableData breakPoint="2.77E7">
 	-5.0	0.0	5.0
-7.5	0.23317	-0.16257	6.1486E-4
0.5	0.052532	-0.19103	6.4697E-4
2.5	-0.058925	-0.22906	6.6806E-4
4.0	-0.096475	-0.32451	6.754E-4
7.5	-0.13419	-0.51573	6.8288E-4
15.0	-0.79843	-0.69832	-0.80148
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</tableData>
                  <tableData breakPoint="3.0E7">
 	-5.0	0.0	5.0
-7.5	6.886E-4	-0.23195	0.16394
0.5	6.944E-4	-0.051243	0.19241
2.5	7.0226E-4	0.060256	0.23046
4.0	7.2259E-4	0.097821	0.32595
7.5	7.661E-4	0.13555	0.51726
15.0	-0.70099	-0.79843	-0.69832
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</tableData>
               </table>
            </product>
         </function>
      </axis>
      <axis name="Z">
         <function name="aero/function/normal_coeff_basic_Mach">
            <description>Lift coefficient due to alpha, beta, Reynolds, Mach</description>
            <product>
               <interpolate1d>
                  <p>velocities/mach</p>
                  <v>0.200</v>
                  <p>aero/function/normal_coeff_basic_M0</p>
                  <v>0.780</v>
                  <p>aero/function/normal_coeff_basic_M1</p>
               </interpolate1d>
            </product>
         </function>
         <function name="aero/function/normal_coeff_basic_M0">
            <description>CL = f(alpha, beta, Re) at M = 0.2</description>
            <product>
               <table>
                  <independentVar lookup="row">aero/alpha-deg</independentVar>
                  <independentVar lookup="column">aero/beta-deg</independentVar>
                  <independentVar lookup="table">aero/Re</independentVar>
                  <tableData breakPoint="1.0E7">
 	-5.0	0.0	5.0
-7.5	0.58739	0.5874	0.58739
0.5	-0.18291	-0.18291	-0.18291
2.5	-0.37281	-0.37281	-0.37281
4.0	-0.51454	-0.51454	-0.51454
7.5	-0.84288	-0.84289	-0.84288
15.0	-1.5354	-1.5354	-1.5354
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</tableData>
                  <tableData breakPoint="2.77E7">
 	-5.0	0.0	5.0
-7.5	0.58723	0.58724	0.58723
0.5	-0.1829	-0.1829	-0.1829
2.5	-0.37276	-0.37276	-0.37276
4.0	-0.51445	-0.51445	-0.51445
7.5	-0.84273	-0.84273	-0.84273
15.0	-1.5351	-1.5351	-1.5351
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</tableData>
                  <tableData breakPoint="3.0E7">
 	-5.0	0.0	5.0
-7.5	0.58722	0.58722	0.58722
0.5	-0.1829	-0.1829	-0.1829
2.5	-0.37276	-0.37276	-0.37276
4.0	-0.51445	-0.51445	-0.51445
7.5	-0.84272	-0.84272	-0.84272
15.0	-1.5351	-1.5351	-1.5351
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</tableData>
               </table>
            </product>
         </function>
         <function name="aero/function/normal_coeff_basic_M1">
            <description>CL = f(alpha, beta, Re) at M = 0.78</description>
            <product>
               <table>
                  <independentVar lookup="row">aero/alpha-deg</independentVar>
                  <independentVar lookup="column">aero/beta-deg</independentVar>
                  <independentVar lookup="table">aero/Re</independentVar>
                  <tableData breakPoint="1.0E7">
 	-5.0	0.0	5.0
-7.5	0.58762	0.58762	0.58762
0.5	-0.18293	-0.18293	-0.18293
2.5	-0.37289	-0.37289	-0.37289
4.0	-0.51466	-0.51466	-0.51466
7.5	-0.84311	-0.84311	-0.84311
15.0	-1.5359	-1.5359	-1.5359
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</tableData>
                  <tableData breakPoint="2.77E7">
 	-5.0	0.0	5.0
-7.5	0.58742	0.58743	0.58742
0.5	-0.18291	-0.18291	-0.18291
2.5	-0.37282	-0.37283	-0.37282
4.0	-0.51455	-0.51456	-0.51455
7.5	-0.84292	-0.84292	-0.84292
15.0	-1.5355	-1.5355	-1.5355
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</tableData>
                  <tableData breakPoint="3.0E7">
 	-5.0	0.0	5.0
-7.5	0.58741	0.58741	0.58741
0.5	-0.18291	-0.18291	-0.18291
2.5	-0.37282	-0.37282	-0.37282
4.0	-0.51455	-0.51455	-0.51455
7.5	-0.8429	-0.84291	-0.8429
15.0	-1.5355	-1.5355	-1.5355
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</tableData>
               </table>
            </product>
         </function>
         <function name="aero/function/aileron_normal_coeff_basic_Mach_deflection">
            <product>
               <interpolate1d>
                  <p>fcs/left-aileron-pos-deg</p>
                  <v>0.000000</v>
                  <p>aero/function/aileron_normal_coeff_basic_Mach_deflection_0</p>
                  <v>0.5000</v>
                  <p>aero/function/aileron_normal_coeff_basic_Mach_deflection_1</p>
                  <v>1.0000</v>
                  <p>aero/function/aileron_normal_coeff_basic_Mach_deflection_2</p>
               </interpolate1d>
            </product>
         </function>
         <function name="aero/function/aileron_normal_coeff_basic_Mach_deflection_0">
            <product>
               <interpolate1d>
                  <p>velocities/mach</p>
                  <v>0.2000</v>
                  <p>aero/function/aileron_normal_coeff_basic_M0_deflection_0</p>
                  <p>velocities/mach</p>
                  <v>0.7800</v>
                  <p>aero/function/aileron_normal_coeff_basic_M1_deflection_0</p>
               </interpolate1d>
            </product>
         </function>
         <function name="aero/function/aileron_normal_coeff_basic_M0_deflection_0">
            <product>
               <table>
                  <independentVar lookup="row">aero/alpha-deg</independentVar>
                  <independentVar lookup="column">aero/beta-deg</independentVar>
                  <independentVar lookup="table">aero/Re</independentVar>
                  <tableData breakPoint="1.0E7">
 	-5.0	0.0	5.0
-7.5	-0.0	-0.40793	-0.19457
0.5	-0.21442	-0.0	-0.38545
2.5	-0.42397	-0.19963	-0.0
4.0	-0.0	-0.39767	-0.16994
7.5	-0.20525	-0.0	-0.31139
15.0	-0.20396	-0.0	-0.2793
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</tableData>
                  <tableData breakPoint="2.77E7">
 	-5.0	0.0	5.0
-7.5	-0.0	-0.40793	-0.19457
0.5	-0.21442	-0.0	-0.38545
2.5	-0.42397	-0.19963	-0.0
4.0	-0.0	-0.39767	-0.16994
7.5	-0.20525	-0.0	-0.31139
15.0	-0.20396	-0.0	-0.2793
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</tableData>
                  <tableData breakPoint="3.0E7">
 	-5.0	0.0	5.0
-7.5	-0.0	-0.40793	-0.19457
0.5	-0.21442	-0.0	-0.38545
2.5	-0.42397	-0.19963	-0.0
4.0	-0.0	-0.39767	-0.16994
7.5	-0.20525	-0.0	-0.31139
15.0	-0.20396	-0.0	-0.2793
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</tableData>
               </table>
            </product>
         </function>
         <function name="aero/function/aileron_normal_coeff_basic_M1_deflection_0">
            <product>
               <table>
                  <independentVar lookup="row">aero/alpha-deg</independentVar>
                  <independentVar lookup="column">aero/beta-deg</independentVar>
                  <independentVar lookup="table">aero/Re</independentVar>
                  <tableData breakPoint="1.0E7">
 	-5.0	0.0	5.0
-7.5	-0.0	-0.40793	-0.19457
0.5	-0.21442	-0.0	-0.38545
2.5	-0.42397	-0.19963	-0.0
4.0	-0.0	-0.39767	-0.16994
7.5	-0.20525	-0.0	-0.31139
15.0	-0.20396	-0.0	-0.2793
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</tableData>
                  <tableData breakPoint="2.77E7">
 	-5.0	0.0	5.0
-7.5	-0.0	-0.40793	-0.19457
0.5	-0.21442	-0.0	-0.38545
2.5	-0.42397	-0.19963	-0.0
4.0	-0.0	-0.39767	-0.16994
7.5	-0.20525	-0.0	-0.31139
15.0	-0.20396	-0.0	-0.2793
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</tableData>
                  <tableData breakPoint="3.0E7">
 	-5.0	0.0	5.0
-7.5	-0.0	-0.40793	-0.19457
0.5	-0.21442	-0.0	-0.38545
2.5	-0.42397	-0.19963	-0.0
4.0	-0.0	-0.39767	-0.16994
7.5	-0.20525	-0.0	-0.31139
15.0	-0.20396	-0.0	-0.2793
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</tableData>
               </table>
            </product>
         </function>
         <function name="aero/function/aileron_normal_coeff_basic_Mach_deflection_1">
            <product>
               <interpolate1d>
                  <p>velocities/mach</p>
                  <v>0.2000</v>
                  <p>aero/function/aileron_normal_coeff_basic_M0_deflection_1</p>
                  <p>velocities/mach</p>
                  <v>0.7800</v>
                  <p>aero/function/aileron_normal_coeff_basic_M1_deflection_1</p>
               </interpolate1d>
            </product>
         </function>
         <function name="aero/function/aileron_normal_coeff_basic_M0_deflection_1">
            <product>
               <table>
                  <independentVar lookup="row">aero/alpha-deg</independentVar>
                  <independentVar lookup="column">aero/beta-deg</independentVar>
                  <independentVar lookup="table">aero/Re</independentVar>
                  <tableData breakPoint="1.0E7">
 	-5.0	0.0	5.0
-7.5	-0.0	-0.40793	-0.19457
0.5	-0.21442	-0.0	-0.38545
2.5	-0.42397	-0.19963	-0.0
4.0	-0.0	-0.39767	-0.16994
7.5	-0.20525	-0.0	-0.31139
15.0	-0.20396	-0.0	-0.2793
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</tableData>
                  <tableData breakPoint="2.77E7">
 	-5.0	0.0	5.0
-7.5	-0.0	-0.40793	-0.19457
0.5	-0.21442	-0.0	-0.38545
2.5	-0.42397	-0.19963	-0.0
4.0	-0.0	-0.39767	-0.16994
7.5	-0.20525	-0.0	-0.31139
15.0	-0.20396	-0.0	-0.2793
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</tableData>
                  <tableData breakPoint="3.0E7">
 	-5.0	0.0	5.0
-7.5	-0.0	-0.40793	-0.19457
0.5	-0.21442	-0.0	-0.38545
2.5	-0.42397	-0.19963	-0.0
4.0	-0.0	-0.39767	-0.16994
7.5	-0.20525	-0.0	-0.31139
15.0	-0.20396	-0.0	-0.2793
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</tableData>
               </table>
            </product>
         </function>
         <function name="aero/function/aileron_normal_coeff_basic_M1_deflection_1">
            <product>
               <table>
                  <independentVar lookup="row">aero/alpha-deg</independentVar>
                  <independentVar lookup="column">aero/beta-deg</independentVar>
                  <independentVar lookup="table">aero/Re</independentVar>
                  <tableData breakPoint="1.0E7">
 	-5.0	0.0	5.0
-7.5	-0.0	-0.40793	-0.19457
0.5	-0.21442	-0.0	-0.38545
2.5	-0.42397	-0.19963	-0.0
4.0	-0.0	-0.39767	-0.16994
7.5	-0.20525	-0.0	-0.31139
15.0	-0.20396	-0.0	-0.2793
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</tableData>
                  <tableData breakPoint="2.77E7">
 	-5.0	0.0	5.0
-7.5	-0.0	-0.40793	-0.19457
0.5	-0.21442	-0.0	-0.38545
2.5	-0.42397	-0.19963	-0.0
4.0	-0.0	-0.39767	-0.16994
7.5	-0.20525	-0.0	-0.31139
15.0	-0.20396	-0.0	-0.2793
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</tableData>
                  <tableData breakPoint="3.0E7">
 	-5.0	0.0	5.0
-7.5	-0.0	-0.40793	-0.19457
0.5	-0.21442	-0.0	-0.38545
2.5	-0.42397	-0.19963	-0.0
4.0	-0.0	-0.39767	-0.16994
7.5	-0.20525	-0.0	-0.31139
15.0	-0.20396	-0.0	-0.2793
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</tableData>
               </table>
            </product>
         </function>
         <function name="aero/function/aileron_normal_coeff_basic_Mach_deflection_2">
            <product>
               <interpolate1d>
                  <p>velocities/mach</p>
                  <v>0.2000</v>
                  <p>aero/function/aileron_normal_coeff_basic_M0_deflection_2</p>
                  <p>velocities/mach</p>
                  <v>0.7800</v>
                  <p>aero/function/aileron_normal_coeff_basic_M1_deflection_2</p>
               </interpolate1d>
            </product>
         </function>
         <function name="aero/function/aileron_normal_coeff_basic_M0_deflection_2">
            <product>
               <table>
                  <independentVar lookup="row">aero/alpha-deg</independentVar>
                  <independentVar lookup="column">aero/beta-deg</independentVar>
                  <independentVar lookup="table">aero/Re</independentVar>
                  <tableData breakPoint="1.0E7">
 	-5.0	0.0	5.0
-7.5	-0.0	-0.40793	-0.19457
0.5	-0.21442	-0.0	-0.38545
2.5	-0.42397	-0.19963	-0.0
4.0	-0.0	-0.39767	-0.16994
7.5	-0.20525	-0.0	-0.31139
15.0	-0.20396	-0.0	-0.2793
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</tableData>
                  <tableData breakPoint="2.77E7">
 	-5.0	0.0	5.0
-7.5	-0.0	-0.40793	-0.19457
0.5	-0.21442	-0.0	-0.38545
2.5	-0.42397	-0.19963	-0.0
4.0	-0.0	-0.39767	-0.16994
7.5	-0.20525	-0.0	-0.31139
15.0	-0.20396	-0.0	-0.2793
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</tableData>
                  <tableData breakPoint="3.0E7">
 	-5.0	0.0	5.0
-7.5	-0.0	-0.40793	-0.19457
0.5	-0.21442	-0.0	-0.38545
2.5	-0.42397	-0.19963	-0.0
4.0	-0.0	-0.39767	-0.16994
7.5	-0.20525	-0.0	-0.31139
15.0	-0.20396	-0.0	-0.2793
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</tableData>
               </table>
            </product>
         </function>
         <function name="aero/function/aileron_normal_coeff_basic_M1_deflection_2">
            <product>
               <table>
                  <independentVar lookup="row">aero/alpha-deg</independentVar>
                  <independentVar lookup="column">aero/beta-deg</independentVar>
                  <independentVar lookup="table">aero/Re</independentVar>
                  <tableData breakPoint="1.0E7">
 	-5.0	0.0	5.0
-7.5	-0.0	-0.40793	-0.19457
0.5	-0.21442	-0.0	-0.38545
2.5	-0.42397	-0.19963	-0.0
4.0	-0.0	-0.39767	-0.16994
7.5	-0.20525	-0.0	-0.31139
15.0	-0.20396	-0.0	-0.2793
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</tableData>
                  <tableData breakPoint="2.77E7">
 	-5.0	0.0	5.0
-7.5	-0.0	-0.40793	-0.19457
0.5	-0.21442	-0.0	-0.38545
2.5	-0.42397	-0.19963	-0.0
4.0	-0.0	-0.39767	-0.16994
7.5	-0.20525	-0.0	-0.31139
15.0	-0.20396	-0.0	-0.2793
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</tableData>
                  <tableData breakPoint="3.0E7">
 	-5.0	0.0	5.0
-7.5	-0.0	-0.40793	-0.19457
0.5	-0.21442	-0.0	-0.38545
2.5	-0.42397	-0.19963	-0.0
4.0	-0.0	-0.39767	-0.16994
7.5	-0.20525	-0.0	-0.31139
15.0	-0.20396	-0.0	-0.2793
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</tableData>
               </table>
            </product>
         </function>
         <function name="aero/function/elevator_normal_coeff_basic_Mach_deflection">
            <product>
               <interpolate1d>
                  <p>fcs/elevator-pos-deg</p>
                  <v>0.000000</v>
                  <p>aero/function/elevator_normal_coeff_basic_Mach_deflection_0</p>
                  <v>0.5000</v>
                  <p>aero/function/elevator_normal_coeff_basic_Mach_deflection_1</p>
                  <v>1.0000</v>
                  <p>aero/function/elevator_normal_coeff_basic_Mach_deflection_2</p>
               </interpolate1d>
            </product>
         </function>
         <function name="aero/function/elevator_normal_coeff_basic_Mach_deflection_0">
            <product>
               <interpolate1d>
                  <p>velocities/mach</p>
                  <v>0.2000</v>
                  <p>aero/function/elevator_normal_coeff_basic_M0_deflection_0</p>
                  <p>velocities/mach</p>
                  <v>0.7800</v>
                  <p>aero/function/elevator_normal_coeff_basic_M1_deflection_0</p>
               </interpolate1d>
            </product>
         </function>
         <function name="aero/function/elevator_normal_coeff_basic_M0_deflection_0">
            <product>
               <table>
                  <independentVar lookup="row">aero/alpha-deg</independentVar>
                  <independentVar lookup="column">aero/beta-deg</independentVar>
                  <independentVar lookup="table">aero/Re</independentVar>
                  <tableData breakPoint="1.0E7">
 	-5.0	0.0	5.0
-7.5	0.14409	-0.29219	-0.0
0.5	-0.0	0.1461	-0.29182
2.5	-0.29123	-0.0	0.1454
4.0	0.14604	-0.29215	-0.0
7.5	-0.0	0.14602	-0.28683
15.0	-0.0	0.14597	-0.28383
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</tableData>
                  <tableData breakPoint="2.77E7">
 	-5.0	0.0	5.0
-7.5	0.14409	-0.29219	-0.0
0.5	-0.0	0.1461	-0.29182
2.5	-0.29123	-0.0	0.1454
4.0	0.14604	-0.29215	-0.0
7.5	-0.0	0.14602	-0.28683
15.0	-0.0	0.14597	-0.28383
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</tableData>
                  <tableData breakPoint="3.0E7">
 	-5.0	0.0	5.0
-7.5	0.14409	-0.29219	-0.0
0.5	-0.0	0.1461	-0.29182
2.5	-0.29123	-0.0	0.1454
4.0	0.14604	-0.29215	-0.0
7.5	-0.0	0.14602	-0.28683
15.0	-0.0	0.14597	-0.28383
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</tableData>
               </table>
            </product>
         </function>
         <function name="aero/function/elevator_normal_coeff_basic_M1_deflection_0">
            <product>
               <table>
                  <independentVar lookup="row">aero/alpha-deg</independentVar>
                  <independentVar lookup="column">aero/beta-deg</independentVar>
                  <independentVar lookup="table">aero/Re</independentVar>
                  <tableData breakPoint="1.0E7">
 	-5.0	0.0	5.0
-7.5	0.14409	-0.29219	-0.0
0.5	-0.0	0.1461	-0.29182
2.5	-0.29123	-0.0	0.1454
4.0	0.14604	-0.29215	-0.0
7.5	-0.0	0.14602	-0.28683
15.0	-0.0	0.14597	-0.28383
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</tableData>
                  <tableData breakPoint="2.77E7">
 	-5.0	0.0	5.0
-7.5	0.14409	-0.29219	-0.0
0.5	-0.0	0.1461	-0.29182
2.5	-0.29123	-0.0	0.1454
4.0	0.14604	-0.29215	-0.0
7.5	-0.0	0.14602	-0.28683
15.0	-0.0	0.14597	-0.28383
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</tableData>
                  <tableData breakPoint="3.0E7">
 	-5.0	0.0	5.0
-7.5	0.14409	-0.29219	-0.0
0.5	-0.0	0.1461	-0.29182
2.5	-0.29123	-0.0	0.1454
4.0	0.14604	-0.29215	-0.0
7.5	-0.0	0.14602	-0.28683
15.0	-0.0	0.14597	-0.28383
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</tableData>
               </table>
            </product>
         </function>
         <function name="aero/function/elevator_normal_coeff_basic_Mach_deflection_1">
            <product>
               <interpolate1d>
                  <p>velocities/mach</p>
                  <v>0.2000</v>
                  <p>aero/function/elevator_normal_coeff_basic_M0_deflection_1</p>
                  <p>velocities/mach</p>
                  <v>0.7800</v>
                  <p>aero/function/elevator_normal_coeff_basic_M1_deflection_1</p>
               </interpolate1d>
            </product>
         </function>
         <function name="aero/function/elevator_normal_coeff_basic_M0_deflection_1">
            <product>
               <table>
                  <independentVar lookup="row">aero/alpha-deg</independentVar>
                  <independentVar lookup="column">aero/beta-deg</independentVar>
                  <independentVar lookup="table">aero/Re</independentVar>
                  <tableData breakPoint="1.0E7">
 	-5.0	0.0	5.0
-7.5	0.14409	-0.29219	-0.0
0.5	-0.0	0.1461	-0.29182
2.5	-0.29123	-0.0	0.1454
4.0	0.14604	-0.29215	-0.0
7.5	-0.0	0.14602	-0.28683
15.0	-0.0	0.14597	-0.28383
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</tableData>
                  <tableData breakPoint="2.77E7">
 	-5.0	0.0	5.0
-7.5	0.14409	-0.29219	-0.0
0.5	-0.0	0.1461	-0.29182
2.5	-0.29123	-0.0	0.1454
4.0	0.14604	-0.29215	-0.0
7.5	-0.0	0.14602	-0.28683
15.0	-0.0	0.14597	-0.28383
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</tableData>
                  <tableData breakPoint="3.0E7">
 	-5.0	0.0	5.0
-7.5	0.14409	-0.29219	-0.0
0.5	-0.0	0.1461	-0.29182
2.5	-0.29123	-0.0	0.1454
4.0	0.14604	-0.29215	-0.0
7.5	-0.0	0.14602	-0.28683
15.0	-0.0	0.14597	-0.28383
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</tableData>
               </table>
            </product>
         </function>
         <function name="aero/function/elevator_normal_coeff_basic_M1_deflection_1">
            <product>
               <table>
                  <independentVar lookup="row">aero/alpha-deg</independentVar>
                  <independentVar lookup="column">aero/beta-deg</independentVar>
                  <independentVar lookup="table">aero/Re</independentVar>
                  <tableData breakPoint="1.0E7">
 	-5.0	0.0	5.0
-7.5	0.14409	-0.29219	-0.0
0.5	-0.0	0.1461	-0.29182
2.5	-0.29123	-0.0	0.1454
4.0	0.14604	-0.29215	-0.0
7.5	-0.0	0.14602	-0.28683
15.0	-0.0	0.14597	-0.28383
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</tableData>
                  <tableData breakPoint="2.77E7">
 	-5.0	0.0	5.0
-7.5	0.14409	-0.29219	-0.0
0.5	-0.0	0.1461	-0.29182
2.5	-0.29123	-0.0	0.1454
4.0	0.14604	-0.29215	-0.0
7.5	-0.0	0.14602	-0.28683
15.0	-0.0	0.14597	-0.28383
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</tableData>
                  <tableData breakPoint="3.0E7">
 	-5.0	0.0	5.0
-7.5	0.14409	-0.29219	-0.0
0.5	-0.0	0.1461	-0.29182
2.5	-0.29123	-0.0	0.1454
4.0	0.14604	-0.29215	-0.0
7.5	-0.0	0.14602	-0.28683
15.0	-0.0	0.14597	-0.28383
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</tableData>
               </table>
            </product>
         </function>
         <function name="aero/function/elevator_normal_coeff_basic_Mach_deflection_2">
            <product>
               <interpolate1d>
                  <p>velocities/mach</p>
                  <v>0.2000</v>
                  <p>aero/function/elevator_normal_coeff_basic_M0_deflection_2</p>
                  <p>velocities/mach</p>
                  <v>0.7800</v>
                  <p>aero/function/elevator_normal_coeff_basic_M1_deflection_2</p>
               </interpolate1d>
            </product>
         </function>
         <function name="aero/function/elevator_normal_coeff_basic_M0_deflection_2">
            <product>
               <table>
                  <independentVar lookup="row">aero/alpha-deg</independentVar>
                  <independentVar lookup="column">aero/beta-deg</independentVar>
                  <independentVar lookup="table">aero/Re</independentVar>
                  <tableData breakPoint="1.0E7">
 	-5.0	0.0	5.0
-7.5	0.14409	-0.29219	-0.0
0.5	-0.0	0.1461	-0.29182
2.5	-0.29123	-0.0	0.1454
4.0	0.14604	-0.29215	-0.0
7.5	-0.0	0.14602	-0.28683
15.0	-0.0	0.14597	-0.28383
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</tableData>
                  <tableData breakPoint="2.77E7">
 	-5.0	0.0	5.0
-7.5	0.14409	-0.29219	-0.0
0.5	-0.0	0.1461	-0.29182
2.5	-0.29123	-0.0	0.1454
4.0	0.14604	-0.29215	-0.0
7.5	-0.0	0.14602	-0.28683
15.0	-0.0	0.14597	-0.28383
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</tableData>
                  <tableData breakPoint="3.0E7">
 	-5.0	0.0	5.0
-7.5	0.14409	-0.29219	-0.0
0.5	-0.0	0.1461	-0.29182
2.5	-0.29123	-0.0	0.1454
4.0	0.14604	-0.29215	-0.0
7.5	-0.0	0.14602	-0.28683
15.0	-0.0	0.14597	-0.28383
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</tableData>
               </table>
            </product>
         </function>
         <function name="aero/function/elevator_normal_coeff_basic_M1_deflection_2">
            <product>
               <table>
                  <independentVar lookup="row">aero/alpha-deg</independentVar>
                  <independentVar lookup="column">aero/beta-deg</independentVar>
                  <independentVar lookup="table">aero/Re</independentVar>
                  <tableData breakPoint="1.0E7">
 	-5.0	0.0	5.0
-7.5	0.14409	-0.29219	-0.0
0.5	-0.0	0.1461	-0.29182
2.5	-0.29123	-0.0	0.1454
4.0	0.14604	-0.29215	-0.0
7.5	-0.0	0.14602	-0.28683
15.0	-0.0	0.14597	-0.28383
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</tableData>
                  <tableData breakPoint="2.77E7">
 	-5.0	0.0	5.0
-7.5	0.14409	-0.29219	-0.0
0.5	-0.0	0.1461	-0.29182
2.5	-0.29123	-0.0	0.1454
4.0	0.14604	-0.29215	-0.0
7.5	-0.0	0.14602	-0.28683
15.0	-0.0	0.14597	-0.28383
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</tableData>
                  <tableData breakPoint="3.0E7">
 	-5.0	0.0	5.0
-7.5	0.14409	-0.29219	-0.0
0.5	-0.0	0.1461	-0.29182
2.5	-0.29123	-0.0	0.1454
4.0	0.14604	-0.29215	-0.0
7.5	-0.0	0.14602	-0.28683
15.0	-0.0	0.14597	-0.28383
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</tableData>
               </table>
            </product>
         </function>
         <function name="aero/function/rudder_normal_coeff_basic_Mach_deflection">
            <product>
               <interpolate1d>
                  <p>fcs/rudder-pos-deg</p>
                  <v>0.000000</v>
                  <p>aero/function/rudder_normal_coeff_basic_Mach_deflection_0</p>
                  <v>0.5000</v>
                  <p>aero/function/rudder_normal_coeff_basic_Mach_deflection_1</p>
                  <v>1.0000</v>
                  <p>aero/function/rudder_normal_coeff_basic_Mach_deflection_2</p>
               </interpolate1d>
            </product>
         </function>
         <function name="aero/function/rudder_normal_coeff_basic_Mach_deflection_0">
            <product>
               <interpolate1d>
                  <p>velocities/mach</p>
                  <v>0.2000</v>
                  <p>aero/function/rudder_normal_coeff_basic_M0_deflection_0</p>
                  <p>velocities/mach</p>
                  <v>0.7800</v>
                  <p>aero/function/rudder_normal_coeff_basic_M1_deflection_0</p>
               </interpolate1d>
            </product>
         </function>
         <function name="aero/function/rudder_normal_coeff_basic_M0_deflection_0">
            <product>
               <table>
                  <independentVar lookup="row">aero/alpha-deg</independentVar>
                  <independentVar lookup="column">aero/beta-deg</independentVar>
                  <independentVar lookup="table">aero/Re</independentVar>
                  <tableData breakPoint="1.0E7">
 	-5.0	0.0	5.0
-7.5	-5.6082E-6	8.4718E-6	-0.0
0.5	-0.0	-8.6963E-6	9.1694E-6
2.5	7.3801E-6	-0.0	-9.5142E-6
4.0	-8.2277E-6	8.8515E-6	-0.0
7.5	-0.0	-8.9954E-6	9.8119E-6
15.0	-0.0	-9.0849E-6	9.7648E-6
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</tableData>
                  <tableData breakPoint="2.77E7">
 	-5.0	0.0	5.0
-7.5	-5.6082E-6	8.4718E-6	-0.0
0.5	-0.0	-8.6963E-6	9.1694E-6
2.5	7.3801E-6	-0.0	-9.5142E-6
4.0	-8.2277E-6	8.8515E-6	-0.0
7.5	-0.0	-8.9954E-6	9.8119E-6
15.0	-0.0	-9.0849E-6	9.7648E-6
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</tableData>
                  <tableData breakPoint="3.0E7">
 	-5.0	0.0	5.0
-7.5	-5.6082E-6	8.4718E-6	-0.0
0.5	-0.0	-8.6963E-6	9.1694E-6
2.5	7.3801E-6	-0.0	-9.5142E-6
4.0	-8.2277E-6	8.8515E-6	-0.0
7.5	-0.0	-8.9954E-6	9.8119E-6
15.0	-0.0	-9.0849E-6	9.7648E-6
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</tableData>
               </table>
            </product>
         </function>
         <function name="aero/function/rudder_normal_coeff_basic_M1_deflection_0">
            <product>
               <table>
                  <independentVar lookup="row">aero/alpha-deg</independentVar>
                  <independentVar lookup="column">aero/beta-deg</independentVar>
                  <independentVar lookup="table">aero/Re</independentVar>
                  <tableData breakPoint="1.0E7">
 	-5.0	0.0	5.0
-7.5	-5.6082E-6	8.4718E-6	-0.0
0.5	-0.0	-8.6963E-6	9.1694E-6
2.5	7.3801E-6	-0.0	-9.5142E-6
4.0	-8.2277E-6	8.8515E-6	-0.0
7.5	-0.0	-8.9954E-6	9.8119E-6
15.0	-0.0	-9.0849E-6	9.7648E-6
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</tableData>
                  <tableData breakPoint="2.77E7">
 	-5.0	0.0	5.0
-7.5	-5.6082E-6	8.4718E-6	-0.0
0.5	-0.0	-8.6963E-6	9.1694E-6
2.5	7.3801E-6	-0.0	-9.5142E-6
4.0	-8.2277E-6	8.8515E-6	-0.0
7.5	-0.0	-8.9954E-6	9.8119E-6
15.0	-0.0	-9.0849E-6	9.7648E-6
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</tableData>
                  <tableData breakPoint="3.0E7">
 	-5.0	0.0	5.0
-7.5	-5.6082E-6	8.4718E-6	-0.0
0.5	-0.0	-8.6963E-6	9.1694E-6
2.5	7.3801E-6	-0.0	-9.5142E-6
4.0	-8.2277E-6	8.8515E-6	-0.0
7.5	-0.0	-8.9954E-6	9.8119E-6
15.0	-0.0	-9.0849E-6	9.7648E-6
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</tableData>
               </table>
            </product>
         </function>
         <function name="aero/function/rudder_normal_coeff_basic_Mach_deflection_1">
            <product>
               <interpolate1d>
                  <p>velocities/mach</p>
                  <v>0.2000</v>
                  <p>aero/function/rudder_normal_coeff_basic_M0_deflection_1</p>
                  <p>velocities/mach</p>
                  <v>0.7800</v>
                  <p>aero/function/rudder_normal_coeff_basic_M1_deflection_1</p>
               </interpolate1d>
            </product>
         </function>
         <function name="aero/function/rudder_normal_coeff_basic_M0_deflection_1">
            <product>
               <table>
                  <independentVar lookup="row">aero/alpha-deg</independentVar>
                  <independentVar lookup="column">aero/beta-deg</independentVar>
                  <independentVar lookup="table">aero/Re</independentVar>
                  <tableData breakPoint="1.0E7">
 	-5.0	0.0	5.0
-7.5	-5.6082E-6	8.4718E-6	-0.0
0.5	-0.0	-8.6963E-6	9.1694E-6
2.5	7.3801E-6	-0.0	-9.5142E-6
4.0	-8.2277E-6	8.8515E-6	-0.0
7.5	-0.0	-8.9954E-6	9.8119E-6
15.0	-0.0	-9.0849E-6	9.7648E-6
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</tableData>
                  <tableData breakPoint="2.77E7">
 	-5.0	0.0	5.0
-7.5	-5.6082E-6	8.4718E-6	-0.0
0.5	-0.0	-8.6963E-6	9.1694E-6
2.5	7.3801E-6	-0.0	-9.5142E-6
4.0	-8.2277E-6	8.8515E-6	-0.0
7.5	-0.0	-8.9954E-6	9.8119E-6
15.0	-0.0	-9.0849E-6	9.7648E-6
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</tableData>
                  <tableData breakPoint="3.0E7">
 	-5.0	0.0	5.0
-7.5	-5.6082E-6	8.4718E-6	-0.0
0.5	-0.0	-8.6963E-6	9.1694E-6
2.5	7.3801E-6	-0.0	-9.5142E-6
4.0	-8.2277E-6	8.8515E-6	-0.0
7.5	-0.0	-8.9954E-6	9.8119E-6
15.0	-0.0	-9.0849E-6	9.7648E-6
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</tableData>
               </table>
            </product>
         </function>
         <function name="aero/function/rudder_normal_coeff_basic_M1_deflection_1">
            <product>
               <table>
                  <independentVar lookup="row">aero/alpha-deg</independentVar>
                  <independentVar lookup="column">aero/beta-deg</independentVar>
                  <independentVar lookup="table">aero/Re</independentVar>
                  <tableData breakPoint="1.0E7">
 	-5.0	0.0	5.0
-7.5	-5.6082E-6	8.4718E-6	-0.0
0.5	-0.0	-8.6963E-6	9.1694E-6
2.5	7.3801E-6	-0.0	-9.5142E-6
4.0	-8.2277E-6	8.8515E-6	-0.0
7.5	-0.0	-8.9954E-6	9.8119E-6
15.0	-0.0	-9.0849E-6	9.7648E-6
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</tableData>
                  <tableData breakPoint="2.77E7">
 	-5.0	0.0	5.0
-7.5	-5.6082E-6	8.4718E-6	-0.0
0.5	-0.0	-8.6963E-6	9.1694E-6
2.5	7.3801E-6	-0.0	-9.5142E-6
4.0	-8.2277E-6	8.8515E-6	-0.0
7.5	-0.0	-8.9954E-6	9.8119E-6
15.0	-0.0	-9.0849E-6	9.7648E-6
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</tableData>
                  <tableData breakPoint="3.0E7">
 	-5.0	0.0	5.0
-7.5	-5.6082E-6	8.4718E-6	-0.0
0.5	-0.0	-8.6963E-6	9.1694E-6
2.5	7.3801E-6	-0.0	-9.5142E-6
4.0	-8.2277E-6	8.8515E-6	-0.0
7.5	-0.0	-8.9954E-6	9.8119E-6
15.0	-0.0	-9.0849E-6	9.7648E-6
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</tableData>
               </table>
            </product>
         </function>
         <function name="aero/function/rudder_normal_coeff_basic_Mach_deflection_2">
            <product>
               <interpolate1d>
                  <p>velocities/mach</p>
                  <v>0.2000</v>
                  <p>aero/function/rudder_normal_coeff_basic_M0_deflection_2</p>
                  <p>velocities/mach</p>
                  <v>0.7800</v>
                  <p>aero/function/rudder_normal_coeff_basic_M1_deflection_2</p>
               </interpolate1d>
            </product>
         </function>
         <function name="aero/function/rudder_normal_coeff_basic_M0_deflection_2">
            <product>
               <table>
                  <independentVar lookup="row">aero/alpha-deg</independentVar>
                  <independentVar lookup="column">aero/beta-deg</independentVar>
                  <independentVar lookup="table">aero/Re</independentVar>
                  <tableData breakPoint="1.0E7">
 	-5.0	0.0	5.0
-7.5	-5.6082E-6	8.4718E-6	-0.0
0.5	-0.0	-8.6963E-6	9.1694E-6
2.5	7.3801E-6	-0.0	-9.5142E-6
4.0	-8.2277E-6	8.8515E-6	-0.0
7.5	-0.0	-8.9954E-6	9.8119E-6
15.0	-0.0	-9.0849E-6	9.7648E-6
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</tableData>
                  <tableData breakPoint="2.77E7">
 	-5.0	0.0	5.0
-7.5	-5.6082E-6	8.4718E-6	-0.0
0.5	-0.0	-8.6963E-6	9.1694E-6
2.5	7.3801E-6	-0.0	-9.5142E-6
4.0	-8.2277E-6	8.8515E-6	-0.0
7.5	-0.0	-8.9954E-6	9.8119E-6
15.0	-0.0	-9.0849E-6	9.7648E-6
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</tableData>
                  <tableData breakPoint="3.0E7">
 	-5.0	0.0	5.0
-7.5	-5.6082E-6	8.4718E-6	-0.0
0.5	-0.0	-8.6963E-6	9.1694E-6
2.5	7.3801E-6	-0.0	-9.5142E-6
4.0	-8.2277E-6	8.8515E-6	-0.0
7.5	-0.0	-8.9954E-6	9.8119E-6
15.0	-0.0	-9.0849E-6	9.7648E-6
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</tableData>
               </table>
            </product>
         </function>
         <function name="aero/function/rudder_normal_coeff_basic_M1_deflection_2">
            <product>
               <table>
                  <independentVar lookup="row">aero/alpha-deg</independentVar>
                  <independentVar lookup="column">aero/beta-deg</independentVar>
                  <independentVar lookup="table">aero/Re</independentVar>
                  <tableData breakPoint="1.0E7">
 	-5.0	0.0	5.0
-7.5	-5.6082E-6	8.4718E-6	-0.0
0.5	-0.0	-8.6963E-6	9.1694E-6
2.5	7.3801E-6	-0.0	-9.5142E-6
4.0	-8.2277E-6	8.8515E-6	-0.0
7.5	-0.0	-8.9954E-6	9.8119E-6
15.0	-0.0	-9.0849E-6	9.7648E-6
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</tableData>
                  <tableData breakPoint="2.77E7">
 	-5.0	0.0	5.0
-7.5	-5.6082E-6	8.4718E-6	-0.0
0.5	-0.0	-8.6963E-6	9.1694E-6
2.5	7.3801E-6	-0.0	-9.5142E-6
4.0	-8.2277E-6	8.8515E-6	-0.0
7.5	-0.0	-8.9954E-6	9.8119E-6
15.0	-0.0	-9.0849E-6	9.7648E-6
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</tableData>
                  <tableData breakPoint="3.0E7">
 	-5.0	0.0	5.0
-7.5	-5.6082E-6	8.4718E-6	-0.0
0.5	-0.0	-8.6963E-6	9.1694E-6
2.5	7.3801E-6	-0.0	-9.5142E-6
4.0	-8.2277E-6	8.8515E-6	-0.0
7.5	-0.0	-8.9954E-6	9.8119E-6
15.0	-0.0	-9.0849E-6	9.7648E-6
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</tableData>
               </table>
            </product>
         </function>
         <function name="aero/function/p-normal_coeff_basic_Mach">
            <description>Lift coefficient due to alpha, beta, Reynolds, Mach</description>
            <product>
               <interpolate1d>
                  <p>velocities/mach</p>
                  <v>0.200</v>
                  <p>aero/function/p-normal_coeff_basic_M0</p>
                  <v>0.780</v>
                  <p>aero/function/p-normal_coeff_basic_M1</p>
               </interpolate1d>
            </product>
         </function>
         <function name="aero/function/p-normal_coeff_basic_M0">
            <description>CL = f(alpha, beta, Re) at M = 0.2</description>
            <product>
               <table>
                  <independentVar lookup="row">aero/alpha-deg</independentVar>
                  <independentVar lookup="column">aero/beta-deg</independentVar>
                  <independentVar lookup="table">aero/Re</independentVar>
                  <tableData breakPoint="1.0E7">
 	-5.0	0.0	5.0
-7.5	-3.312E-6	-3.312E-6	-3.312E-6
0.5	-2.6187E-6	-2.6187E-6	-2.6187E-6
2.5	-2.1988E-6	-2.1988E-6	-2.1988E-6
4.0	-1.8148E-6	-1.8148E-6	-1.8148E-6
7.5	-6.8326E-7	-6.8326E-7	-6.8326E-7
15.0	2.8678E-6	2.8678E-6	2.8678E-6
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</tableData>
                  <tableData breakPoint="2.77E7">
 	-5.0	0.0	5.0
-7.5	-3.312E-6	-3.312E-6	-3.312E-6
0.5	-2.6187E-6	-2.6187E-6	-2.6187E-6
2.5	-2.1988E-6	-2.1988E-6	-2.1988E-6
4.0	-1.8148E-6	-1.8148E-6	-1.8148E-6
7.5	-6.8326E-7	-6.8326E-7	-6.8326E-7
15.0	2.8678E-6	2.8678E-6	2.8678E-6
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</tableData>
                  <tableData breakPoint="3.0E7">
 	-5.0	0.0	5.0
-7.5	-3.312E-6	-3.312E-6	-3.312E-6
0.5	-2.6187E-6	-2.6187E-6	-2.6187E-6
2.5	-2.1988E-6	-2.1988E-6	-2.1988E-6
4.0	-1.8148E-6	-1.8148E-6	-1.8148E-6
7.5	-6.8326E-7	-6.8326E-7	-6.8326E-7
15.0	2.8678E-6	2.8678E-6	2.8678E-6
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</tableData>
               </table>
            </product>
         </function>
         <function name="aero/function/p-normal_coeff_basic_M1">
            <description>CL = f(alpha, beta, Re) at M = 0.78</description>
            <product>
               <table>
                  <independentVar lookup="row">aero/alpha-deg</independentVar>
                  <independentVar lookup="column">aero/beta-deg</independentVar>
                  <independentVar lookup="table">aero/Re</independentVar>
                  <tableData breakPoint="1.0E7">
 	-5.0	0.0	5.0
-7.5	-3.312E-6	-3.312E-6	-3.312E-6
0.5	-2.6187E-6	-2.6187E-6	-2.6187E-6
2.5	-2.1988E-6	-2.1988E-6	-2.1988E-6
4.0	-1.8148E-6	-1.8148E-6	-1.8148E-6
7.5	-6.8326E-7	-6.8326E-7	-6.8326E-7
15.0	2.8678E-6	2.8678E-6	2.8678E-6
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</tableData>
                  <tableData breakPoint="2.77E7">
 	-5.0	0.0	5.0
-7.5	-3.312E-6	-3.312E-6	-3.312E-6
0.5	-2.6187E-6	-2.6187E-6	-2.6187E-6
2.5	-2.1988E-6	-2.1988E-6	-2.1988E-6
4.0	-1.8148E-6	-1.8148E-6	-1.8148E-6
7.5	-6.8326E-7	-6.8326E-7	-6.8326E-7
15.0	2.8678E-6	2.8678E-6	2.8678E-6
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</tableData>
                  <tableData breakPoint="3.0E7">
 	-5.0	0.0	5.0
-7.5	-3.312E-6	-3.312E-6	-3.312E-6
0.5	-2.6187E-6	-2.6187E-6	-2.6187E-6
2.5	-2.1988E-6	-2.1988E-6	-2.1988E-6
4.0	-1.8148E-6	-1.8148E-6	-1.8148E-6
7.5	-6.8326E-7	-6.8326E-7	-6.8326E-7
15.0	2.8678E-6	2.8678E-6	2.8678E-6
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</tableData>
               </table>
            </product>
         </function>
         <function name="aero/function/q-normal_coeff_basic_Mach">
            <description>Lift coefficient due to alpha, beta, Reynolds, Mach</description>
            <product>
               <interpolate1d>
                  <p>velocities/mach</p>
                  <v>0.200</v>
                  <p>aero/function/q-normal_coeff_basic_M0</p>
                  <v>0.780</v>
                  <p>aero/function/q-normal_coeff_basic_M1</p>
               </interpolate1d>
            </product>
         </function>
         <function name="aero/function/q-normal_coeff_basic_M0">
            <description>CL = f(alpha, beta, Re) at M = 0.2</description>
            <product>
               <table>
                  <independentVar lookup="row">aero/alpha-deg</independentVar>
                  <independentVar lookup="column">aero/beta-deg</independentVar>
                  <independentVar lookup="table">aero/Re</independentVar>
                  <tableData breakPoint="1.0E7">
 	-5.0	0.0	5.0
-7.5	-57.0981	-57.1348	-57.0981
0.5	-57.1977	-57.1115	-57.1977
2.5	-57.1901	-57.0746	-57.1901
4.0	-57.1754	-56.9536	-57.1754
7.5	-57.1546	-56.5851	-57.1546
15.0	8.8184E-5	1.1117E-4	8.8184E-5
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</tableData>
                  <tableData breakPoint="2.77E7">
 	-5.0	0.0	5.0
-7.5	-57.1348	-57.0981	-57.1348
0.5	-57.1115	-57.1977	-57.1115
2.5	-57.0746	-57.1901	-57.0746
4.0	-56.9536	-57.1754	-56.9536
7.5	-56.5851	-57.1546	-56.5851
15.0	1.1117E-4	8.8184E-5	1.1117E-4
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</tableData>
                  <tableData breakPoint="3.0E7">
 	-5.0	0.0	5.0
-7.5	-57.0981	-57.1348	-57.0981
0.5	-57.1977	-57.1115	-57.1977
2.5	-57.1901	-57.0746	-57.1901
4.0	-57.1754	-56.9536	-57.1754
7.5	-57.1546	-56.5851	-57.1546
15.0	8.8184E-5	1.1117E-4	8.8184E-5
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</tableData>
               </table>
            </product>
         </function>
         <function name="aero/function/q-normal_coeff_basic_M1">
            <description>CL = f(alpha, beta, Re) at M = 0.78</description>
            <product>
               <table>
                  <independentVar lookup="row">aero/alpha-deg</independentVar>
                  <independentVar lookup="column">aero/beta-deg</independentVar>
                  <independentVar lookup="table">aero/Re</independentVar>
                  <tableData breakPoint="1.0E7">
 	-5.0	0.0	5.0
-7.5	-57.1348	-57.0981	-57.1348
0.5	-57.1115	-57.1977	-57.1115
2.5	-57.0746	-57.1901	-57.0746
4.0	-56.9536	-57.1754	-56.9536
7.5	-56.5851	-57.1546	-56.5851
15.0	1.1117E-4	8.8184E-5	1.1117E-4
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</tableData>
                  <tableData breakPoint="2.77E7">
 	-5.0	0.0	5.0
-7.5	-57.0981	-57.1348	-57.0981
0.5	-57.1977	-57.1115	-57.1977
2.5	-57.1901	-57.0746	-57.1901
4.0	-57.1754	-56.9536	-57.1754
7.5	-57.1546	-56.5851	-57.1546
15.0	8.8184E-5	1.1117E-4	8.8184E-5
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</tableData>
                  <tableData breakPoint="3.0E7">
 	-5.0	0.0	5.0
-7.5	-57.1348	-57.0981	-57.1348
0.5	-57.1115	-57.1977	-57.1115
2.5	-57.0746	-57.1901	-57.0746
4.0	-56.9536	-57.1754	-56.9536
7.5	-56.5851	-57.1546	-56.5851
15.0	1.1117E-4	8.8184E-5	1.1117E-4
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</tableData>
               </table>
            </product>
         </function>
         <function name="aero/function/r-normal_coeff_basic_Mach">
            <description>Lift coefficient due to alpha, beta, Reynolds, Mach</description>
            <product>
               <interpolate1d>
                  <p>velocities/mach</p>
                  <v>0.200</v>
                  <p>aero/function/r-normal_coeff_basic_M0</p>
                  <v>0.780</v>
                  <p>aero/function/r-normal_coeff_basic_M1</p>
               </interpolate1d>
            </product>
         </function>
         <function name="aero/function/r-normal_coeff_basic_M0">
            <description>CL = f(alpha, beta, Re) at M = 0.2</description>
            <product>
               <table>
                  <independentVar lookup="row">aero/alpha-deg</independentVar>
                  <independentVar lookup="column">aero/beta-deg</independentVar>
                  <independentVar lookup="table">aero/Re</independentVar>
                  <tableData breakPoint="1.0E7">
 	-5.0	0.0	5.0
-7.5	-57.0981	-57.1348	-57.0981
0.5	-57.1977	-57.1115	-57.1977
2.5	-57.1901	-57.0746	-57.1901
4.0	-57.1754	-56.9536	-57.1754
7.5	-57.1546	-56.5851	-57.1546
15.0	8.8184E-5	1.1117E-4	8.8184E-5
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</tableData>
                  <tableData breakPoint="2.77E7">
 	-5.0	0.0	5.0
-7.5	-57.1348	-57.0981	-57.1348
0.5	-57.1115	-57.1977	-57.1115
2.5	-57.0746	-57.1901	-57.0746
4.0	-56.9536	-57.1754	-56.9536
7.5	-56.5851	-57.1546	-56.5851
15.0	1.1117E-4	8.8184E-5	1.1117E-4
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</tableData>
                  <tableData breakPoint="3.0E7">
 	-5.0	0.0	5.0
-7.5	-57.0981	-57.1348	-57.0981
0.5	-57.1977	-57.1115	-57.1977
2.5	-57.1901	-57.0746	-57.1901
4.0	-57.1754	-56.9536	-57.1754
7.5	-57.1546	-56.5851	-57.1546
15.0	8.8184E-5	1.1117E-4	8.8184E-5
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</tableData>
               </table>
            </product>
         </function>
         <function name="aero/function/r-normal_coeff_basic_M1">
            <description>CL = f(alpha, beta, Re) at M = 0.78</description>
            <product>
               <table>
                  <independentVar lookup="row">aero/alpha-deg</independentVar>
                  <independentVar lookup="column">aero/beta-deg</independentVar>
                  <independentVar lookup="table">aero/Re</independentVar>
                  <tableData breakPoint="1.0E7">
 	-5.0	0.0	5.0
-7.5	-57.1348	-57.0981	-57.1348
0.5	-57.1115	-57.1977	-57.1115
2.5	-57.0746	-57.1901	-57.0746
4.0	-56.9536	-57.1754	-56.9536
7.5	-56.5851	-57.1546	-56.5851
15.0	1.1117E-4	8.8184E-5	1.1117E-4
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</tableData>
                  <tableData breakPoint="2.77E7">
 	-5.0	0.0	5.0
-7.5	-57.0981	-57.1348	-57.0981
0.5	-57.1977	-57.1115	-57.1977
2.5	-57.1901	-57.0746	-57.1901
4.0	-57.1754	-56.9536	-57.1754
7.5	-57.1546	-56.5851	-57.1546
15.0	8.8184E-5	1.1117E-4	8.8184E-5
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</tableData>
                  <tableData breakPoint="3.0E7">
 	-5.0	0.0	5.0
-7.5	-57.1348	-57.0981	-57.1348
0.5	-57.1115	-57.1977	-57.1115
2.5	-57.0746	-57.1901	-57.0746
4.0	-56.9536	-57.1754	-56.9536
7.5	-56.5851	-57.1546	-56.5851
15.0	1.1117E-4	8.8184E-5	1.1117E-4
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</tableData>
               </table>
            </product>
         </function>
      </axis>
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