<?xml version="1.0" encoding="UTF-8"?>
<turbine_engine name="D150_AGILE_engine">
   <milthrust>104530.0000</milthrust>
   <bypassratio>1.5000</bypassratio>
   <augmented>0</augmented>
   <injected>0</injected>
</turbine_engine>
